// SBML level 3 version 2

model main()

  // Compartments:
  compartment countryA = 1 dimensionless;
  compartment countryB = 1 dimensionless;

  // Species:
  species susceptible_countryA_vac0 in countryA = susceptible_countryA_vac0_t0;  // substance in dimensionless
  species susceptible_countryA_vac1 in countryA = susceptible_countryA_vac1_t0;  // substance in dimensionless
  species susceptible_countryA_vac2 in countryA = susceptible_countryA_vac2_t0;  // substance in dimensionless
  species susceptible_countryB_vac0 in countryB = susceptible_countryB_vac0_t0;  // substance in dimensionless
  species susceptible_countryB_vac1 in countryB = susceptible_countryB_vac1_t0;  // substance in dimensionless
  species susceptible_countryB_vac2 in countryB = susceptible_countryB_vac2_t0;  // substance in dimensionless
  species infectious_countryA_vac0_virW in countryA = infectious_countryA_vac0_virW_t0;  // substance in dimensionless
  species infectious_countryA_vac0_virM in countryA = infectious_countryA_vac0_virM_t0;  // substance in dimensionless
  species infectious_countryA_vac1_virW in countryA = infectious_countryA_vac1_virW_t0;  // substance in dimensionless
  species infectious_countryA_vac1_virM in countryA = infectious_countryA_vac1_virM_t0;  // substance in dimensionless
  species infectious_countryA_vac2_virW in countryA = infectious_countryA_vac2_virW_t0;  // substance in dimensionless
  species infectious_countryA_vac2_virM in countryA = infectious_countryA_vac2_virM_t0;  // substance in dimensionless
  species infectious_countryB_vac0_virW in countryB = infectious_countryB_vac0_virW_t0;  // substance in dimensionless
  species infectious_countryB_vac0_virM in countryB = infectious_countryB_vac0_virM_t0;  // substance in dimensionless
  species infectious_countryB_vac1_virW in countryB = infectious_countryB_vac1_virW_t0;  // substance in dimensionless
  species infectious_countryB_vac1_virM in countryB = infectious_countryB_vac1_virM_t0;  // substance in dimensionless
  species infectious_countryB_vac2_virW in countryB = infectious_countryB_vac2_virW_t0;  // substance in dimensionless
  species infectious_countryB_vac2_virM in countryB = infectious_countryB_vac2_virM_t0;  // substance in dimensionless
  species recovered_countryA_vac0_virW in countryA = recovered_countryA_vac0_virW_t0;  // substance in dimensionless
  species recovered_countryA_vac0_virM in countryA = recovered_countryA_vac0_virM_t0;  // substance in dimensionless
  species recovered_countryA_vac1_virW in countryA = recovered_countryA_vac1_virW_t0;  // substance in dimensionless
  species recovered_countryA_vac1_virM in countryA = recovered_countryA_vac1_virM_t0;  // substance in dimensionless
  species recovered_countryA_vac2_virW in countryA = recovered_countryA_vac2_virW_t0;  // substance in dimensionless
  species recovered_countryA_vac2_virM in countryA = recovered_countryA_vac2_virM_t0;  // substance in dimensionless
  species recovered_countryB_vac0_virW in countryB = recovered_countryB_vac0_virW_t0;  // substance in dimensionless
  species recovered_countryB_vac0_virM in countryB = recovered_countryB_vac0_virM_t0;  // substance in dimensionless
  species recovered_countryB_vac1_virW in countryB = recovered_countryB_vac1_virW_t0;  // substance in dimensionless
  species recovered_countryB_vac1_virM in countryB = recovered_countryB_vac1_virM_t0;  // substance in dimensionless
  species recovered_countryB_vac2_virW in countryB = recovered_countryB_vac2_virW_t0;  // substance in dimensionless
  species recovered_countryB_vac2_virM in countryB = recovered_countryB_vac2_virM_t0;  // substance in dimensionless
  species dead_countryA_vac0_virW in countryA = dead_countryA_vac0_virW_t0;  // substance in dimensionless
  species dead_countryA_vac0_virM in countryA = dead_countryA_vac0_virM_t0;  // substance in dimensionless
  species dead_countryA_vac1_virW in countryA = dead_countryA_vac1_virW_t0;  // substance in dimensionless
  species dead_countryA_vac1_virM in countryA = dead_countryA_vac1_virM_t0;  // substance in dimensionless
  species dead_countryA_vac2_virW in countryA = dead_countryA_vac2_virW_t0;  // substance in dimensionless
  species dead_countryA_vac2_virM in countryA = dead_countryA_vac2_virM_t0;  // substance in dimensionless
  species dead_countryB_vac0_virW in countryB = dead_countryB_vac0_virW_t0;  // substance in dimensionless
  species dead_countryB_vac0_virM in countryB = dead_countryB_vac0_virM_t0;  // substance in dimensionless
  species dead_countryB_vac1_virW in countryB = dead_countryB_vac1_virW_t0;  // substance in dimensionless
  species dead_countryB_vac1_virM in countryB = dead_countryB_vac1_virM_t0;  // substance in dimensionless
  species dead_countryB_vac2_virW in countryB = dead_countryB_vac2_virW_t0;  // substance in dimensionless
  species dead_countryB_vac2_virM in countryB = dead_countryB_vac2_virM_t0;  // substance in dimensionless

  // Parameters:
  lambda1 = 0.01 dimensionless;
  p = 0.1 dimensionless;
  gamma = 0.5 dimensionless;
  beta = 2 dimensionless;
  t = 0 dimensionless;
  omega_vac1_virW = 0.5 dimensionless;
  delta_vac1_virW = 0.5 dimensionless;
  omega_vac2_virW = 0.6 dimensionless;
  delta_vac2_virW = 0.6 dimensionless;
  omega_vac1_virM = 0.5 dimensionless;
  delta_vac1_virM = 0.5 dimensionless;
  omega_vac2_virM = 0.6 dimensionless;
  delta_vac2_virM = 0.6 dimensionless;
  eta_virW = 1 dimensionless;
  eta_virM = 1.3 dimensionless;
  susceptible_countryA_vac0_t0 = 200000 dimensionless;
  susceptible_countryA_vac1_t0 = 0 dimensionless;
  susceptible_countryA_vac2_t0 = 0 dimensionless;
  susceptible_countryB_vac0_t0 = 200000 dimensionless;
  susceptible_countryB_vac1_t0 = 0 dimensionless;
  susceptible_countryB_vac2_t0 = 0 dimensionless;
  infectious_countryA_vac0_virW_t0 = 100 dimensionless;
  infectious_countryA_vac0_virM_t0 = 100 dimensionless;
  infectious_countryA_vac1_virW_t0 = 0 dimensionless;
  infectious_countryA_vac1_virM_t0 = 0 dimensionless;
  infectious_countryA_vac2_virW_t0 = 0 dimensionless;
  infectious_countryA_vac2_virM_t0 = 0 dimensionless;
  infectious_countryB_vac0_virW_t0 = 100 dimensionless;
  infectious_countryB_vac0_virM_t0 = 100 dimensionless;
  infectious_countryB_vac1_virW_t0 = 0 dimensionless;
  infectious_countryB_vac1_virM_t0 = 0 dimensionless;
  infectious_countryB_vac2_virW_t0 = 0 dimensionless;
  infectious_countryB_vac2_virM_t0 = 0 dimensionless;
  recovered_countryA_vac0_virW_t0 = 0 dimensionless;
  recovered_countryA_vac0_virM_t0 = 0 dimensionless;
  recovered_countryA_vac1_virW_t0 = 0 dimensionless;
  recovered_countryA_vac1_virM_t0 = 0 dimensionless;
  recovered_countryA_vac2_virW_t0 = 0 dimensionless;
  recovered_countryA_vac2_virM_t0 = 0 dimensionless;
  recovered_countryB_vac0_virW_t0 = 0 dimensionless;
  recovered_countryB_vac0_virM_t0 = 0 dimensionless;
  recovered_countryB_vac1_virW_t0 = 0 dimensionless;
  recovered_countryB_vac1_virM_t0 = 0 dimensionless;
  recovered_countryB_vac2_virW_t0 = 0 dimensionless;
  recovered_countryB_vac2_virM_t0 = 0 dimensionless;
  dead_countryA_vac0_virW_t0 = 0 dimensionless;
  dead_countryA_vac0_virM_t0 = 0 dimensionless;
  dead_countryA_vac1_virW_t0 = 0 dimensionless;
  dead_countryA_vac1_virM_t0 = 0 dimensionless;
  dead_countryA_vac2_virW_t0 = 0 dimensionless;
  dead_countryA_vac2_virM_t0 = 0 dimensionless;
  dead_countryB_vac0_virW_t0 = 0 dimensionless;
  dead_countryB_vac0_virM_t0 = 0 dimensionless;
  dead_countryB_vac1_virW_t0 = 0 dimensionless;
  dead_countryB_vac1_virM_t0 = 0 dimensionless;
  dead_countryB_vac2_virW_t0 = 0 dimensionless;
  dead_countryB_vac2_virM_t0 = 0 dimensionless;
  nu_countryA_vac1 has dimensionless;
  nu_countryB_vac1 has dimensionless;
  nu_countryA_vac2 has dimensionless;
  nu_countryB_vac2 has dimensionless;
  number_vac1 = 0 dimensionless;
  number_vac2 = 0 dimensionless;
  proportion_countryA_vac1 has dimensionless;
  proportion_countryB_vac1 has dimensionless;
  proportion_countryA_vac2 has dimensionless;
  proportion_countryB_vac2 has dimensionless;
  proportion_par_countryA_vac1_0 = 0 dimensionless;
  proportion_par_countryA_vac1_14 = 0 dimensionless;
  proportion_par_countryA_vac1_28 = 0 dimensionless;
  proportion_par_countryA_vac1_42 = 0 dimensionless;
  proportion_par_countryA_vac1_56 = 0 dimensionless;
  proportion_par_countryA_vac1_70 = 0 dimensionless;
  proportion_par_countryA_vac1_84 = 0 dimensionless;
  proportion_par_countryA_vac1_98 = 0 dimensionless;
  proportion_par_countryA_vac1_112 = 0 dimensionless;
  proportion_par_countryA_vac1_126 = 0 dimensionless;
  proportion_par_countryA_vac1_140 = 0 dimensionless;
  proportion_par_countryA_vac2_0 = 0 dimensionless;
  proportion_par_countryA_vac2_14 = 0 dimensionless;
  proportion_par_countryA_vac2_28 = 0 dimensionless;
  proportion_par_countryA_vac2_42 = 0 dimensionless;
  proportion_par_countryA_vac2_56 = 0 dimensionless;
  proportion_par_countryA_vac2_70 = 0 dimensionless;
  proportion_par_countryA_vac2_84 = 0 dimensionless;
  proportion_par_countryA_vac2_98 = 0 dimensionless;
  proportion_par_countryA_vac2_112 = 0 dimensionless;
  proportion_par_countryA_vac2_126 = 0 dimensionless;
  proportion_par_countryA_vac2_140 = 0 dimensionless;
  distance_countryA_countryA = 1 dimensionless;
  distance_countryA_countryB = 0.001 dimensionless;
  distance_countryB_countryA = 0.001 dimensionless;
  distance_countryB_countryB = 1 dimensionless;

  // Assignment rules:
  proportion_countryA_vac1 := piecewise(0, t < 0, proportion_par_countryA_vac1_0, (t >= 0) && (t < 14), proportion_par_countryA_vac1_14, (t >= 14) && (t < 28), proportion_par_countryA_vac1_28, (t >= 28) && (t < 42), proportion_par_countryA_vac1_42, (t >= 42) && (t < 56), proportion_par_countryA_vac1_56, (t >= 56) && (t < 70), proportion_par_countryA_vac1_70, (t >= 70) && (t < 84), proportion_par_countryA_vac1_84, (t >= 84) && (t < 98), proportion_par_countryA_vac1_98, (t >= 98) && (t < 112), proportion_par_countryA_vac1_112, (t >= 112) && (t < 126), proportion_par_countryA_vac1_126, (t >= 126) && (t < 140), proportion_par_countryA_vac1_140, (t >= 140) && (t < 154), 0);
  proportion_countryA_vac2 := piecewise(0, t < 0, proportion_par_countryA_vac2_0, (t >= 0) && (t < 14), proportion_par_countryA_vac2_14, (t >= 14) && (t < 28), proportion_par_countryA_vac2_28, (t >= 28) && (t < 42), proportion_par_countryA_vac2_42, (t >= 42) && (t < 56), proportion_par_countryA_vac2_56, (t >= 56) && (t < 70), proportion_par_countryA_vac2_70, (t >= 70) && (t < 84), proportion_par_countryA_vac2_84, (t >= 84) && (t < 98), proportion_par_countryA_vac2_98, (t >= 98) && (t < 112), proportion_par_countryA_vac2_112, (t >= 112) && (t < 126), proportion_par_countryA_vac2_126, (t >= 126) && (t < 140), proportion_par_countryA_vac2_140, (t >= 140) && (t < 154), 0);
  proportion_countryB_vac1 := piecewise(0, t < 0, 1 - proportion_par_countryA_vac1_0, (t >= 0) && (t < 14), 1 - proportion_par_countryA_vac1_14, (t >= 14) && (t < 28), 1 - proportion_par_countryA_vac1_28, (t >= 28) && (t < 42), 1 - proportion_par_countryA_vac1_42, (t >= 42) && (t < 56), 1 - proportion_par_countryA_vac1_56, (t >= 56) && (t < 70), 1 - proportion_par_countryA_vac1_70, (t >= 70) && (t < 84), 1 - proportion_par_countryA_vac1_84, (t >= 84) && (t < 98), 1 - proportion_par_countryA_vac1_98, (t >= 98) && (t < 112), 1 - proportion_par_countryA_vac1_112, (t >= 112) && (t < 126), 1 - proportion_par_countryA_vac1_126, (t >= 126) && (t < 140), 1 - proportion_par_countryA_vac1_140, (t >= 140) && (t < 154), 0);
  proportion_countryB_vac2 := piecewise(0, t < 0, 1 - proportion_par_countryA_vac2_0, (t >= 0) && (t < 14), 1 - proportion_par_countryA_vac2_14, (t >= 14) && (t < 28), 1 - proportion_par_countryA_vac2_28, (t >= 28) && (t < 42), 1 - proportion_par_countryA_vac2_42, (t >= 42) && (t < 56), 1 - proportion_par_countryA_vac2_56, (t >= 56) && (t < 70), 1 - proportion_par_countryA_vac2_70, (t >= 70) && (t < 84), 1 - proportion_par_countryA_vac2_84, (t >= 84) && (t < 98), 1 - proportion_par_countryA_vac2_98, (t >= 98) && (t < 112), 1 - proportion_par_countryA_vac2_112, (t >= 112) && (t < 126), 1 - proportion_par_countryA_vac2_126, (t >= 126) && (t < 140), 1 - proportion_par_countryA_vac2_140, (t >= 140) && (t < 154), 0);
  nu_countryA_vac1 := proportion_countryA_vac1*number_vac1/(susceptible_countryA_vac0 + susceptible_countryA_vac0 + recovered_countryA_vac0_virW + recovered_countryA_vac0_virM);
  nu_countryB_vac1 := proportion_countryB_vac1*number_vac1/(susceptible_countryB_vac0 + susceptible_countryB_vac0 + recovered_countryB_vac0_virW + recovered_countryB_vac0_virM);
  nu_countryA_vac2 := proportion_countryA_vac2*number_vac2/(susceptible_countryA_vac0 + susceptible_countryA_vac0 + recovered_countryA_vac0_virW + recovered_countryA_vac0_virM);
  nu_countryB_vac2 := proportion_countryB_vac2*number_vac2/(susceptible_countryB_vac0 + susceptible_countryB_vac0 + recovered_countryB_vac0_virW + recovered_countryB_vac0_virM);

  // Rate rules:
  t' = 1;

  // Reactions:
  infectious_countryA_vac0_virW_to_recovered_countryA_vac0_virW: infectious_countryA_vac0_virW => recovered_countryA_vac0_virW; (1 - (1 - 0)*p)*lambda1*infectious_countryA_vac0_virW;
  infectious_countryA_vac0_virW_to_dead_countryA_vac0_virW: infectious_countryA_vac0_virW => dead_countryA_vac0_virW; (1 - 0)*p*lambda1*infectious_countryA_vac0_virW;
  infectious_countryA_vac0_virM_to_recovered_countryA_vac0_virM: infectious_countryA_vac0_virM => recovered_countryA_vac0_virM; (1 - (1 - 0)*p)*lambda1*infectious_countryA_vac0_virM;
  infectious_countryA_vac0_virM_to_dead_countryA_vac0_virM: infectious_countryA_vac0_virM => dead_countryA_vac0_virM; (1 - 0)*p*lambda1*infectious_countryA_vac0_virM;
  infectious_countryA_vac1_virW_to_recovered_countryA_vac1_virW: infectious_countryA_vac1_virW => recovered_countryA_vac1_virW; (1 - (1 - omega_vac1_virW)*p)*lambda1*infectious_countryA_vac1_virW;
  infectious_countryA_vac1_virW_to_dead_countryA_vac1_virW: infectious_countryA_vac1_virW => dead_countryA_vac1_virW; (1 - omega_vac1_virW)*p*lambda1*infectious_countryA_vac1_virW;
  infectious_countryA_vac1_virM_to_recovered_countryA_vac1_virM: infectious_countryA_vac1_virM => recovered_countryA_vac1_virM; (1 - (1 - omega_vac1_virM)*p)*lambda1*infectious_countryA_vac1_virM;
  infectious_countryA_vac1_virM_to_dead_countryA_vac1_virM: infectious_countryA_vac1_virM => dead_countryA_vac1_virM; (1 - omega_vac1_virM)*p*lambda1*infectious_countryA_vac1_virM;
  infectious_countryA_vac2_virW_to_recovered_countryA_vac2_virW: infectious_countryA_vac2_virW => recovered_countryA_vac2_virW; (1 - (1 - omega_vac2_virW)*p)*lambda1*infectious_countryA_vac2_virW;
  infectious_countryA_vac2_virW_to_dead_countryA_vac2_virW: infectious_countryA_vac2_virW => dead_countryA_vac2_virW; (1 - omega_vac2_virW)*p*lambda1*infectious_countryA_vac2_virW;
  infectious_countryA_vac2_virM_to_recovered_countryA_vac2_virM: infectious_countryA_vac2_virM => recovered_countryA_vac2_virM; (1 - (1 - omega_vac2_virM)*p)*lambda1*infectious_countryA_vac2_virM;
  infectious_countryA_vac2_virM_to_dead_countryA_vac2_virM: infectious_countryA_vac2_virM => dead_countryA_vac2_virM; (1 - omega_vac2_virM)*p*lambda1*infectious_countryA_vac2_virM;
  infectious_countryB_vac0_virW_to_recovered_countryB_vac0_virW: infectious_countryB_vac0_virW => recovered_countryB_vac0_virW; (1 - (1 - 0)*p)*lambda1*infectious_countryB_vac0_virW;
  infectious_countryB_vac0_virW_to_dead_countryB_vac0_virW: infectious_countryB_vac0_virW => dead_countryB_vac0_virW; (1 - 0)*p*lambda1*infectious_countryB_vac0_virW;
  infectious_countryB_vac0_virM_to_recovered_countryB_vac0_virM: infectious_countryB_vac0_virM => recovered_countryB_vac0_virM; (1 - (1 - 0)*p)*lambda1*infectious_countryB_vac0_virM;
  infectious_countryB_vac0_virM_to_dead_countryB_vac0_virM: infectious_countryB_vac0_virM => dead_countryB_vac0_virM; (1 - 0)*p*lambda1*infectious_countryB_vac0_virM;
  infectious_countryB_vac1_virW_to_recovered_countryB_vac1_virW: infectious_countryB_vac1_virW => recovered_countryB_vac1_virW; (1 - (1 - omega_vac1_virW)*p)*lambda1*infectious_countryB_vac1_virW;
  infectious_countryB_vac1_virW_to_dead_countryB_vac1_virW: infectious_countryB_vac1_virW => dead_countryB_vac1_virW; (1 - omega_vac1_virW)*p*lambda1*infectious_countryB_vac1_virW;
  infectious_countryB_vac1_virM_to_recovered_countryB_vac1_virM: infectious_countryB_vac1_virM => recovered_countryB_vac1_virM; (1 - (1 - omega_vac1_virM)*p)*lambda1*infectious_countryB_vac1_virM;
  infectious_countryB_vac1_virM_to_dead_countryB_vac1_virM: infectious_countryB_vac1_virM => dead_countryB_vac1_virM; (1 - omega_vac1_virM)*p*lambda1*infectious_countryB_vac1_virM;
  infectious_countryB_vac2_virW_to_recovered_countryB_vac2_virW: infectious_countryB_vac2_virW => recovered_countryB_vac2_virW; (1 - (1 - omega_vac2_virW)*p)*lambda1*infectious_countryB_vac2_virW;
  infectious_countryB_vac2_virW_to_dead_countryB_vac2_virW: infectious_countryB_vac2_virW => dead_countryB_vac2_virW; (1 - omega_vac2_virW)*p*lambda1*infectious_countryB_vac2_virW;
  infectious_countryB_vac2_virM_to_recovered_countryB_vac2_virM: infectious_countryB_vac2_virM => recovered_countryB_vac2_virM; (1 - (1 - omega_vac2_virM)*p)*lambda1*infectious_countryB_vac2_virM;
  infectious_countryB_vac2_virM_to_dead_countryB_vac2_virM: infectious_countryB_vac2_virM => dead_countryB_vac2_virM; (1 - omega_vac2_virM)*p*lambda1*infectious_countryB_vac2_virM;
  susceptible_countryA_vac0_to_infectious_countryA_vac0_virW: susceptible_countryA_vac0 + infectious_countryA_vac0_virW => 2 infectious_countryA_vac0_virW; beta*eta_virW*(1 - 0)*(1 - 0)*susceptible_countryA_vac0*infectious_countryA_vac0_virW*(1 - (susceptible_countryB_vac0 + susceptible_countryB_vac1 + susceptible_countryB_vac2 + infectious_countryB_vac0_virW + infectious_countryB_vac0_virM + infectious_countryB_vac1_virW + infectious_countryB_vac1_virM + infectious_countryB_vac2_virW + infectious_countryB_vac2_virM + recovered_countryB_vac0_virW + recovered_countryB_vac0_virM + recovered_countryB_vac1_virW + recovered_countryB_vac1_virM + recovered_countryB_vac2_virW + recovered_countryB_vac2_virM)/(susceptible_countryA_vac0 + susceptible_countryA_vac1 + susceptible_countryA_vac2 + susceptible_countryB_vac0 + susceptible_countryB_vac1 + susceptible_countryB_vac2 + infectious_countryA_vac0_virW + infectious_countryA_vac0_virM + infectious_countryA_vac1_virW + infectious_countryA_vac1_virM + infectious_countryA_vac2_virW + infectious_countryA_vac2_virM + infectious_countryB_vac0_virW + infectious_countryB_vac0_virM + infectious_countryB_vac1_virW + infectious_countryB_vac1_virM + infectious_countryB_vac2_virW + infectious_countryB_vac2_virM + recovered_countryA_vac0_virW + recovered_countryA_vac0_virM + recovered_countryA_vac1_virW + recovered_countryA_vac1_virM + recovered_countryA_vac2_virW + recovered_countryA_vac2_virM + recovered_countryB_vac0_virW + recovered_countryB_vac0_virM + recovered_countryB_vac1_virW + recovered_countryB_vac1_virM + recovered_countryB_vac2_virW + recovered_countryB_vac2_virM)*distance_countryA_countryB)/(susceptible_countryA_vac0 + susceptible_countryA_vac1 + susceptible_countryA_vac2 + infectious_countryA_vac0_virW + infectious_countryA_vac0_virM + infectious_countryA_vac1_virW + infectious_countryA_vac1_virM + infectious_countryA_vac2_virW + infectious_countryA_vac2_virM + recovered_countryA_vac0_virW + recovered_countryA_vac0_virM + recovered_countryA_vac1_virW + recovered_countryA_vac1_virM + recovered_countryA_vac2_virW + recovered_countryA_vac2_virM);  // modifiers: susceptible_countryA_vac1, susceptible_countryA_vac2, susceptible_countryB_vac0, susceptible_countryB_vac1, susceptible_countryB_vac2, infectious_countryA_vac0_virM, infectious_countryA_vac1_virW, infectious_countryA_vac1_virM, infectious_countryA_vac2_virW, infectious_countryA_vac2_virM, infectious_countryB_vac0_virW, infectious_countryB_vac0_virM, infectious_countryB_vac1_virW, infectious_countryB_vac1_virM, infectious_countryB_vac2_virW, infectious_countryB_vac2_virM, recovered_countryA_vac0_virW, recovered_countryA_vac0_virM, recovered_countryA_vac1_virW, recovered_countryA_vac1_virM, recovered_countryA_vac2_virW, recovered_countryA_vac2_virM, recovered_countryB_vac0_virW, recovered_countryB_vac0_virM, recovered_countryB_vac1_virW, recovered_countryB_vac1_virM, recovered_countryB_vac2_virW, recovered_countryB_vac2_virM, dead_countryA_vac0_virW, dead_countryA_vac0_virM, dead_countryA_vac1_virW, dead_countryA_vac1_virM, dead_countryA_vac2_virW, dead_countryA_vac2_virM, dead_countryB_vac0_virW, dead_countryB_vac0_virM, dead_countryB_vac1_virW, dead_countryB_vac1_virM, dead_countryB_vac2_virW, dead_countryB_vac2_virM
  susceptible_countryA_vac1_to_infectious_countryA_vac0_virW: susceptible_countryA_vac1 + infectious_countryA_vac0_virW => infectious_countryA_vac1_virW + infectious_countryA_vac0_virW; beta*eta_virW*(1 - delta_vac1_virW)*(1 - 0)*susceptible_countryA_vac1*infectious_countryA_vac0_virW*(1 - (susceptible_countryB_vac0 + susceptible_countryB_vac1 + susceptible_countryB_vac2 + infectious_countryB_vac0_virW + infectious_countryB_vac0_virM + infectious_countryB_vac1_virW + infectious_countryB_vac1_virM + infectious_countryB_vac2_virW + infectious_countryB_vac2_virM + recovered_countryB_vac0_virW + recovered_countryB_vac0_virM + recovered_countryB_vac1_virW + recovered_countryB_vac1_virM + recovered_countryB_vac2_virW + recovered_countryB_vac2_virM)/(susceptible_countryA_vac0 + susceptible_countryA_vac1 + susceptible_countryA_vac2 + susceptible_countryB_vac0 + susceptible_countryB_vac1 + susceptible_countryB_vac2 + infectious_countryA_vac0_virW + infectious_countryA_vac0_virM + infectious_countryA_vac1_virW + infectious_countryA_vac1_virM + infectious_countryA_vac2_virW + infectious_countryA_vac2_virM + infectious_countryB_vac0_virW + infectious_countryB_vac0_virM + infectious_countryB_vac1_virW + infectious_countryB_vac1_virM + infectious_countryB_vac2_virW + infectious_countryB_vac2_virM + recovered_countryA_vac0_virW + recovered_countryA_vac0_virM + recovered_countryA_vac1_virW + recovered_countryA_vac1_virM + recovered_countryA_vac2_virW + recovered_countryA_vac2_virM + recovered_countryB_vac0_virW + recovered_countryB_vac0_virM + recovered_countryB_vac1_virW + recovered_countryB_vac1_virM + recovered_countryB_vac2_virW + recovered_countryB_vac2_virM)*distance_countryA_countryB)/(susceptible_countryA_vac0 + susceptible_countryA_vac1 + susceptible_countryA_vac2 + infectious_countryA_vac0_virW + infectious_countryA_vac0_virM + infectious_countryA_vac1_virW + infectious_countryA_vac1_virM + infectious_countryA_vac2_virW + infectious_countryA_vac2_virM + recovered_countryA_vac0_virW + recovered_countryA_vac0_virM + recovered_countryA_vac1_virW + recovered_countryA_vac1_virM + recovered_countryA_vac2_virW + recovered_countryA_vac2_virM);  // modifiers: susceptible_countryA_vac0, susceptible_countryA_vac2, susceptible_countryB_vac0, susceptible_countryB_vac1, susceptible_countryB_vac2, infectious_countryA_vac0_virM, infectious_countryA_vac1_virM, infectious_countryA_vac2_virW, infectious_countryA_vac2_virM, infectious_countryB_vac0_virW, infectious_countryB_vac0_virM, infectious_countryB_vac1_virW, infectious_countryB_vac1_virM, infectious_countryB_vac2_virW, infectious_countryB_vac2_virM, recovered_countryA_vac0_virW, recovered_countryA_vac0_virM, recovered_countryA_vac1_virW, recovered_countryA_vac1_virM, recovered_countryA_vac2_virW, recovered_countryA_vac2_virM, recovered_countryB_vac0_virW, recovered_countryB_vac0_virM, recovered_countryB_vac1_virW, recovered_countryB_vac1_virM, recovered_countryB_vac2_virW, recovered_countryB_vac2_virM, dead_countryA_vac0_virW, dead_countryA_vac0_virM, dead_countryA_vac1_virW, dead_countryA_vac1_virM, dead_countryA_vac2_virW, dead_countryA_vac2_virM, dead_countryB_vac0_virW, dead_countryB_vac0_virM, dead_countryB_vac1_virW, dead_countryB_vac1_virM, dead_countryB_vac2_virW, dead_countryB_vac2_virM
  susceptible_countryA_vac2_to_infectious_countryA_vac0_virW: susceptible_countryA_vac2 + infectious_countryA_vac0_virW => infectious_countryA_vac2_virW + infectious_countryA_vac0_virW; beta*eta_virW*(1 - delta_vac2_virW)*(1 - 0)*susceptible_countryA_vac2*infectious_countryA_vac0_virW*(1 - (susceptible_countryB_vac0 + susceptible_countryB_vac1 + susceptible_countryB_vac2 + infectious_countryB_vac0_virW + infectious_countryB_vac0_virM + infectious_countryB_vac1_virW + infectious_countryB_vac1_virM + infectious_countryB_vac2_virW + infectious_countryB_vac2_virM + recovered_countryB_vac0_virW + recovered_countryB_vac0_virM + recovered_countryB_vac1_virW + recovered_countryB_vac1_virM + recovered_countryB_vac2_virW + recovered_countryB_vac2_virM)/(susceptible_countryA_vac0 + susceptible_countryA_vac1 + susceptible_countryA_vac2 + susceptible_countryB_vac0 + susceptible_countryB_vac1 + susceptible_countryB_vac2 + infectious_countryA_vac0_virW + infectious_countryA_vac0_virM + infectious_countryA_vac1_virW + infectious_countryA_vac1_virM + infectious_countryA_vac2_virW + infectious_countryA_vac2_virM + infectious_countryB_vac0_virW + infectious_countryB_vac0_virM + infectious_countryB_vac1_virW + infectious_countryB_vac1_virM + infectious_countryB_vac2_virW + infectious_countryB_vac2_virM + recovered_countryA_vac0_virW + recovered_countryA_vac0_virM + recovered_countryA_vac1_virW + recovered_countryA_vac1_virM + recovered_countryA_vac2_virW + recovered_countryA_vac2_virM + recovered_countryB_vac0_virW + recovered_countryB_vac0_virM + recovered_countryB_vac1_virW + recovered_countryB_vac1_virM + recovered_countryB_vac2_virW + recovered_countryB_vac2_virM)*distance_countryA_countryB)/(susceptible_countryA_vac0 + susceptible_countryA_vac1 + susceptible_countryA_vac2 + infectious_countryA_vac0_virW + infectious_countryA_vac0_virM + infectious_countryA_vac1_virW + infectious_countryA_vac1_virM + infectious_countryA_vac2_virW + infectious_countryA_vac2_virM + recovered_countryA_vac0_virW + recovered_countryA_vac0_virM + recovered_countryA_vac1_virW + recovered_countryA_vac1_virM + recovered_countryA_vac2_virW + recovered_countryA_vac2_virM);  // modifiers: susceptible_countryA_vac0, susceptible_countryA_vac1, susceptible_countryB_vac0, susceptible_countryB_vac1, susceptible_countryB_vac2, infectious_countryA_vac0_virM, infectious_countryA_vac1_virW, infectious_countryA_vac1_virM, infectious_countryA_vac2_virM, infectious_countryB_vac0_virW, infectious_countryB_vac0_virM, infectious_countryB_vac1_virW, infectious_countryB_vac1_virM, infectious_countryB_vac2_virW, infectious_countryB_vac2_virM, recovered_countryA_vac0_virW, recovered_countryA_vac0_virM, recovered_countryA_vac1_virW, recovered_countryA_vac1_virM, recovered_countryA_vac2_virW, recovered_countryA_vac2_virM, recovered_countryB_vac0_virW, recovered_countryB_vac0_virM, recovered_countryB_vac1_virW, recovered_countryB_vac1_virM, recovered_countryB_vac2_virW, recovered_countryB_vac2_virM, dead_countryA_vac0_virW, dead_countryA_vac0_virM, dead_countryA_vac1_virW, dead_countryA_vac1_virM, dead_countryA_vac2_virW, dead_countryA_vac2_virM, dead_countryB_vac0_virW, dead_countryB_vac0_virM, dead_countryB_vac1_virW, dead_countryB_vac1_virM, dead_countryB_vac2_virW, dead_countryB_vac2_virM
  susceptible_countryB_vac0_to_infectious_countryA_vac0_virW: susceptible_countryB_vac0 + infectious_countryA_vac0_virW => infectious_countryB_vac0_virW + infectious_countryA_vac0_virW; beta*eta_virW*(1 - 0)*(1 - 0)*susceptible_countryB_vac0*infectious_countryA_vac0_virW*(susceptible_countryB_vac0 + susceptible_countryB_vac1 + susceptible_countryB_vac2 + infectious_countryB_vac0_virW + infectious_countryB_vac0_virM + infectious_countryB_vac1_virW + infectious_countryB_vac1_virM + infectious_countryB_vac2_virW + infectious_countryB_vac2_virM + recovered_countryB_vac0_virW + recovered_countryB_vac0_virM + recovered_countryB_vac1_virW + recovered_countryB_vac1_virM + recovered_countryB_vac2_virW + recovered_countryB_vac2_virM)/(susceptible_countryA_vac0 + susceptible_countryA_vac1 + susceptible_countryA_vac2 + susceptible_countryB_vac0 + susceptible_countryB_vac1 + susceptible_countryB_vac2 + infectious_countryA_vac0_virW + infectious_countryA_vac0_virM + infectious_countryA_vac1_virW + infectious_countryA_vac1_virM + infectious_countryA_vac2_virW + infectious_countryA_vac2_virM + infectious_countryB_vac0_virW + infectious_countryB_vac0_virM + infectious_countryB_vac1_virW + infectious_countryB_vac1_virM + infectious_countryB_vac2_virW + infectious_countryB_vac2_virM + recovered_countryA_vac0_virW + recovered_countryA_vac0_virM + recovered_countryA_vac1_virW + recovered_countryA_vac1_virM + recovered_countryA_vac2_virW + recovered_countryA_vac2_virM + recovered_countryB_vac0_virW + recovered_countryB_vac0_virM + recovered_countryB_vac1_virW + recovered_countryB_vac1_virM + recovered_countryB_vac2_virW + recovered_countryB_vac2_virM)*distance_countryA_countryB/(susceptible_countryB_vac0 + susceptible_countryB_vac1 + susceptible_countryB_vac2 + infectious_countryB_vac0_virW + infectious_countryB_vac0_virM + infectious_countryB_vac1_virW + infectious_countryB_vac1_virM + infectious_countryB_vac2_virW + infectious_countryB_vac2_virM + recovered_countryB_vac0_virW + recovered_countryB_vac0_virM + recovered_countryB_vac1_virW + recovered_countryB_vac1_virM + recovered_countryB_vac2_virW + recovered_countryB_vac2_virM);  // modifiers: susceptible_countryA_vac0, susceptible_countryA_vac1, susceptible_countryA_vac2, susceptible_countryB_vac1, susceptible_countryB_vac2, infectious_countryA_vac0_virM, infectious_countryA_vac1_virW, infectious_countryA_vac1_virM, infectious_countryA_vac2_virW, infectious_countryA_vac2_virM, infectious_countryB_vac0_virM, infectious_countryB_vac1_virW, infectious_countryB_vac1_virM, infectious_countryB_vac2_virW, infectious_countryB_vac2_virM, recovered_countryA_vac0_virW, recovered_countryA_vac0_virM, recovered_countryA_vac1_virW, recovered_countryA_vac1_virM, recovered_countryA_vac2_virW, recovered_countryA_vac2_virM, recovered_countryB_vac0_virW, recovered_countryB_vac0_virM, recovered_countryB_vac1_virW, recovered_countryB_vac1_virM, recovered_countryB_vac2_virW, recovered_countryB_vac2_virM, dead_countryA_vac0_virW, dead_countryA_vac0_virM, dead_countryA_vac1_virW, dead_countryA_vac1_virM, dead_countryA_vac2_virW, dead_countryA_vac2_virM, dead_countryB_vac0_virW, dead_countryB_vac0_virM, dead_countryB_vac1_virW, dead_countryB_vac1_virM, dead_countryB_vac2_virW, dead_countryB_vac2_virM
  susceptible_countryB_vac1_to_infectious_countryA_vac0_virW: susceptible_countryB_vac1 + infectious_countryA_vac0_virW => infectious_countryB_vac1_virW + infectious_countryA_vac0_virW; beta*eta_virW*(1 - delta_vac1_virW)*(1 - 0)*susceptible_countryB_vac1*infectious_countryA_vac0_virW*(susceptible_countryB_vac0 + susceptible_countryB_vac1 + susceptible_countryB_vac2 + infectious_countryB_vac0_virW + infectious_countryB_vac0_virM + infectious_countryB_vac1_virW + infectious_countryB_vac1_virM + infectious_countryB_vac2_virW + infectious_countryB_vac2_virM + recovered_countryB_vac0_virW + recovered_countryB_vac0_virM + recovered_countryB_vac1_virW + recovered_countryB_vac1_virM + recovered_countryB_vac2_virW + recovered_countryB_vac2_virM)/(susceptible_countryA_vac0 + susceptible_countryA_vac1 + susceptible_countryA_vac2 + susceptible_countryB_vac0 + susceptible_countryB_vac1 + susceptible_countryB_vac2 + infectious_countryA_vac0_virW + infectious_countryA_vac0_virM + infectious_countryA_vac1_virW + infectious_countryA_vac1_virM + infectious_countryA_vac2_virW + infectious_countryA_vac2_virM + infectious_countryB_vac0_virW + infectious_countryB_vac0_virM + infectious_countryB_vac1_virW + infectious_countryB_vac1_virM + infectious_countryB_vac2_virW + infectious_countryB_vac2_virM + recovered_countryA_vac0_virW + recovered_countryA_vac0_virM + recovered_countryA_vac1_virW + recovered_countryA_vac1_virM + recovered_countryA_vac2_virW + recovered_countryA_vac2_virM + recovered_countryB_vac0_virW + recovered_countryB_vac0_virM + recovered_countryB_vac1_virW + recovered_countryB_vac1_virM + recovered_countryB_vac2_virW + recovered_countryB_vac2_virM)*distance_countryA_countryB/(susceptible_countryB_vac0 + susceptible_countryB_vac1 + susceptible_countryB_vac2 + infectious_countryB_vac0_virW + infectious_countryB_vac0_virM + infectious_countryB_vac1_virW + infectious_countryB_vac1_virM + infectious_countryB_vac2_virW + infectious_countryB_vac2_virM + recovered_countryB_vac0_virW + recovered_countryB_vac0_virM + recovered_countryB_vac1_virW + recovered_countryB_vac1_virM + recovered_countryB_vac2_virW + recovered_countryB_vac2_virM);  // modifiers: susceptible_countryA_vac0, susceptible_countryA_vac1, susceptible_countryA_vac2, susceptible_countryB_vac0, susceptible_countryB_vac2, infectious_countryA_vac0_virM, infectious_countryA_vac1_virW, infectious_countryA_vac1_virM, infectious_countryA_vac2_virW, infectious_countryA_vac2_virM, infectious_countryB_vac0_virW, infectious_countryB_vac0_virM, infectious_countryB_vac1_virM, infectious_countryB_vac2_virW, infectious_countryB_vac2_virM, recovered_countryA_vac0_virW, recovered_countryA_vac0_virM, recovered_countryA_vac1_virW, recovered_countryA_vac1_virM, recovered_countryA_vac2_virW, recovered_countryA_vac2_virM, recovered_countryB_vac0_virW, recovered_countryB_vac0_virM, recovered_countryB_vac1_virW, recovered_countryB_vac1_virM, recovered_countryB_vac2_virW, recovered_countryB_vac2_virM, dead_countryA_vac0_virW, dead_countryA_vac0_virM, dead_countryA_vac1_virW, dead_countryA_vac1_virM, dead_countryA_vac2_virW, dead_countryA_vac2_virM, dead_countryB_vac0_virW, dead_countryB_vac0_virM, dead_countryB_vac1_virW, dead_countryB_vac1_virM, dead_countryB_vac2_virW, dead_countryB_vac2_virM
  susceptible_countryB_vac2_to_infectious_countryA_vac0_virW: susceptible_countryB_vac2 + infectious_countryA_vac0_virW => infectious_countryB_vac2_virW + infectious_countryA_vac0_virW; beta*eta_virW*(1 - delta_vac2_virW)*(1 - 0)*susceptible_countryB_vac2*infectious_countryA_vac0_virW*(susceptible_countryB_vac0 + susceptible_countryB_vac1 + susceptible_countryB_vac2 + infectious_countryB_vac0_virW + infectious_countryB_vac0_virM + infectious_countryB_vac1_virW + infectious_countryB_vac1_virM + infectious_countryB_vac2_virW + infectious_countryB_vac2_virM + recovered_countryB_vac0_virW + recovered_countryB_vac0_virM + recovered_countryB_vac1_virW + recovered_countryB_vac1_virM + recovered_countryB_vac2_virW + recovered_countryB_vac2_virM)/(susceptible_countryA_vac0 + susceptible_countryA_vac1 + susceptible_countryA_vac2 + susceptible_countryB_vac0 + susceptible_countryB_vac1 + susceptible_countryB_vac2 + infectious_countryA_vac0_virW + infectious_countryA_vac0_virM + infectious_countryA_vac1_virW + infectious_countryA_vac1_virM + infectious_countryA_vac2_virW + infectious_countryA_vac2_virM + infectious_countryB_vac0_virW + infectious_countryB_vac0_virM + infectious_countryB_vac1_virW + infectious_countryB_vac1_virM + infectious_countryB_vac2_virW + infectious_countryB_vac2_virM + recovered_countryA_vac0_virW + recovered_countryA_vac0_virM + recovered_countryA_vac1_virW + recovered_countryA_vac1_virM + recovered_countryA_vac2_virW + recovered_countryA_vac2_virM + recovered_countryB_vac0_virW + recovered_countryB_vac0_virM + recovered_countryB_vac1_virW + recovered_countryB_vac1_virM + recovered_countryB_vac2_virW + recovered_countryB_vac2_virM)*distance_countryA_countryB/(susceptible_countryB_vac0 + susceptible_countryB_vac1 + susceptible_countryB_vac2 + infectious_countryB_vac0_virW + infectious_countryB_vac0_virM + infectious_countryB_vac1_virW + infectious_countryB_vac1_virM + infectious_countryB_vac2_virW + infectious_countryB_vac2_virM + recovered_countryB_vac0_virW + recovered_countryB_vac0_virM + recovered_countryB_vac1_virW + recovered_countryB_vac1_virM + recovered_countryB_vac2_virW + recovered_countryB_vac2_virM);  // modifiers: susceptible_countryA_vac0, susceptible_countryA_vac1, susceptible_countryA_vac2, susceptible_countryB_vac0, susceptible_countryB_vac1, infectious_countryA_vac0_virM, infectious_countryA_vac1_virW, infectious_countryA_vac1_virM, infectious_countryA_vac2_virW, infectious_countryA_vac2_virM, infectious_countryB_vac0_virW, infectious_countryB_vac0_virM, infectious_countryB_vac1_virW, infectious_countryB_vac1_virM, infectious_countryB_vac2_virM, recovered_countryA_vac0_virW, recovered_countryA_vac0_virM, recovered_countryA_vac1_virW, recovered_countryA_vac1_virM, recovered_countryA_vac2_virW, recovered_countryA_vac2_virM, recovered_countryB_vac0_virW, recovered_countryB_vac0_virM, recovered_countryB_vac1_virW, recovered_countryB_vac1_virM, recovered_countryB_vac2_virW, recovered_countryB_vac2_virM, dead_countryA_vac0_virW, dead_countryA_vac0_virM, dead_countryA_vac1_virW, dead_countryA_vac1_virM, dead_countryA_vac2_virW, dead_countryA_vac2_virM, dead_countryB_vac0_virW, dead_countryB_vac0_virM, dead_countryB_vac1_virW, dead_countryB_vac1_virM, dead_countryB_vac2_virW, dead_countryB_vac2_virM
  susceptible_countryA_vac0_to_infectious_countryA_vac0_virM: susceptible_countryA_vac0 + infectious_countryA_vac0_virM => 2 infectious_countryA_vac0_virM; beta*eta_virM*(1 - 0)*(1 - 0)*susceptible_countryA_vac0*infectious_countryA_vac0_virM*(1 - (susceptible_countryB_vac0 + susceptible_countryB_vac1 + susceptible_countryB_vac2 + infectious_countryB_vac0_virW + infectious_countryB_vac0_virM + infectious_countryB_vac1_virW + infectious_countryB_vac1_virM + infectious_countryB_vac2_virW + infectious_countryB_vac2_virM + recovered_countryB_vac0_virW + recovered_countryB_vac0_virM + recovered_countryB_vac1_virW + recovered_countryB_vac1_virM + recovered_countryB_vac2_virW + recovered_countryB_vac2_virM)/(susceptible_countryA_vac0 + susceptible_countryA_vac1 + susceptible_countryA_vac2 + susceptible_countryB_vac0 + susceptible_countryB_vac1 + susceptible_countryB_vac2 + infectious_countryA_vac0_virW + infectious_countryA_vac0_virM + infectious_countryA_vac1_virW + infectious_countryA_vac1_virM + infectious_countryA_vac2_virW + infectious_countryA_vac2_virM + infectious_countryB_vac0_virW + infectious_countryB_vac0_virM + infectious_countryB_vac1_virW + infectious_countryB_vac1_virM + infectious_countryB_vac2_virW + infectious_countryB_vac2_virM + recovered_countryA_vac0_virW + recovered_countryA_vac0_virM + recovered_countryA_vac1_virW + recovered_countryA_vac1_virM + recovered_countryA_vac2_virW + recovered_countryA_vac2_virM + recovered_countryB_vac0_virW + recovered_countryB_vac0_virM + recovered_countryB_vac1_virW + recovered_countryB_vac1_virM + recovered_countryB_vac2_virW + recovered_countryB_vac2_virM)*distance_countryA_countryB)/(susceptible_countryA_vac0 + susceptible_countryA_vac1 + susceptible_countryA_vac2 + infectious_countryA_vac0_virW + infectious_countryA_vac0_virM + infectious_countryA_vac1_virW + infectious_countryA_vac1_virM + infectious_countryA_vac2_virW + infectious_countryA_vac2_virM + recovered_countryA_vac0_virW + recovered_countryA_vac0_virM + recovered_countryA_vac1_virW + recovered_countryA_vac1_virM + recovered_countryA_vac2_virW + recovered_countryA_vac2_virM);  // modifiers: susceptible_countryA_vac1, susceptible_countryA_vac2, susceptible_countryB_vac0, susceptible_countryB_vac1, susceptible_countryB_vac2, infectious_countryA_vac0_virW, infectious_countryA_vac1_virW, infectious_countryA_vac1_virM, infectious_countryA_vac2_virW, infectious_countryA_vac2_virM, infectious_countryB_vac0_virW, infectious_countryB_vac0_virM, infectious_countryB_vac1_virW, infectious_countryB_vac1_virM, infectious_countryB_vac2_virW, infectious_countryB_vac2_virM, recovered_countryA_vac0_virW, recovered_countryA_vac0_virM, recovered_countryA_vac1_virW, recovered_countryA_vac1_virM, recovered_countryA_vac2_virW, recovered_countryA_vac2_virM, recovered_countryB_vac0_virW, recovered_countryB_vac0_virM, recovered_countryB_vac1_virW, recovered_countryB_vac1_virM, recovered_countryB_vac2_virW, recovered_countryB_vac2_virM, dead_countryA_vac0_virW, dead_countryA_vac0_virM, dead_countryA_vac1_virW, dead_countryA_vac1_virM, dead_countryA_vac2_virW, dead_countryA_vac2_virM, dead_countryB_vac0_virW, dead_countryB_vac0_virM, dead_countryB_vac1_virW, dead_countryB_vac1_virM, dead_countryB_vac2_virW, dead_countryB_vac2_virM
  susceptible_countryA_vac1_to_infectious_countryA_vac0_virM: susceptible_countryA_vac1 + infectious_countryA_vac0_virM => infectious_countryA_vac1_virM + infectious_countryA_vac0_virM; beta*eta_virM*(1 - delta_vac1_virM)*(1 - 0)*susceptible_countryA_vac1*infectious_countryA_vac0_virM*(1 - (susceptible_countryB_vac0 + susceptible_countryB_vac1 + susceptible_countryB_vac2 + infectious_countryB_vac0_virW + infectious_countryB_vac0_virM + infectious_countryB_vac1_virW + infectious_countryB_vac1_virM + infectious_countryB_vac2_virW + infectious_countryB_vac2_virM + recovered_countryB_vac0_virW + recovered_countryB_vac0_virM + recovered_countryB_vac1_virW + recovered_countryB_vac1_virM + recovered_countryB_vac2_virW + recovered_countryB_vac2_virM)/(susceptible_countryA_vac0 + susceptible_countryA_vac1 + susceptible_countryA_vac2 + susceptible_countryB_vac0 + susceptible_countryB_vac1 + susceptible_countryB_vac2 + infectious_countryA_vac0_virW + infectious_countryA_vac0_virM + infectious_countryA_vac1_virW + infectious_countryA_vac1_virM + infectious_countryA_vac2_virW + infectious_countryA_vac2_virM + infectious_countryB_vac0_virW + infectious_countryB_vac0_virM + infectious_countryB_vac1_virW + infectious_countryB_vac1_virM + infectious_countryB_vac2_virW + infectious_countryB_vac2_virM + recovered_countryA_vac0_virW + recovered_countryA_vac0_virM + recovered_countryA_vac1_virW + recovered_countryA_vac1_virM + recovered_countryA_vac2_virW + recovered_countryA_vac2_virM + recovered_countryB_vac0_virW + recovered_countryB_vac0_virM + recovered_countryB_vac1_virW + recovered_countryB_vac1_virM + recovered_countryB_vac2_virW + recovered_countryB_vac2_virM)*distance_countryA_countryB)/(susceptible_countryA_vac0 + susceptible_countryA_vac1 + susceptible_countryA_vac2 + infectious_countryA_vac0_virW + infectious_countryA_vac0_virM + infectious_countryA_vac1_virW + infectious_countryA_vac1_virM + infectious_countryA_vac2_virW + infectious_countryA_vac2_virM + recovered_countryA_vac0_virW + recovered_countryA_vac0_virM + recovered_countryA_vac1_virW + recovered_countryA_vac1_virM + recovered_countryA_vac2_virW + recovered_countryA_vac2_virM);  // modifiers: susceptible_countryA_vac0, susceptible_countryA_vac2, susceptible_countryB_vac0, susceptible_countryB_vac1, susceptible_countryB_vac2, infectious_countryA_vac0_virW, infectious_countryA_vac1_virW, infectious_countryA_vac2_virW, infectious_countryA_vac2_virM, infectious_countryB_vac0_virW, infectious_countryB_vac0_virM, infectious_countryB_vac1_virW, infectious_countryB_vac1_virM, infectious_countryB_vac2_virW, infectious_countryB_vac2_virM, recovered_countryA_vac0_virW, recovered_countryA_vac0_virM, recovered_countryA_vac1_virW, recovered_countryA_vac1_virM, recovered_countryA_vac2_virW, recovered_countryA_vac2_virM, recovered_countryB_vac0_virW, recovered_countryB_vac0_virM, recovered_countryB_vac1_virW, recovered_countryB_vac1_virM, recovered_countryB_vac2_virW, recovered_countryB_vac2_virM, dead_countryA_vac0_virW, dead_countryA_vac0_virM, dead_countryA_vac1_virW, dead_countryA_vac1_virM, dead_countryA_vac2_virW, dead_countryA_vac2_virM, dead_countryB_vac0_virW, dead_countryB_vac0_virM, dead_countryB_vac1_virW, dead_countryB_vac1_virM, dead_countryB_vac2_virW, dead_countryB_vac2_virM
  susceptible_countryA_vac2_to_infectious_countryA_vac0_virM: susceptible_countryA_vac2 + infectious_countryA_vac0_virM => infectious_countryA_vac2_virM + infectious_countryA_vac0_virM; beta*eta_virM*(1 - delta_vac2_virM)*(1 - 0)*susceptible_countryA_vac2*infectious_countryA_vac0_virM*(1 - (susceptible_countryB_vac0 + susceptible_countryB_vac1 + susceptible_countryB_vac2 + infectious_countryB_vac0_virW + infectious_countryB_vac0_virM + infectious_countryB_vac1_virW + infectious_countryB_vac1_virM + infectious_countryB_vac2_virW + infectious_countryB_vac2_virM + recovered_countryB_vac0_virW + recovered_countryB_vac0_virM + recovered_countryB_vac1_virW + recovered_countryB_vac1_virM + recovered_countryB_vac2_virW + recovered_countryB_vac2_virM)/(susceptible_countryA_vac0 + susceptible_countryA_vac1 + susceptible_countryA_vac2 + susceptible_countryB_vac0 + susceptible_countryB_vac1 + susceptible_countryB_vac2 + infectious_countryA_vac0_virW + infectious_countryA_vac0_virM + infectious_countryA_vac1_virW + infectious_countryA_vac1_virM + infectious_countryA_vac2_virW + infectious_countryA_vac2_virM + infectious_countryB_vac0_virW + infectious_countryB_vac0_virM + infectious_countryB_vac1_virW + infectious_countryB_vac1_virM + infectious_countryB_vac2_virW + infectious_countryB_vac2_virM + recovered_countryA_vac0_virW + recovered_countryA_vac0_virM + recovered_countryA_vac1_virW + recovered_countryA_vac1_virM + recovered_countryA_vac2_virW + recovered_countryA_vac2_virM + recovered_countryB_vac0_virW + recovered_countryB_vac0_virM + recovered_countryB_vac1_virW + recovered_countryB_vac1_virM + recovered_countryB_vac2_virW + recovered_countryB_vac2_virM)*distance_countryA_countryB)/(susceptible_countryA_vac0 + susceptible_countryA_vac1 + susceptible_countryA_vac2 + infectious_countryA_vac0_virW + infectious_countryA_vac0_virM + infectious_countryA_vac1_virW + infectious_countryA_vac1_virM + infectious_countryA_vac2_virW + infectious_countryA_vac2_virM + recovered_countryA_vac0_virW + recovered_countryA_vac0_virM + recovered_countryA_vac1_virW + recovered_countryA_vac1_virM + recovered_countryA_vac2_virW + recovered_countryA_vac2_virM);  // modifiers: susceptible_countryA_vac0, susceptible_countryA_vac1, susceptible_countryB_vac0, susceptible_countryB_vac1, susceptible_countryB_vac2, infectious_countryA_vac0_virW, infectious_countryA_vac1_virW, infectious_countryA_vac1_virM, infectious_countryA_vac2_virW, infectious_countryB_vac0_virW, infectious_countryB_vac0_virM, infectious_countryB_vac1_virW, infectious_countryB_vac1_virM, infectious_countryB_vac2_virW, infectious_countryB_vac2_virM, recovered_countryA_vac0_virW, recovered_countryA_vac0_virM, recovered_countryA_vac1_virW, recovered_countryA_vac1_virM, recovered_countryA_vac2_virW, recovered_countryA_vac2_virM, recovered_countryB_vac0_virW, recovered_countryB_vac0_virM, recovered_countryB_vac1_virW, recovered_countryB_vac1_virM, recovered_countryB_vac2_virW, recovered_countryB_vac2_virM, dead_countryA_vac0_virW, dead_countryA_vac0_virM, dead_countryA_vac1_virW, dead_countryA_vac1_virM, dead_countryA_vac2_virW, dead_countryA_vac2_virM, dead_countryB_vac0_virW, dead_countryB_vac0_virM, dead_countryB_vac1_virW, dead_countryB_vac1_virM, dead_countryB_vac2_virW, dead_countryB_vac2_virM
  susceptible_countryB_vac0_to_infectious_countryA_vac0_virM: susceptible_countryB_vac0 + infectious_countryA_vac0_virM => infectious_countryB_vac0_virM + infectious_countryA_vac0_virM; beta*eta_virM*(1 - 0)*(1 - 0)*susceptible_countryB_vac0*infectious_countryA_vac0_virM*(susceptible_countryB_vac0 + susceptible_countryB_vac1 + susceptible_countryB_vac2 + infectious_countryB_vac0_virW + infectious_countryB_vac0_virM + infectious_countryB_vac1_virW + infectious_countryB_vac1_virM + infectious_countryB_vac2_virW + infectious_countryB_vac2_virM + recovered_countryB_vac0_virW + recovered_countryB_vac0_virM + recovered_countryB_vac1_virW + recovered_countryB_vac1_virM + recovered_countryB_vac2_virW + recovered_countryB_vac2_virM)/(susceptible_countryA_vac0 + susceptible_countryA_vac1 + susceptible_countryA_vac2 + susceptible_countryB_vac0 + susceptible_countryB_vac1 + susceptible_countryB_vac2 + infectious_countryA_vac0_virW + infectious_countryA_vac0_virM + infectious_countryA_vac1_virW + infectious_countryA_vac1_virM + infectious_countryA_vac2_virW + infectious_countryA_vac2_virM + infectious_countryB_vac0_virW + infectious_countryB_vac0_virM + infectious_countryB_vac1_virW + infectious_countryB_vac1_virM + infectious_countryB_vac2_virW + infectious_countryB_vac2_virM + recovered_countryA_vac0_virW + recovered_countryA_vac0_virM + recovered_countryA_vac1_virW + recovered_countryA_vac1_virM + recovered_countryA_vac2_virW + recovered_countryA_vac2_virM + recovered_countryB_vac0_virW + recovered_countryB_vac0_virM + recovered_countryB_vac1_virW + recovered_countryB_vac1_virM + recovered_countryB_vac2_virW + recovered_countryB_vac2_virM)*distance_countryA_countryB/(susceptible_countryB_vac0 + susceptible_countryB_vac1 + susceptible_countryB_vac2 + infectious_countryB_vac0_virW + infectious_countryB_vac0_virM + infectious_countryB_vac1_virW + infectious_countryB_vac1_virM + infectious_countryB_vac2_virW + infectious_countryB_vac2_virM + recovered_countryB_vac0_virW + recovered_countryB_vac0_virM + recovered_countryB_vac1_virW + recovered_countryB_vac1_virM + recovered_countryB_vac2_virW + recovered_countryB_vac2_virM);  // modifiers: susceptible_countryA_vac0, susceptible_countryA_vac1, susceptible_countryA_vac2, susceptible_countryB_vac1, susceptible_countryB_vac2, infectious_countryA_vac0_virW, infectious_countryA_vac1_virW, infectious_countryA_vac1_virM, infectious_countryA_vac2_virW, infectious_countryA_vac2_virM, infectious_countryB_vac0_virW, infectious_countryB_vac1_virW, infectious_countryB_vac1_virM, infectious_countryB_vac2_virW, infectious_countryB_vac2_virM, recovered_countryA_vac0_virW, recovered_countryA_vac0_virM, recovered_countryA_vac1_virW, recovered_countryA_vac1_virM, recovered_countryA_vac2_virW, recovered_countryA_vac2_virM, recovered_countryB_vac0_virW, recovered_countryB_vac0_virM, recovered_countryB_vac1_virW, recovered_countryB_vac1_virM, recovered_countryB_vac2_virW, recovered_countryB_vac2_virM, dead_countryA_vac0_virW, dead_countryA_vac0_virM, dead_countryA_vac1_virW, dead_countryA_vac1_virM, dead_countryA_vac2_virW, dead_countryA_vac2_virM, dead_countryB_vac0_virW, dead_countryB_vac0_virM, dead_countryB_vac1_virW, dead_countryB_vac1_virM, dead_countryB_vac2_virW, dead_countryB_vac2_virM
  susceptible_countryB_vac1_to_infectious_countryA_vac0_virM: susceptible_countryB_vac1 + infectious_countryA_vac0_virM => infectious_countryB_vac1_virM + infectious_countryA_vac0_virM; beta*eta_virM*(1 - delta_vac1_virM)*(1 - 0)*susceptible_countryB_vac1*infectious_countryA_vac0_virM*(susceptible_countryB_vac0 + susceptible_countryB_vac1 + susceptible_countryB_vac2 + infectious_countryB_vac0_virW + infectious_countryB_vac0_virM + infectious_countryB_vac1_virW + infectious_countryB_vac1_virM + infectious_countryB_vac2_virW + infectious_countryB_vac2_virM + recovered_countryB_vac0_virW + recovered_countryB_vac0_virM + recovered_countryB_vac1_virW + recovered_countryB_vac1_virM + recovered_countryB_vac2_virW + recovered_countryB_vac2_virM)/(susceptible_countryA_vac0 + susceptible_countryA_vac1 + susceptible_countryA_vac2 + susceptible_countryB_vac0 + susceptible_countryB_vac1 + susceptible_countryB_vac2 + infectious_countryA_vac0_virW + infectious_countryA_vac0_virM + infectious_countryA_vac1_virW + infectious_countryA_vac1_virM + infectious_countryA_vac2_virW + infectious_countryA_vac2_virM + infectious_countryB_vac0_virW + infectious_countryB_vac0_virM + infectious_countryB_vac1_virW + infectious_countryB_vac1_virM + infectious_countryB_vac2_virW + infectious_countryB_vac2_virM + recovered_countryA_vac0_virW + recovered_countryA_vac0_virM + recovered_countryA_vac1_virW + recovered_countryA_vac1_virM + recovered_countryA_vac2_virW + recovered_countryA_vac2_virM + recovered_countryB_vac0_virW + recovered_countryB_vac0_virM + recovered_countryB_vac1_virW + recovered_countryB_vac1_virM + recovered_countryB_vac2_virW + recovered_countryB_vac2_virM)*distance_countryA_countryB/(susceptible_countryB_vac0 + susceptible_countryB_vac1 + susceptible_countryB_vac2 + infectious_countryB_vac0_virW + infectious_countryB_vac0_virM + infectious_countryB_vac1_virW + infectious_countryB_vac1_virM + infectious_countryB_vac2_virW + infectious_countryB_vac2_virM + recovered_countryB_vac0_virW + recovered_countryB_vac0_virM + recovered_countryB_vac1_virW + recovered_countryB_vac1_virM + recovered_countryB_vac2_virW + recovered_countryB_vac2_virM);  // modifiers: susceptible_countryA_vac0, susceptible_countryA_vac1, susceptible_countryA_vac2, susceptible_countryB_vac0, susceptible_countryB_vac2, infectious_countryA_vac0_virW, infectious_countryA_vac1_virW, infectious_countryA_vac1_virM, infectious_countryA_vac2_virW, infectious_countryA_vac2_virM, infectious_countryB_vac0_virW, infectious_countryB_vac0_virM, infectious_countryB_vac1_virW, infectious_countryB_vac2_virW, infectious_countryB_vac2_virM, recovered_countryA_vac0_virW, recovered_countryA_vac0_virM, recovered_countryA_vac1_virW, recovered_countryA_vac1_virM, recovered_countryA_vac2_virW, recovered_countryA_vac2_virM, recovered_countryB_vac0_virW, recovered_countryB_vac0_virM, recovered_countryB_vac1_virW, recovered_countryB_vac1_virM, recovered_countryB_vac2_virW, recovered_countryB_vac2_virM, dead_countryA_vac0_virW, dead_countryA_vac0_virM, dead_countryA_vac1_virW, dead_countryA_vac1_virM, dead_countryA_vac2_virW, dead_countryA_vac2_virM, dead_countryB_vac0_virW, dead_countryB_vac0_virM, dead_countryB_vac1_virW, dead_countryB_vac1_virM, dead_countryB_vac2_virW, dead_countryB_vac2_virM
  susceptible_countryB_vac2_to_infectious_countryA_vac0_virM: susceptible_countryB_vac2 + infectious_countryA_vac0_virM => infectious_countryB_vac2_virM + infectious_countryA_vac0_virM; beta*eta_virM*(1 - delta_vac2_virM)*(1 - 0)*susceptible_countryB_vac2*infectious_countryA_vac0_virM*(susceptible_countryB_vac0 + susceptible_countryB_vac1 + susceptible_countryB_vac2 + infectious_countryB_vac0_virW + infectious_countryB_vac0_virM + infectious_countryB_vac1_virW + infectious_countryB_vac1_virM + infectious_countryB_vac2_virW + infectious_countryB_vac2_virM + recovered_countryB_vac0_virW + recovered_countryB_vac0_virM + recovered_countryB_vac1_virW + recovered_countryB_vac1_virM + recovered_countryB_vac2_virW + recovered_countryB_vac2_virM)/(susceptible_countryA_vac0 + susceptible_countryA_vac1 + susceptible_countryA_vac2 + susceptible_countryB_vac0 + susceptible_countryB_vac1 + susceptible_countryB_vac2 + infectious_countryA_vac0_virW + infectious_countryA_vac0_virM + infectious_countryA_vac1_virW + infectious_countryA_vac1_virM + infectious_countryA_vac2_virW + infectious_countryA_vac2_virM + infectious_countryB_vac0_virW + infectious_countryB_vac0_virM + infectious_countryB_vac1_virW + infectious_countryB_vac1_virM + infectious_countryB_vac2_virW + infectious_countryB_vac2_virM + recovered_countryA_vac0_virW + recovered_countryA_vac0_virM + recovered_countryA_vac1_virW + recovered_countryA_vac1_virM + recovered_countryA_vac2_virW + recovered_countryA_vac2_virM + recovered_countryB_vac0_virW + recovered_countryB_vac0_virM + recovered_countryB_vac1_virW + recovered_countryB_vac1_virM + recovered_countryB_vac2_virW + recovered_countryB_vac2_virM)*distance_countryA_countryB/(susceptible_countryB_vac0 + susceptible_countryB_vac1 + susceptible_countryB_vac2 + infectious_countryB_vac0_virW + infectious_countryB_vac0_virM + infectious_countryB_vac1_virW + infectious_countryB_vac1_virM + infectious_countryB_vac2_virW + infectious_countryB_vac2_virM + recovered_countryB_vac0_virW + recovered_countryB_vac0_virM + recovered_countryB_vac1_virW + recovered_countryB_vac1_virM + recovered_countryB_vac2_virW + recovered_countryB_vac2_virM);  // modifiers: susceptible_countryA_vac0, susceptible_countryA_vac1, susceptible_countryA_vac2, susceptible_countryB_vac0, susceptible_countryB_vac1, infectious_countryA_vac0_virW, infectious_countryA_vac1_virW, infectious_countryA_vac1_virM, infectious_countryA_vac2_virW, infectious_countryA_vac2_virM, infectious_countryB_vac0_virW, infectious_countryB_vac0_virM, infectious_countryB_vac1_virW, infectious_countryB_vac1_virM, infectious_countryB_vac2_virW, recovered_countryA_vac0_virW, recovered_countryA_vac0_virM, recovered_countryA_vac1_virW, recovered_countryA_vac1_virM, recovered_countryA_vac2_virW, recovered_countryA_vac2_virM, recovered_countryB_vac0_virW, recovered_countryB_vac0_virM, recovered_countryB_vac1_virW, recovered_countryB_vac1_virM, recovered_countryB_vac2_virW, recovered_countryB_vac2_virM, dead_countryA_vac0_virW, dead_countryA_vac0_virM, dead_countryA_vac1_virW, dead_countryA_vac1_virM, dead_countryA_vac2_virW, dead_countryA_vac2_virM, dead_countryB_vac0_virW, dead_countryB_vac0_virM, dead_countryB_vac1_virW, dead_countryB_vac1_virM, dead_countryB_vac2_virW, dead_countryB_vac2_virM
  susceptible_countryA_vac0_to_infectious_countryA_vac1_virW: susceptible_countryA_vac0 + infectious_countryA_vac1_virW => infectious_countryA_vac0_virW + infectious_countryA_vac1_virW; beta*eta_virW*(1 - 0)*(1 - gamma)*susceptible_countryA_vac0*infectious_countryA_vac1_virW*(1 - (susceptible_countryB_vac0 + susceptible_countryB_vac1 + susceptible_countryB_vac2 + infectious_countryB_vac0_virW + infectious_countryB_vac0_virM + infectious_countryB_vac1_virW + infectious_countryB_vac1_virM + infectious_countryB_vac2_virW + infectious_countryB_vac2_virM + recovered_countryB_vac0_virW + recovered_countryB_vac0_virM + recovered_countryB_vac1_virW + recovered_countryB_vac1_virM + recovered_countryB_vac2_virW + recovered_countryB_vac2_virM)/(susceptible_countryA_vac0 + susceptible_countryA_vac1 + susceptible_countryA_vac2 + susceptible_countryB_vac0 + susceptible_countryB_vac1 + susceptible_countryB_vac2 + infectious_countryA_vac0_virW + infectious_countryA_vac0_virM + infectious_countryA_vac1_virW + infectious_countryA_vac1_virM + infectious_countryA_vac2_virW + infectious_countryA_vac2_virM + infectious_countryB_vac0_virW + infectious_countryB_vac0_virM + infectious_countryB_vac1_virW + infectious_countryB_vac1_virM + infectious_countryB_vac2_virW + infectious_countryB_vac2_virM + recovered_countryA_vac0_virW + recovered_countryA_vac0_virM + recovered_countryA_vac1_virW + recovered_countryA_vac1_virM + recovered_countryA_vac2_virW + recovered_countryA_vac2_virM + recovered_countryB_vac0_virW + recovered_countryB_vac0_virM + recovered_countryB_vac1_virW + recovered_countryB_vac1_virM + recovered_countryB_vac2_virW + recovered_countryB_vac2_virM)*distance_countryA_countryB)/(susceptible_countryA_vac0 + susceptible_countryA_vac1 + susceptible_countryA_vac2 + infectious_countryA_vac0_virW + infectious_countryA_vac0_virM + infectious_countryA_vac1_virW + infectious_countryA_vac1_virM + infectious_countryA_vac2_virW + infectious_countryA_vac2_virM + recovered_countryA_vac0_virW + recovered_countryA_vac0_virM + recovered_countryA_vac1_virW + recovered_countryA_vac1_virM + recovered_countryA_vac2_virW + recovered_countryA_vac2_virM);  // modifiers: susceptible_countryA_vac1, susceptible_countryA_vac2, susceptible_countryB_vac0, susceptible_countryB_vac1, susceptible_countryB_vac2, infectious_countryA_vac0_virM, infectious_countryA_vac1_virM, infectious_countryA_vac2_virW, infectious_countryA_vac2_virM, infectious_countryB_vac0_virW, infectious_countryB_vac0_virM, infectious_countryB_vac1_virW, infectious_countryB_vac1_virM, infectious_countryB_vac2_virW, infectious_countryB_vac2_virM, recovered_countryA_vac0_virW, recovered_countryA_vac0_virM, recovered_countryA_vac1_virW, recovered_countryA_vac1_virM, recovered_countryA_vac2_virW, recovered_countryA_vac2_virM, recovered_countryB_vac0_virW, recovered_countryB_vac0_virM, recovered_countryB_vac1_virW, recovered_countryB_vac1_virM, recovered_countryB_vac2_virW, recovered_countryB_vac2_virM, dead_countryA_vac0_virW, dead_countryA_vac0_virM, dead_countryA_vac1_virW, dead_countryA_vac1_virM, dead_countryA_vac2_virW, dead_countryA_vac2_virM, dead_countryB_vac0_virW, dead_countryB_vac0_virM, dead_countryB_vac1_virW, dead_countryB_vac1_virM, dead_countryB_vac2_virW, dead_countryB_vac2_virM
  susceptible_countryA_vac1_to_infectious_countryA_vac1_virW: susceptible_countryA_vac1 + infectious_countryA_vac1_virW => 2 infectious_countryA_vac1_virW; beta*eta_virW*(1 - delta_vac1_virW)*(1 - gamma)*susceptible_countryA_vac1*infectious_countryA_vac1_virW*(1 - (susceptible_countryB_vac0 + susceptible_countryB_vac1 + susceptible_countryB_vac2 + infectious_countryB_vac0_virW + infectious_countryB_vac0_virM + infectious_countryB_vac1_virW + infectious_countryB_vac1_virM + infectious_countryB_vac2_virW + infectious_countryB_vac2_virM + recovered_countryB_vac0_virW + recovered_countryB_vac0_virM + recovered_countryB_vac1_virW + recovered_countryB_vac1_virM + recovered_countryB_vac2_virW + recovered_countryB_vac2_virM)/(susceptible_countryA_vac0 + susceptible_countryA_vac1 + susceptible_countryA_vac2 + susceptible_countryB_vac0 + susceptible_countryB_vac1 + susceptible_countryB_vac2 + infectious_countryA_vac0_virW + infectious_countryA_vac0_virM + infectious_countryA_vac1_virW + infectious_countryA_vac1_virM + infectious_countryA_vac2_virW + infectious_countryA_vac2_virM + infectious_countryB_vac0_virW + infectious_countryB_vac0_virM + infectious_countryB_vac1_virW + infectious_countryB_vac1_virM + infectious_countryB_vac2_virW + infectious_countryB_vac2_virM + recovered_countryA_vac0_virW + recovered_countryA_vac0_virM + recovered_countryA_vac1_virW + recovered_countryA_vac1_virM + recovered_countryA_vac2_virW + recovered_countryA_vac2_virM + recovered_countryB_vac0_virW + recovered_countryB_vac0_virM + recovered_countryB_vac1_virW + recovered_countryB_vac1_virM + recovered_countryB_vac2_virW + recovered_countryB_vac2_virM)*distance_countryA_countryB)/(susceptible_countryA_vac0 + susceptible_countryA_vac1 + susceptible_countryA_vac2 + infectious_countryA_vac0_virW + infectious_countryA_vac0_virM + infectious_countryA_vac1_virW + infectious_countryA_vac1_virM + infectious_countryA_vac2_virW + infectious_countryA_vac2_virM + recovered_countryA_vac0_virW + recovered_countryA_vac0_virM + recovered_countryA_vac1_virW + recovered_countryA_vac1_virM + recovered_countryA_vac2_virW + recovered_countryA_vac2_virM);  // modifiers: susceptible_countryA_vac0, susceptible_countryA_vac2, susceptible_countryB_vac0, susceptible_countryB_vac1, susceptible_countryB_vac2, infectious_countryA_vac0_virW, infectious_countryA_vac0_virM, infectious_countryA_vac1_virM, infectious_countryA_vac2_virW, infectious_countryA_vac2_virM, infectious_countryB_vac0_virW, infectious_countryB_vac0_virM, infectious_countryB_vac1_virW, infectious_countryB_vac1_virM, infectious_countryB_vac2_virW, infectious_countryB_vac2_virM, recovered_countryA_vac0_virW, recovered_countryA_vac0_virM, recovered_countryA_vac1_virW, recovered_countryA_vac1_virM, recovered_countryA_vac2_virW, recovered_countryA_vac2_virM, recovered_countryB_vac0_virW, recovered_countryB_vac0_virM, recovered_countryB_vac1_virW, recovered_countryB_vac1_virM, recovered_countryB_vac2_virW, recovered_countryB_vac2_virM, dead_countryA_vac0_virW, dead_countryA_vac0_virM, dead_countryA_vac1_virW, dead_countryA_vac1_virM, dead_countryA_vac2_virW, dead_countryA_vac2_virM, dead_countryB_vac0_virW, dead_countryB_vac0_virM, dead_countryB_vac1_virW, dead_countryB_vac1_virM, dead_countryB_vac2_virW, dead_countryB_vac2_virM
  susceptible_countryA_vac2_to_infectious_countryA_vac1_virW: susceptible_countryA_vac2 + infectious_countryA_vac1_virW => infectious_countryA_vac2_virW + infectious_countryA_vac1_virW; beta*eta_virW*(1 - delta_vac2_virW)*(1 - gamma)*susceptible_countryA_vac2*infectious_countryA_vac1_virW*(1 - (susceptible_countryB_vac0 + susceptible_countryB_vac1 + susceptible_countryB_vac2 + infectious_countryB_vac0_virW + infectious_countryB_vac0_virM + infectious_countryB_vac1_virW + infectious_countryB_vac1_virM + infectious_countryB_vac2_virW + infectious_countryB_vac2_virM + recovered_countryB_vac0_virW + recovered_countryB_vac0_virM + recovered_countryB_vac1_virW + recovered_countryB_vac1_virM + recovered_countryB_vac2_virW + recovered_countryB_vac2_virM)/(susceptible_countryA_vac0 + susceptible_countryA_vac1 + susceptible_countryA_vac2 + susceptible_countryB_vac0 + susceptible_countryB_vac1 + susceptible_countryB_vac2 + infectious_countryA_vac0_virW + infectious_countryA_vac0_virM + infectious_countryA_vac1_virW + infectious_countryA_vac1_virM + infectious_countryA_vac2_virW + infectious_countryA_vac2_virM + infectious_countryB_vac0_virW + infectious_countryB_vac0_virM + infectious_countryB_vac1_virW + infectious_countryB_vac1_virM + infectious_countryB_vac2_virW + infectious_countryB_vac2_virM + recovered_countryA_vac0_virW + recovered_countryA_vac0_virM + recovered_countryA_vac1_virW + recovered_countryA_vac1_virM + recovered_countryA_vac2_virW + recovered_countryA_vac2_virM + recovered_countryB_vac0_virW + recovered_countryB_vac0_virM + recovered_countryB_vac1_virW + recovered_countryB_vac1_virM + recovered_countryB_vac2_virW + recovered_countryB_vac2_virM)*distance_countryA_countryB)/(susceptible_countryA_vac0 + susceptible_countryA_vac1 + susceptible_countryA_vac2 + infectious_countryA_vac0_virW + infectious_countryA_vac0_virM + infectious_countryA_vac1_virW + infectious_countryA_vac1_virM + infectious_countryA_vac2_virW + infectious_countryA_vac2_virM + recovered_countryA_vac0_virW + recovered_countryA_vac0_virM + recovered_countryA_vac1_virW + recovered_countryA_vac1_virM + recovered_countryA_vac2_virW + recovered_countryA_vac2_virM);  // modifiers: susceptible_countryA_vac0, susceptible_countryA_vac1, susceptible_countryB_vac0, susceptible_countryB_vac1, susceptible_countryB_vac2, infectious_countryA_vac0_virW, infectious_countryA_vac0_virM, infectious_countryA_vac1_virM, infectious_countryA_vac2_virM, infectious_countryB_vac0_virW, infectious_countryB_vac0_virM, infectious_countryB_vac1_virW, infectious_countryB_vac1_virM, infectious_countryB_vac2_virW, infectious_countryB_vac2_virM, recovered_countryA_vac0_virW, recovered_countryA_vac0_virM, recovered_countryA_vac1_virW, recovered_countryA_vac1_virM, recovered_countryA_vac2_virW, recovered_countryA_vac2_virM, recovered_countryB_vac0_virW, recovered_countryB_vac0_virM, recovered_countryB_vac1_virW, recovered_countryB_vac1_virM, recovered_countryB_vac2_virW, recovered_countryB_vac2_virM, dead_countryA_vac0_virW, dead_countryA_vac0_virM, dead_countryA_vac1_virW, dead_countryA_vac1_virM, dead_countryA_vac2_virW, dead_countryA_vac2_virM, dead_countryB_vac0_virW, dead_countryB_vac0_virM, dead_countryB_vac1_virW, dead_countryB_vac1_virM, dead_countryB_vac2_virW, dead_countryB_vac2_virM
  susceptible_countryB_vac0_to_infectious_countryA_vac1_virW: susceptible_countryB_vac0 + infectious_countryA_vac1_virW => infectious_countryB_vac0_virW + infectious_countryA_vac1_virW; beta*eta_virW*(1 - 0)*(1 - gamma)*susceptible_countryB_vac0*infectious_countryA_vac1_virW*(susceptible_countryB_vac0 + susceptible_countryB_vac1 + susceptible_countryB_vac2 + infectious_countryB_vac0_virW + infectious_countryB_vac0_virM + infectious_countryB_vac1_virW + infectious_countryB_vac1_virM + infectious_countryB_vac2_virW + infectious_countryB_vac2_virM + recovered_countryB_vac0_virW + recovered_countryB_vac0_virM + recovered_countryB_vac1_virW + recovered_countryB_vac1_virM + recovered_countryB_vac2_virW + recovered_countryB_vac2_virM)/(susceptible_countryA_vac0 + susceptible_countryA_vac1 + susceptible_countryA_vac2 + susceptible_countryB_vac0 + susceptible_countryB_vac1 + susceptible_countryB_vac2 + infectious_countryA_vac0_virW + infectious_countryA_vac0_virM + infectious_countryA_vac1_virW + infectious_countryA_vac1_virM + infectious_countryA_vac2_virW + infectious_countryA_vac2_virM + infectious_countryB_vac0_virW + infectious_countryB_vac0_virM + infectious_countryB_vac1_virW + infectious_countryB_vac1_virM + infectious_countryB_vac2_virW + infectious_countryB_vac2_virM + recovered_countryA_vac0_virW + recovered_countryA_vac0_virM + recovered_countryA_vac1_virW + recovered_countryA_vac1_virM + recovered_countryA_vac2_virW + recovered_countryA_vac2_virM + recovered_countryB_vac0_virW + recovered_countryB_vac0_virM + recovered_countryB_vac1_virW + recovered_countryB_vac1_virM + recovered_countryB_vac2_virW + recovered_countryB_vac2_virM)*distance_countryA_countryB/(susceptible_countryB_vac0 + susceptible_countryB_vac1 + susceptible_countryB_vac2 + infectious_countryB_vac0_virW + infectious_countryB_vac0_virM + infectious_countryB_vac1_virW + infectious_countryB_vac1_virM + infectious_countryB_vac2_virW + infectious_countryB_vac2_virM + recovered_countryB_vac0_virW + recovered_countryB_vac0_virM + recovered_countryB_vac1_virW + recovered_countryB_vac1_virM + recovered_countryB_vac2_virW + recovered_countryB_vac2_virM);  // modifiers: susceptible_countryA_vac0, susceptible_countryA_vac1, susceptible_countryA_vac2, susceptible_countryB_vac1, susceptible_countryB_vac2, infectious_countryA_vac0_virW, infectious_countryA_vac0_virM, infectious_countryA_vac1_virM, infectious_countryA_vac2_virW, infectious_countryA_vac2_virM, infectious_countryB_vac0_virM, infectious_countryB_vac1_virW, infectious_countryB_vac1_virM, infectious_countryB_vac2_virW, infectious_countryB_vac2_virM, recovered_countryA_vac0_virW, recovered_countryA_vac0_virM, recovered_countryA_vac1_virW, recovered_countryA_vac1_virM, recovered_countryA_vac2_virW, recovered_countryA_vac2_virM, recovered_countryB_vac0_virW, recovered_countryB_vac0_virM, recovered_countryB_vac1_virW, recovered_countryB_vac1_virM, recovered_countryB_vac2_virW, recovered_countryB_vac2_virM, dead_countryA_vac0_virW, dead_countryA_vac0_virM, dead_countryA_vac1_virW, dead_countryA_vac1_virM, dead_countryA_vac2_virW, dead_countryA_vac2_virM, dead_countryB_vac0_virW, dead_countryB_vac0_virM, dead_countryB_vac1_virW, dead_countryB_vac1_virM, dead_countryB_vac2_virW, dead_countryB_vac2_virM
  susceptible_countryB_vac1_to_infectious_countryA_vac1_virW: susceptible_countryB_vac1 + infectious_countryA_vac1_virW => infectious_countryB_vac1_virW + infectious_countryA_vac1_virW; beta*eta_virW*(1 - delta_vac1_virW)*(1 - gamma)*susceptible_countryB_vac1*infectious_countryA_vac1_virW*(susceptible_countryB_vac0 + susceptible_countryB_vac1 + susceptible_countryB_vac2 + infectious_countryB_vac0_virW + infectious_countryB_vac0_virM + infectious_countryB_vac1_virW + infectious_countryB_vac1_virM + infectious_countryB_vac2_virW + infectious_countryB_vac2_virM + recovered_countryB_vac0_virW + recovered_countryB_vac0_virM + recovered_countryB_vac1_virW + recovered_countryB_vac1_virM + recovered_countryB_vac2_virW + recovered_countryB_vac2_virM)/(susceptible_countryA_vac0 + susceptible_countryA_vac1 + susceptible_countryA_vac2 + susceptible_countryB_vac0 + susceptible_countryB_vac1 + susceptible_countryB_vac2 + infectious_countryA_vac0_virW + infectious_countryA_vac0_virM + infectious_countryA_vac1_virW + infectious_countryA_vac1_virM + infectious_countryA_vac2_virW + infectious_countryA_vac2_virM + infectious_countryB_vac0_virW + infectious_countryB_vac0_virM + infectious_countryB_vac1_virW + infectious_countryB_vac1_virM + infectious_countryB_vac2_virW + infectious_countryB_vac2_virM + recovered_countryA_vac0_virW + recovered_countryA_vac0_virM + recovered_countryA_vac1_virW + recovered_countryA_vac1_virM + recovered_countryA_vac2_virW + recovered_countryA_vac2_virM + recovered_countryB_vac0_virW + recovered_countryB_vac0_virM + recovered_countryB_vac1_virW + recovered_countryB_vac1_virM + recovered_countryB_vac2_virW + recovered_countryB_vac2_virM)*distance_countryA_countryB/(susceptible_countryB_vac0 + susceptible_countryB_vac1 + susceptible_countryB_vac2 + infectious_countryB_vac0_virW + infectious_countryB_vac0_virM + infectious_countryB_vac1_virW + infectious_countryB_vac1_virM + infectious_countryB_vac2_virW + infectious_countryB_vac2_virM + recovered_countryB_vac0_virW + recovered_countryB_vac0_virM + recovered_countryB_vac1_virW + recovered_countryB_vac1_virM + recovered_countryB_vac2_virW + recovered_countryB_vac2_virM);  // modifiers: susceptible_countryA_vac0, susceptible_countryA_vac1, susceptible_countryA_vac2, susceptible_countryB_vac0, susceptible_countryB_vac2, infectious_countryA_vac0_virW, infectious_countryA_vac0_virM, infectious_countryA_vac1_virM, infectious_countryA_vac2_virW, infectious_countryA_vac2_virM, infectious_countryB_vac0_virW, infectious_countryB_vac0_virM, infectious_countryB_vac1_virM, infectious_countryB_vac2_virW, infectious_countryB_vac2_virM, recovered_countryA_vac0_virW, recovered_countryA_vac0_virM, recovered_countryA_vac1_virW, recovered_countryA_vac1_virM, recovered_countryA_vac2_virW, recovered_countryA_vac2_virM, recovered_countryB_vac0_virW, recovered_countryB_vac0_virM, recovered_countryB_vac1_virW, recovered_countryB_vac1_virM, recovered_countryB_vac2_virW, recovered_countryB_vac2_virM, dead_countryA_vac0_virW, dead_countryA_vac0_virM, dead_countryA_vac1_virW, dead_countryA_vac1_virM, dead_countryA_vac2_virW, dead_countryA_vac2_virM, dead_countryB_vac0_virW, dead_countryB_vac0_virM, dead_countryB_vac1_virW, dead_countryB_vac1_virM, dead_countryB_vac2_virW, dead_countryB_vac2_virM
  susceptible_countryB_vac2_to_infectious_countryA_vac1_virW: susceptible_countryB_vac2 + infectious_countryA_vac1_virW => infectious_countryB_vac2_virW + infectious_countryA_vac1_virW; beta*eta_virW*(1 - delta_vac2_virW)*(1 - gamma)*susceptible_countryB_vac2*infectious_countryA_vac1_virW*(susceptible_countryB_vac0 + susceptible_countryB_vac1 + susceptible_countryB_vac2 + infectious_countryB_vac0_virW + infectious_countryB_vac0_virM + infectious_countryB_vac1_virW + infectious_countryB_vac1_virM + infectious_countryB_vac2_virW + infectious_countryB_vac2_virM + recovered_countryB_vac0_virW + recovered_countryB_vac0_virM + recovered_countryB_vac1_virW + recovered_countryB_vac1_virM + recovered_countryB_vac2_virW + recovered_countryB_vac2_virM)/(susceptible_countryA_vac0 + susceptible_countryA_vac1 + susceptible_countryA_vac2 + susceptible_countryB_vac0 + susceptible_countryB_vac1 + susceptible_countryB_vac2 + infectious_countryA_vac0_virW + infectious_countryA_vac0_virM + infectious_countryA_vac1_virW + infectious_countryA_vac1_virM + infectious_countryA_vac2_virW + infectious_countryA_vac2_virM + infectious_countryB_vac0_virW + infectious_countryB_vac0_virM + infectious_countryB_vac1_virW + infectious_countryB_vac1_virM + infectious_countryB_vac2_virW + infectious_countryB_vac2_virM + recovered_countryA_vac0_virW + recovered_countryA_vac0_virM + recovered_countryA_vac1_virW + recovered_countryA_vac1_virM + recovered_countryA_vac2_virW + recovered_countryA_vac2_virM + recovered_countryB_vac0_virW + recovered_countryB_vac0_virM + recovered_countryB_vac1_virW + recovered_countryB_vac1_virM + recovered_countryB_vac2_virW + recovered_countryB_vac2_virM)*distance_countryA_countryB/(susceptible_countryB_vac0 + susceptible_countryB_vac1 + susceptible_countryB_vac2 + infectious_countryB_vac0_virW + infectious_countryB_vac0_virM + infectious_countryB_vac1_virW + infectious_countryB_vac1_virM + infectious_countryB_vac2_virW + infectious_countryB_vac2_virM + recovered_countryB_vac0_virW + recovered_countryB_vac0_virM + recovered_countryB_vac1_virW + recovered_countryB_vac1_virM + recovered_countryB_vac2_virW + recovered_countryB_vac2_virM);  // modifiers: susceptible_countryA_vac0, susceptible_countryA_vac1, susceptible_countryA_vac2, susceptible_countryB_vac0, susceptible_countryB_vac1, infectious_countryA_vac0_virW, infectious_countryA_vac0_virM, infectious_countryA_vac1_virM, infectious_countryA_vac2_virW, infectious_countryA_vac2_virM, infectious_countryB_vac0_virW, infectious_countryB_vac0_virM, infectious_countryB_vac1_virW, infectious_countryB_vac1_virM, infectious_countryB_vac2_virM, recovered_countryA_vac0_virW, recovered_countryA_vac0_virM, recovered_countryA_vac1_virW, recovered_countryA_vac1_virM, recovered_countryA_vac2_virW, recovered_countryA_vac2_virM, recovered_countryB_vac0_virW, recovered_countryB_vac0_virM, recovered_countryB_vac1_virW, recovered_countryB_vac1_virM, recovered_countryB_vac2_virW, recovered_countryB_vac2_virM, dead_countryA_vac0_virW, dead_countryA_vac0_virM, dead_countryA_vac1_virW, dead_countryA_vac1_virM, dead_countryA_vac2_virW, dead_countryA_vac2_virM, dead_countryB_vac0_virW, dead_countryB_vac0_virM, dead_countryB_vac1_virW, dead_countryB_vac1_virM, dead_countryB_vac2_virW, dead_countryB_vac2_virM
  susceptible_countryA_vac0_to_infectious_countryA_vac1_virM: susceptible_countryA_vac0 + infectious_countryA_vac1_virM => infectious_countryA_vac0_virM + infectious_countryA_vac1_virM; beta*eta_virM*(1 - 0)*(1 - gamma)*susceptible_countryA_vac0*infectious_countryA_vac1_virM*(1 - (susceptible_countryB_vac0 + susceptible_countryB_vac1 + susceptible_countryB_vac2 + infectious_countryB_vac0_virW + infectious_countryB_vac0_virM + infectious_countryB_vac1_virW + infectious_countryB_vac1_virM + infectious_countryB_vac2_virW + infectious_countryB_vac2_virM + recovered_countryB_vac0_virW + recovered_countryB_vac0_virM + recovered_countryB_vac1_virW + recovered_countryB_vac1_virM + recovered_countryB_vac2_virW + recovered_countryB_vac2_virM)/(susceptible_countryA_vac0 + susceptible_countryA_vac1 + susceptible_countryA_vac2 + susceptible_countryB_vac0 + susceptible_countryB_vac1 + susceptible_countryB_vac2 + infectious_countryA_vac0_virW + infectious_countryA_vac0_virM + infectious_countryA_vac1_virW + infectious_countryA_vac1_virM + infectious_countryA_vac2_virW + infectious_countryA_vac2_virM + infectious_countryB_vac0_virW + infectious_countryB_vac0_virM + infectious_countryB_vac1_virW + infectious_countryB_vac1_virM + infectious_countryB_vac2_virW + infectious_countryB_vac2_virM + recovered_countryA_vac0_virW + recovered_countryA_vac0_virM + recovered_countryA_vac1_virW + recovered_countryA_vac1_virM + recovered_countryA_vac2_virW + recovered_countryA_vac2_virM + recovered_countryB_vac0_virW + recovered_countryB_vac0_virM + recovered_countryB_vac1_virW + recovered_countryB_vac1_virM + recovered_countryB_vac2_virW + recovered_countryB_vac2_virM)*distance_countryA_countryB)/(susceptible_countryA_vac0 + susceptible_countryA_vac1 + susceptible_countryA_vac2 + infectious_countryA_vac0_virW + infectious_countryA_vac0_virM + infectious_countryA_vac1_virW + infectious_countryA_vac1_virM + infectious_countryA_vac2_virW + infectious_countryA_vac2_virM + recovered_countryA_vac0_virW + recovered_countryA_vac0_virM + recovered_countryA_vac1_virW + recovered_countryA_vac1_virM + recovered_countryA_vac2_virW + recovered_countryA_vac2_virM);  // modifiers: susceptible_countryA_vac1, susceptible_countryA_vac2, susceptible_countryB_vac0, susceptible_countryB_vac1, susceptible_countryB_vac2, infectious_countryA_vac0_virW, infectious_countryA_vac1_virW, infectious_countryA_vac2_virW, infectious_countryA_vac2_virM, infectious_countryB_vac0_virW, infectious_countryB_vac0_virM, infectious_countryB_vac1_virW, infectious_countryB_vac1_virM, infectious_countryB_vac2_virW, infectious_countryB_vac2_virM, recovered_countryA_vac0_virW, recovered_countryA_vac0_virM, recovered_countryA_vac1_virW, recovered_countryA_vac1_virM, recovered_countryA_vac2_virW, recovered_countryA_vac2_virM, recovered_countryB_vac0_virW, recovered_countryB_vac0_virM, recovered_countryB_vac1_virW, recovered_countryB_vac1_virM, recovered_countryB_vac2_virW, recovered_countryB_vac2_virM, dead_countryA_vac0_virW, dead_countryA_vac0_virM, dead_countryA_vac1_virW, dead_countryA_vac1_virM, dead_countryA_vac2_virW, dead_countryA_vac2_virM, dead_countryB_vac0_virW, dead_countryB_vac0_virM, dead_countryB_vac1_virW, dead_countryB_vac1_virM, dead_countryB_vac2_virW, dead_countryB_vac2_virM
  susceptible_countryA_vac1_to_infectious_countryA_vac1_virM: susceptible_countryA_vac1 + infectious_countryA_vac1_virM => 2 infectious_countryA_vac1_virM; beta*eta_virM*(1 - delta_vac1_virM)*(1 - gamma)*susceptible_countryA_vac1*infectious_countryA_vac1_virM*(1 - (susceptible_countryB_vac0 + susceptible_countryB_vac1 + susceptible_countryB_vac2 + infectious_countryB_vac0_virW + infectious_countryB_vac0_virM + infectious_countryB_vac1_virW + infectious_countryB_vac1_virM + infectious_countryB_vac2_virW + infectious_countryB_vac2_virM + recovered_countryB_vac0_virW + recovered_countryB_vac0_virM + recovered_countryB_vac1_virW + recovered_countryB_vac1_virM + recovered_countryB_vac2_virW + recovered_countryB_vac2_virM)/(susceptible_countryA_vac0 + susceptible_countryA_vac1 + susceptible_countryA_vac2 + susceptible_countryB_vac0 + susceptible_countryB_vac1 + susceptible_countryB_vac2 + infectious_countryA_vac0_virW + infectious_countryA_vac0_virM + infectious_countryA_vac1_virW + infectious_countryA_vac1_virM + infectious_countryA_vac2_virW + infectious_countryA_vac2_virM + infectious_countryB_vac0_virW + infectious_countryB_vac0_virM + infectious_countryB_vac1_virW + infectious_countryB_vac1_virM + infectious_countryB_vac2_virW + infectious_countryB_vac2_virM + recovered_countryA_vac0_virW + recovered_countryA_vac0_virM + recovered_countryA_vac1_virW + recovered_countryA_vac1_virM + recovered_countryA_vac2_virW + recovered_countryA_vac2_virM + recovered_countryB_vac0_virW + recovered_countryB_vac0_virM + recovered_countryB_vac1_virW + recovered_countryB_vac1_virM + recovered_countryB_vac2_virW + recovered_countryB_vac2_virM)*distance_countryA_countryB)/(susceptible_countryA_vac0 + susceptible_countryA_vac1 + susceptible_countryA_vac2 + infectious_countryA_vac0_virW + infectious_countryA_vac0_virM + infectious_countryA_vac1_virW + infectious_countryA_vac1_virM + infectious_countryA_vac2_virW + infectious_countryA_vac2_virM + recovered_countryA_vac0_virW + recovered_countryA_vac0_virM + recovered_countryA_vac1_virW + recovered_countryA_vac1_virM + recovered_countryA_vac2_virW + recovered_countryA_vac2_virM);  // modifiers: susceptible_countryA_vac0, susceptible_countryA_vac2, susceptible_countryB_vac0, susceptible_countryB_vac1, susceptible_countryB_vac2, infectious_countryA_vac0_virW, infectious_countryA_vac0_virM, infectious_countryA_vac1_virW, infectious_countryA_vac2_virW, infectious_countryA_vac2_virM, infectious_countryB_vac0_virW, infectious_countryB_vac0_virM, infectious_countryB_vac1_virW, infectious_countryB_vac1_virM, infectious_countryB_vac2_virW, infectious_countryB_vac2_virM, recovered_countryA_vac0_virW, recovered_countryA_vac0_virM, recovered_countryA_vac1_virW, recovered_countryA_vac1_virM, recovered_countryA_vac2_virW, recovered_countryA_vac2_virM, recovered_countryB_vac0_virW, recovered_countryB_vac0_virM, recovered_countryB_vac1_virW, recovered_countryB_vac1_virM, recovered_countryB_vac2_virW, recovered_countryB_vac2_virM, dead_countryA_vac0_virW, dead_countryA_vac0_virM, dead_countryA_vac1_virW, dead_countryA_vac1_virM, dead_countryA_vac2_virW, dead_countryA_vac2_virM, dead_countryB_vac0_virW, dead_countryB_vac0_virM, dead_countryB_vac1_virW, dead_countryB_vac1_virM, dead_countryB_vac2_virW, dead_countryB_vac2_virM
  susceptible_countryA_vac2_to_infectious_countryA_vac1_virM: susceptible_countryA_vac2 + infectious_countryA_vac1_virM => infectious_countryA_vac2_virM + infectious_countryA_vac1_virM; beta*eta_virM*(1 - delta_vac2_virM)*(1 - gamma)*susceptible_countryA_vac2*infectious_countryA_vac1_virM*(1 - (susceptible_countryB_vac0 + susceptible_countryB_vac1 + susceptible_countryB_vac2 + infectious_countryB_vac0_virW + infectious_countryB_vac0_virM + infectious_countryB_vac1_virW + infectious_countryB_vac1_virM + infectious_countryB_vac2_virW + infectious_countryB_vac2_virM + recovered_countryB_vac0_virW + recovered_countryB_vac0_virM + recovered_countryB_vac1_virW + recovered_countryB_vac1_virM + recovered_countryB_vac2_virW + recovered_countryB_vac2_virM)/(susceptible_countryA_vac0 + susceptible_countryA_vac1 + susceptible_countryA_vac2 + susceptible_countryB_vac0 + susceptible_countryB_vac1 + susceptible_countryB_vac2 + infectious_countryA_vac0_virW + infectious_countryA_vac0_virM + infectious_countryA_vac1_virW + infectious_countryA_vac1_virM + infectious_countryA_vac2_virW + infectious_countryA_vac2_virM + infectious_countryB_vac0_virW + infectious_countryB_vac0_virM + infectious_countryB_vac1_virW + infectious_countryB_vac1_virM + infectious_countryB_vac2_virW + infectious_countryB_vac2_virM + recovered_countryA_vac0_virW + recovered_countryA_vac0_virM + recovered_countryA_vac1_virW + recovered_countryA_vac1_virM + recovered_countryA_vac2_virW + recovered_countryA_vac2_virM + recovered_countryB_vac0_virW + recovered_countryB_vac0_virM + recovered_countryB_vac1_virW + recovered_countryB_vac1_virM + recovered_countryB_vac2_virW + recovered_countryB_vac2_virM)*distance_countryA_countryB)/(susceptible_countryA_vac0 + susceptible_countryA_vac1 + susceptible_countryA_vac2 + infectious_countryA_vac0_virW + infectious_countryA_vac0_virM + infectious_countryA_vac1_virW + infectious_countryA_vac1_virM + infectious_countryA_vac2_virW + infectious_countryA_vac2_virM + recovered_countryA_vac0_virW + recovered_countryA_vac0_virM + recovered_countryA_vac1_virW + recovered_countryA_vac1_virM + recovered_countryA_vac2_virW + recovered_countryA_vac2_virM);  // modifiers: susceptible_countryA_vac0, susceptible_countryA_vac1, susceptible_countryB_vac0, susceptible_countryB_vac1, susceptible_countryB_vac2, infectious_countryA_vac0_virW, infectious_countryA_vac0_virM, infectious_countryA_vac1_virW, infectious_countryA_vac2_virW, infectious_countryB_vac0_virW, infectious_countryB_vac0_virM, infectious_countryB_vac1_virW, infectious_countryB_vac1_virM, infectious_countryB_vac2_virW, infectious_countryB_vac2_virM, recovered_countryA_vac0_virW, recovered_countryA_vac0_virM, recovered_countryA_vac1_virW, recovered_countryA_vac1_virM, recovered_countryA_vac2_virW, recovered_countryA_vac2_virM, recovered_countryB_vac0_virW, recovered_countryB_vac0_virM, recovered_countryB_vac1_virW, recovered_countryB_vac1_virM, recovered_countryB_vac2_virW, recovered_countryB_vac2_virM, dead_countryA_vac0_virW, dead_countryA_vac0_virM, dead_countryA_vac1_virW, dead_countryA_vac1_virM, dead_countryA_vac2_virW, dead_countryA_vac2_virM, dead_countryB_vac0_virW, dead_countryB_vac0_virM, dead_countryB_vac1_virW, dead_countryB_vac1_virM, dead_countryB_vac2_virW, dead_countryB_vac2_virM
  susceptible_countryB_vac0_to_infectious_countryA_vac1_virM: susceptible_countryB_vac0 + infectious_countryA_vac1_virM => infectious_countryB_vac0_virM + infectious_countryA_vac1_virM; beta*eta_virM*(1 - 0)*(1 - gamma)*susceptible_countryB_vac0*infectious_countryA_vac1_virM*(susceptible_countryB_vac0 + susceptible_countryB_vac1 + susceptible_countryB_vac2 + infectious_countryB_vac0_virW + infectious_countryB_vac0_virM + infectious_countryB_vac1_virW + infectious_countryB_vac1_virM + infectious_countryB_vac2_virW + infectious_countryB_vac2_virM + recovered_countryB_vac0_virW + recovered_countryB_vac0_virM + recovered_countryB_vac1_virW + recovered_countryB_vac1_virM + recovered_countryB_vac2_virW + recovered_countryB_vac2_virM)/(susceptible_countryA_vac0 + susceptible_countryA_vac1 + susceptible_countryA_vac2 + susceptible_countryB_vac0 + susceptible_countryB_vac1 + susceptible_countryB_vac2 + infectious_countryA_vac0_virW + infectious_countryA_vac0_virM + infectious_countryA_vac1_virW + infectious_countryA_vac1_virM + infectious_countryA_vac2_virW + infectious_countryA_vac2_virM + infectious_countryB_vac0_virW + infectious_countryB_vac0_virM + infectious_countryB_vac1_virW + infectious_countryB_vac1_virM + infectious_countryB_vac2_virW + infectious_countryB_vac2_virM + recovered_countryA_vac0_virW + recovered_countryA_vac0_virM + recovered_countryA_vac1_virW + recovered_countryA_vac1_virM + recovered_countryA_vac2_virW + recovered_countryA_vac2_virM + recovered_countryB_vac0_virW + recovered_countryB_vac0_virM + recovered_countryB_vac1_virW + recovered_countryB_vac1_virM + recovered_countryB_vac2_virW + recovered_countryB_vac2_virM)*distance_countryA_countryB/(susceptible_countryB_vac0 + susceptible_countryB_vac1 + susceptible_countryB_vac2 + infectious_countryB_vac0_virW + infectious_countryB_vac0_virM + infectious_countryB_vac1_virW + infectious_countryB_vac1_virM + infectious_countryB_vac2_virW + infectious_countryB_vac2_virM + recovered_countryB_vac0_virW + recovered_countryB_vac0_virM + recovered_countryB_vac1_virW + recovered_countryB_vac1_virM + recovered_countryB_vac2_virW + recovered_countryB_vac2_virM);  // modifiers: susceptible_countryA_vac0, susceptible_countryA_vac1, susceptible_countryA_vac2, susceptible_countryB_vac1, susceptible_countryB_vac2, infectious_countryA_vac0_virW, infectious_countryA_vac0_virM, infectious_countryA_vac1_virW, infectious_countryA_vac2_virW, infectious_countryA_vac2_virM, infectious_countryB_vac0_virW, infectious_countryB_vac1_virW, infectious_countryB_vac1_virM, infectious_countryB_vac2_virW, infectious_countryB_vac2_virM, recovered_countryA_vac0_virW, recovered_countryA_vac0_virM, recovered_countryA_vac1_virW, recovered_countryA_vac1_virM, recovered_countryA_vac2_virW, recovered_countryA_vac2_virM, recovered_countryB_vac0_virW, recovered_countryB_vac0_virM, recovered_countryB_vac1_virW, recovered_countryB_vac1_virM, recovered_countryB_vac2_virW, recovered_countryB_vac2_virM, dead_countryA_vac0_virW, dead_countryA_vac0_virM, dead_countryA_vac1_virW, dead_countryA_vac1_virM, dead_countryA_vac2_virW, dead_countryA_vac2_virM, dead_countryB_vac0_virW, dead_countryB_vac0_virM, dead_countryB_vac1_virW, dead_countryB_vac1_virM, dead_countryB_vac2_virW, dead_countryB_vac2_virM
  susceptible_countryB_vac1_to_infectious_countryA_vac1_virM: susceptible_countryB_vac1 + infectious_countryA_vac1_virM => infectious_countryB_vac1_virM + infectious_countryA_vac1_virM; beta*eta_virM*(1 - delta_vac1_virM)*(1 - gamma)*susceptible_countryB_vac1*infectious_countryA_vac1_virM*(susceptible_countryB_vac0 + susceptible_countryB_vac1 + susceptible_countryB_vac2 + infectious_countryB_vac0_virW + infectious_countryB_vac0_virM + infectious_countryB_vac1_virW + infectious_countryB_vac1_virM + infectious_countryB_vac2_virW + infectious_countryB_vac2_virM + recovered_countryB_vac0_virW + recovered_countryB_vac0_virM + recovered_countryB_vac1_virW + recovered_countryB_vac1_virM + recovered_countryB_vac2_virW + recovered_countryB_vac2_virM)/(susceptible_countryA_vac0 + susceptible_countryA_vac1 + susceptible_countryA_vac2 + susceptible_countryB_vac0 + susceptible_countryB_vac1 + susceptible_countryB_vac2 + infectious_countryA_vac0_virW + infectious_countryA_vac0_virM + infectious_countryA_vac1_virW + infectious_countryA_vac1_virM + infectious_countryA_vac2_virW + infectious_countryA_vac2_virM + infectious_countryB_vac0_virW + infectious_countryB_vac0_virM + infectious_countryB_vac1_virW + infectious_countryB_vac1_virM + infectious_countryB_vac2_virW + infectious_countryB_vac2_virM + recovered_countryA_vac0_virW + recovered_countryA_vac0_virM + recovered_countryA_vac1_virW + recovered_countryA_vac1_virM + recovered_countryA_vac2_virW + recovered_countryA_vac2_virM + recovered_countryB_vac0_virW + recovered_countryB_vac0_virM + recovered_countryB_vac1_virW + recovered_countryB_vac1_virM + recovered_countryB_vac2_virW + recovered_countryB_vac2_virM)*distance_countryA_countryB/(susceptible_countryB_vac0 + susceptible_countryB_vac1 + susceptible_countryB_vac2 + infectious_countryB_vac0_virW + infectious_countryB_vac0_virM + infectious_countryB_vac1_virW + infectious_countryB_vac1_virM + infectious_countryB_vac2_virW + infectious_countryB_vac2_virM + recovered_countryB_vac0_virW + recovered_countryB_vac0_virM + recovered_countryB_vac1_virW + recovered_countryB_vac1_virM + recovered_countryB_vac2_virW + recovered_countryB_vac2_virM);  // modifiers: susceptible_countryA_vac0, susceptible_countryA_vac1, susceptible_countryA_vac2, susceptible_countryB_vac0, susceptible_countryB_vac2, infectious_countryA_vac0_virW, infectious_countryA_vac0_virM, infectious_countryA_vac1_virW, infectious_countryA_vac2_virW, infectious_countryA_vac2_virM, infectious_countryB_vac0_virW, infectious_countryB_vac0_virM, infectious_countryB_vac1_virW, infectious_countryB_vac2_virW, infectious_countryB_vac2_virM, recovered_countryA_vac0_virW, recovered_countryA_vac0_virM, recovered_countryA_vac1_virW, recovered_countryA_vac1_virM, recovered_countryA_vac2_virW, recovered_countryA_vac2_virM, recovered_countryB_vac0_virW, recovered_countryB_vac0_virM, recovered_countryB_vac1_virW, recovered_countryB_vac1_virM, recovered_countryB_vac2_virW, recovered_countryB_vac2_virM, dead_countryA_vac0_virW, dead_countryA_vac0_virM, dead_countryA_vac1_virW, dead_countryA_vac1_virM, dead_countryA_vac2_virW, dead_countryA_vac2_virM, dead_countryB_vac0_virW, dead_countryB_vac0_virM, dead_countryB_vac1_virW, dead_countryB_vac1_virM, dead_countryB_vac2_virW, dead_countryB_vac2_virM
  susceptible_countryB_vac2_to_infectious_countryA_vac1_virM: susceptible_countryB_vac2 + infectious_countryA_vac1_virM => infectious_countryB_vac2_virM + infectious_countryA_vac1_virM; beta*eta_virM*(1 - delta_vac2_virM)*(1 - gamma)*susceptible_countryB_vac2*infectious_countryA_vac1_virM*(susceptible_countryB_vac0 + susceptible_countryB_vac1 + susceptible_countryB_vac2 + infectious_countryB_vac0_virW + infectious_countryB_vac0_virM + infectious_countryB_vac1_virW + infectious_countryB_vac1_virM + infectious_countryB_vac2_virW + infectious_countryB_vac2_virM + recovered_countryB_vac0_virW + recovered_countryB_vac0_virM + recovered_countryB_vac1_virW + recovered_countryB_vac1_virM + recovered_countryB_vac2_virW + recovered_countryB_vac2_virM)/(susceptible_countryA_vac0 + susceptible_countryA_vac1 + susceptible_countryA_vac2 + susceptible_countryB_vac0 + susceptible_countryB_vac1 + susceptible_countryB_vac2 + infectious_countryA_vac0_virW + infectious_countryA_vac0_virM + infectious_countryA_vac1_virW + infectious_countryA_vac1_virM + infectious_countryA_vac2_virW + infectious_countryA_vac2_virM + infectious_countryB_vac0_virW + infectious_countryB_vac0_virM + infectious_countryB_vac1_virW + infectious_countryB_vac1_virM + infectious_countryB_vac2_virW + infectious_countryB_vac2_virM + recovered_countryA_vac0_virW + recovered_countryA_vac0_virM + recovered_countryA_vac1_virW + recovered_countryA_vac1_virM + recovered_countryA_vac2_virW + recovered_countryA_vac2_virM + recovered_countryB_vac0_virW + recovered_countryB_vac0_virM + recovered_countryB_vac1_virW + recovered_countryB_vac1_virM + recovered_countryB_vac2_virW + recovered_countryB_vac2_virM)*distance_countryA_countryB/(susceptible_countryB_vac0 + susceptible_countryB_vac1 + susceptible_countryB_vac2 + infectious_countryB_vac0_virW + infectious_countryB_vac0_virM + infectious_countryB_vac1_virW + infectious_countryB_vac1_virM + infectious_countryB_vac2_virW + infectious_countryB_vac2_virM + recovered_countryB_vac0_virW + recovered_countryB_vac0_virM + recovered_countryB_vac1_virW + recovered_countryB_vac1_virM + recovered_countryB_vac2_virW + recovered_countryB_vac2_virM);  // modifiers: susceptible_countryA_vac0, susceptible_countryA_vac1, susceptible_countryA_vac2, susceptible_countryB_vac0, susceptible_countryB_vac1, infectious_countryA_vac0_virW, infectious_countryA_vac0_virM, infectious_countryA_vac1_virW, infectious_countryA_vac2_virW, infectious_countryA_vac2_virM, infectious_countryB_vac0_virW, infectious_countryB_vac0_virM, infectious_countryB_vac1_virW, infectious_countryB_vac1_virM, infectious_countryB_vac2_virW, recovered_countryA_vac0_virW, recovered_countryA_vac0_virM, recovered_countryA_vac1_virW, recovered_countryA_vac1_virM, recovered_countryA_vac2_virW, recovered_countryA_vac2_virM, recovered_countryB_vac0_virW, recovered_countryB_vac0_virM, recovered_countryB_vac1_virW, recovered_countryB_vac1_virM, recovered_countryB_vac2_virW, recovered_countryB_vac2_virM, dead_countryA_vac0_virW, dead_countryA_vac0_virM, dead_countryA_vac1_virW, dead_countryA_vac1_virM, dead_countryA_vac2_virW, dead_countryA_vac2_virM, dead_countryB_vac0_virW, dead_countryB_vac0_virM, dead_countryB_vac1_virW, dead_countryB_vac1_virM, dead_countryB_vac2_virW, dead_countryB_vac2_virM
  susceptible_countryA_vac0_to_infectious_countryA_vac2_virW: susceptible_countryA_vac0 + infectious_countryA_vac2_virW => infectious_countryA_vac0_virW + infectious_countryA_vac2_virW; beta*eta_virW*(1 - 0)*(1 - gamma)*susceptible_countryA_vac0*infectious_countryA_vac2_virW*(1 - (susceptible_countryB_vac0 + susceptible_countryB_vac1 + susceptible_countryB_vac2 + infectious_countryB_vac0_virW + infectious_countryB_vac0_virM + infectious_countryB_vac1_virW + infectious_countryB_vac1_virM + infectious_countryB_vac2_virW + infectious_countryB_vac2_virM + recovered_countryB_vac0_virW + recovered_countryB_vac0_virM + recovered_countryB_vac1_virW + recovered_countryB_vac1_virM + recovered_countryB_vac2_virW + recovered_countryB_vac2_virM)/(susceptible_countryA_vac0 + susceptible_countryA_vac1 + susceptible_countryA_vac2 + susceptible_countryB_vac0 + susceptible_countryB_vac1 + susceptible_countryB_vac2 + infectious_countryA_vac0_virW + infectious_countryA_vac0_virM + infectious_countryA_vac1_virW + infectious_countryA_vac1_virM + infectious_countryA_vac2_virW + infectious_countryA_vac2_virM + infectious_countryB_vac0_virW + infectious_countryB_vac0_virM + infectious_countryB_vac1_virW + infectious_countryB_vac1_virM + infectious_countryB_vac2_virW + infectious_countryB_vac2_virM + recovered_countryA_vac0_virW + recovered_countryA_vac0_virM + recovered_countryA_vac1_virW + recovered_countryA_vac1_virM + recovered_countryA_vac2_virW + recovered_countryA_vac2_virM + recovered_countryB_vac0_virW + recovered_countryB_vac0_virM + recovered_countryB_vac1_virW + recovered_countryB_vac1_virM + recovered_countryB_vac2_virW + recovered_countryB_vac2_virM)*distance_countryA_countryB)/(susceptible_countryA_vac0 + susceptible_countryA_vac1 + susceptible_countryA_vac2 + infectious_countryA_vac0_virW + infectious_countryA_vac0_virM + infectious_countryA_vac1_virW + infectious_countryA_vac1_virM + infectious_countryA_vac2_virW + infectious_countryA_vac2_virM + recovered_countryA_vac0_virW + recovered_countryA_vac0_virM + recovered_countryA_vac1_virW + recovered_countryA_vac1_virM + recovered_countryA_vac2_virW + recovered_countryA_vac2_virM);  // modifiers: susceptible_countryA_vac1, susceptible_countryA_vac2, susceptible_countryB_vac0, susceptible_countryB_vac1, susceptible_countryB_vac2, infectious_countryA_vac0_virM, infectious_countryA_vac1_virW, infectious_countryA_vac1_virM, infectious_countryA_vac2_virM, infectious_countryB_vac0_virW, infectious_countryB_vac0_virM, infectious_countryB_vac1_virW, infectious_countryB_vac1_virM, infectious_countryB_vac2_virW, infectious_countryB_vac2_virM, recovered_countryA_vac0_virW, recovered_countryA_vac0_virM, recovered_countryA_vac1_virW, recovered_countryA_vac1_virM, recovered_countryA_vac2_virW, recovered_countryA_vac2_virM, recovered_countryB_vac0_virW, recovered_countryB_vac0_virM, recovered_countryB_vac1_virW, recovered_countryB_vac1_virM, recovered_countryB_vac2_virW, recovered_countryB_vac2_virM, dead_countryA_vac0_virW, dead_countryA_vac0_virM, dead_countryA_vac1_virW, dead_countryA_vac1_virM, dead_countryA_vac2_virW, dead_countryA_vac2_virM, dead_countryB_vac0_virW, dead_countryB_vac0_virM, dead_countryB_vac1_virW, dead_countryB_vac1_virM, dead_countryB_vac2_virW, dead_countryB_vac2_virM
  susceptible_countryA_vac1_to_infectious_countryA_vac2_virW: susceptible_countryA_vac1 + infectious_countryA_vac2_virW => infectious_countryA_vac1_virW + infectious_countryA_vac2_virW; beta*eta_virW*(1 - delta_vac1_virW)*(1 - gamma)*susceptible_countryA_vac1*infectious_countryA_vac2_virW*(1 - (susceptible_countryB_vac0 + susceptible_countryB_vac1 + susceptible_countryB_vac2 + infectious_countryB_vac0_virW + infectious_countryB_vac0_virM + infectious_countryB_vac1_virW + infectious_countryB_vac1_virM + infectious_countryB_vac2_virW + infectious_countryB_vac2_virM + recovered_countryB_vac0_virW + recovered_countryB_vac0_virM + recovered_countryB_vac1_virW + recovered_countryB_vac1_virM + recovered_countryB_vac2_virW + recovered_countryB_vac2_virM)/(susceptible_countryA_vac0 + susceptible_countryA_vac1 + susceptible_countryA_vac2 + susceptible_countryB_vac0 + susceptible_countryB_vac1 + susceptible_countryB_vac2 + infectious_countryA_vac0_virW + infectious_countryA_vac0_virM + infectious_countryA_vac1_virW + infectious_countryA_vac1_virM + infectious_countryA_vac2_virW + infectious_countryA_vac2_virM + infectious_countryB_vac0_virW + infectious_countryB_vac0_virM + infectious_countryB_vac1_virW + infectious_countryB_vac1_virM + infectious_countryB_vac2_virW + infectious_countryB_vac2_virM + recovered_countryA_vac0_virW + recovered_countryA_vac0_virM + recovered_countryA_vac1_virW + recovered_countryA_vac1_virM + recovered_countryA_vac2_virW + recovered_countryA_vac2_virM + recovered_countryB_vac0_virW + recovered_countryB_vac0_virM + recovered_countryB_vac1_virW + recovered_countryB_vac1_virM + recovered_countryB_vac2_virW + recovered_countryB_vac2_virM)*distance_countryA_countryB)/(susceptible_countryA_vac0 + susceptible_countryA_vac1 + susceptible_countryA_vac2 + infectious_countryA_vac0_virW + infectious_countryA_vac0_virM + infectious_countryA_vac1_virW + infectious_countryA_vac1_virM + infectious_countryA_vac2_virW + infectious_countryA_vac2_virM + recovered_countryA_vac0_virW + recovered_countryA_vac0_virM + recovered_countryA_vac1_virW + recovered_countryA_vac1_virM + recovered_countryA_vac2_virW + recovered_countryA_vac2_virM);  // modifiers: susceptible_countryA_vac0, susceptible_countryA_vac2, susceptible_countryB_vac0, susceptible_countryB_vac1, susceptible_countryB_vac2, infectious_countryA_vac0_virW, infectious_countryA_vac0_virM, infectious_countryA_vac1_virM, infectious_countryA_vac2_virM, infectious_countryB_vac0_virW, infectious_countryB_vac0_virM, infectious_countryB_vac1_virW, infectious_countryB_vac1_virM, infectious_countryB_vac2_virW, infectious_countryB_vac2_virM, recovered_countryA_vac0_virW, recovered_countryA_vac0_virM, recovered_countryA_vac1_virW, recovered_countryA_vac1_virM, recovered_countryA_vac2_virW, recovered_countryA_vac2_virM, recovered_countryB_vac0_virW, recovered_countryB_vac0_virM, recovered_countryB_vac1_virW, recovered_countryB_vac1_virM, recovered_countryB_vac2_virW, recovered_countryB_vac2_virM, dead_countryA_vac0_virW, dead_countryA_vac0_virM, dead_countryA_vac1_virW, dead_countryA_vac1_virM, dead_countryA_vac2_virW, dead_countryA_vac2_virM, dead_countryB_vac0_virW, dead_countryB_vac0_virM, dead_countryB_vac1_virW, dead_countryB_vac1_virM, dead_countryB_vac2_virW, dead_countryB_vac2_virM
  susceptible_countryA_vac2_to_infectious_countryA_vac2_virW: susceptible_countryA_vac2 + infectious_countryA_vac2_virW => 2 infectious_countryA_vac2_virW; beta*eta_virW*(1 - delta_vac2_virW)*(1 - gamma)*susceptible_countryA_vac2*infectious_countryA_vac2_virW*(1 - (susceptible_countryB_vac0 + susceptible_countryB_vac1 + susceptible_countryB_vac2 + infectious_countryB_vac0_virW + infectious_countryB_vac0_virM + infectious_countryB_vac1_virW + infectious_countryB_vac1_virM + infectious_countryB_vac2_virW + infectious_countryB_vac2_virM + recovered_countryB_vac0_virW + recovered_countryB_vac0_virM + recovered_countryB_vac1_virW + recovered_countryB_vac1_virM + recovered_countryB_vac2_virW + recovered_countryB_vac2_virM)/(susceptible_countryA_vac0 + susceptible_countryA_vac1 + susceptible_countryA_vac2 + susceptible_countryB_vac0 + susceptible_countryB_vac1 + susceptible_countryB_vac2 + infectious_countryA_vac0_virW + infectious_countryA_vac0_virM + infectious_countryA_vac1_virW + infectious_countryA_vac1_virM + infectious_countryA_vac2_virW + infectious_countryA_vac2_virM + infectious_countryB_vac0_virW + infectious_countryB_vac0_virM + infectious_countryB_vac1_virW + infectious_countryB_vac1_virM + infectious_countryB_vac2_virW + infectious_countryB_vac2_virM + recovered_countryA_vac0_virW + recovered_countryA_vac0_virM + recovered_countryA_vac1_virW + recovered_countryA_vac1_virM + recovered_countryA_vac2_virW + recovered_countryA_vac2_virM + recovered_countryB_vac0_virW + recovered_countryB_vac0_virM + recovered_countryB_vac1_virW + recovered_countryB_vac1_virM + recovered_countryB_vac2_virW + recovered_countryB_vac2_virM)*distance_countryA_countryB)/(susceptible_countryA_vac0 + susceptible_countryA_vac1 + susceptible_countryA_vac2 + infectious_countryA_vac0_virW + infectious_countryA_vac0_virM + infectious_countryA_vac1_virW + infectious_countryA_vac1_virM + infectious_countryA_vac2_virW + infectious_countryA_vac2_virM + recovered_countryA_vac0_virW + recovered_countryA_vac0_virM + recovered_countryA_vac1_virW + recovered_countryA_vac1_virM + recovered_countryA_vac2_virW + recovered_countryA_vac2_virM);  // modifiers: susceptible_countryA_vac0, susceptible_countryA_vac1, susceptible_countryB_vac0, susceptible_countryB_vac1, susceptible_countryB_vac2, infectious_countryA_vac0_virW, infectious_countryA_vac0_virM, infectious_countryA_vac1_virW, infectious_countryA_vac1_virM, infectious_countryA_vac2_virM, infectious_countryB_vac0_virW, infectious_countryB_vac0_virM, infectious_countryB_vac1_virW, infectious_countryB_vac1_virM, infectious_countryB_vac2_virW, infectious_countryB_vac2_virM, recovered_countryA_vac0_virW, recovered_countryA_vac0_virM, recovered_countryA_vac1_virW, recovered_countryA_vac1_virM, recovered_countryA_vac2_virW, recovered_countryA_vac2_virM, recovered_countryB_vac0_virW, recovered_countryB_vac0_virM, recovered_countryB_vac1_virW, recovered_countryB_vac1_virM, recovered_countryB_vac2_virW, recovered_countryB_vac2_virM, dead_countryA_vac0_virW, dead_countryA_vac0_virM, dead_countryA_vac1_virW, dead_countryA_vac1_virM, dead_countryA_vac2_virW, dead_countryA_vac2_virM, dead_countryB_vac0_virW, dead_countryB_vac0_virM, dead_countryB_vac1_virW, dead_countryB_vac1_virM, dead_countryB_vac2_virW, dead_countryB_vac2_virM
  susceptible_countryB_vac0_to_infectious_countryA_vac2_virW: susceptible_countryB_vac0 + infectious_countryA_vac2_virW => infectious_countryB_vac0_virW + infectious_countryA_vac2_virW; beta*eta_virW*(1 - 0)*(1 - gamma)*susceptible_countryB_vac0*infectious_countryA_vac2_virW*(susceptible_countryB_vac0 + susceptible_countryB_vac1 + susceptible_countryB_vac2 + infectious_countryB_vac0_virW + infectious_countryB_vac0_virM + infectious_countryB_vac1_virW + infectious_countryB_vac1_virM + infectious_countryB_vac2_virW + infectious_countryB_vac2_virM + recovered_countryB_vac0_virW + recovered_countryB_vac0_virM + recovered_countryB_vac1_virW + recovered_countryB_vac1_virM + recovered_countryB_vac2_virW + recovered_countryB_vac2_virM)/(susceptible_countryA_vac0 + susceptible_countryA_vac1 + susceptible_countryA_vac2 + susceptible_countryB_vac0 + susceptible_countryB_vac1 + susceptible_countryB_vac2 + infectious_countryA_vac0_virW + infectious_countryA_vac0_virM + infectious_countryA_vac1_virW + infectious_countryA_vac1_virM + infectious_countryA_vac2_virW + infectious_countryA_vac2_virM + infectious_countryB_vac0_virW + infectious_countryB_vac0_virM + infectious_countryB_vac1_virW + infectious_countryB_vac1_virM + infectious_countryB_vac2_virW + infectious_countryB_vac2_virM + recovered_countryA_vac0_virW + recovered_countryA_vac0_virM + recovered_countryA_vac1_virW + recovered_countryA_vac1_virM + recovered_countryA_vac2_virW + recovered_countryA_vac2_virM + recovered_countryB_vac0_virW + recovered_countryB_vac0_virM + recovered_countryB_vac1_virW + recovered_countryB_vac1_virM + recovered_countryB_vac2_virW + recovered_countryB_vac2_virM)*distance_countryA_countryB/(susceptible_countryB_vac0 + susceptible_countryB_vac1 + susceptible_countryB_vac2 + infectious_countryB_vac0_virW + infectious_countryB_vac0_virM + infectious_countryB_vac1_virW + infectious_countryB_vac1_virM + infectious_countryB_vac2_virW + infectious_countryB_vac2_virM + recovered_countryB_vac0_virW + recovered_countryB_vac0_virM + recovered_countryB_vac1_virW + recovered_countryB_vac1_virM + recovered_countryB_vac2_virW + recovered_countryB_vac2_virM);  // modifiers: susceptible_countryA_vac0, susceptible_countryA_vac1, susceptible_countryA_vac2, susceptible_countryB_vac1, susceptible_countryB_vac2, infectious_countryA_vac0_virW, infectious_countryA_vac0_virM, infectious_countryA_vac1_virW, infectious_countryA_vac1_virM, infectious_countryA_vac2_virM, infectious_countryB_vac0_virM, infectious_countryB_vac1_virW, infectious_countryB_vac1_virM, infectious_countryB_vac2_virW, infectious_countryB_vac2_virM, recovered_countryA_vac0_virW, recovered_countryA_vac0_virM, recovered_countryA_vac1_virW, recovered_countryA_vac1_virM, recovered_countryA_vac2_virW, recovered_countryA_vac2_virM, recovered_countryB_vac0_virW, recovered_countryB_vac0_virM, recovered_countryB_vac1_virW, recovered_countryB_vac1_virM, recovered_countryB_vac2_virW, recovered_countryB_vac2_virM, dead_countryA_vac0_virW, dead_countryA_vac0_virM, dead_countryA_vac1_virW, dead_countryA_vac1_virM, dead_countryA_vac2_virW, dead_countryA_vac2_virM, dead_countryB_vac0_virW, dead_countryB_vac0_virM, dead_countryB_vac1_virW, dead_countryB_vac1_virM, dead_countryB_vac2_virW, dead_countryB_vac2_virM
  susceptible_countryB_vac1_to_infectious_countryA_vac2_virW: susceptible_countryB_vac1 + infectious_countryA_vac2_virW => infectious_countryB_vac1_virW + infectious_countryA_vac2_virW; beta*eta_virW*(1 - delta_vac1_virW)*(1 - gamma)*susceptible_countryB_vac1*infectious_countryA_vac2_virW*(susceptible_countryB_vac0 + susceptible_countryB_vac1 + susceptible_countryB_vac2 + infectious_countryB_vac0_virW + infectious_countryB_vac0_virM + infectious_countryB_vac1_virW + infectious_countryB_vac1_virM + infectious_countryB_vac2_virW + infectious_countryB_vac2_virM + recovered_countryB_vac0_virW + recovered_countryB_vac0_virM + recovered_countryB_vac1_virW + recovered_countryB_vac1_virM + recovered_countryB_vac2_virW + recovered_countryB_vac2_virM)/(susceptible_countryA_vac0 + susceptible_countryA_vac1 + susceptible_countryA_vac2 + susceptible_countryB_vac0 + susceptible_countryB_vac1 + susceptible_countryB_vac2 + infectious_countryA_vac0_virW + infectious_countryA_vac0_virM + infectious_countryA_vac1_virW + infectious_countryA_vac1_virM + infectious_countryA_vac2_virW + infectious_countryA_vac2_virM + infectious_countryB_vac0_virW + infectious_countryB_vac0_virM + infectious_countryB_vac1_virW + infectious_countryB_vac1_virM + infectious_countryB_vac2_virW + infectious_countryB_vac2_virM + recovered_countryA_vac0_virW + recovered_countryA_vac0_virM + recovered_countryA_vac1_virW + recovered_countryA_vac1_virM + recovered_countryA_vac2_virW + recovered_countryA_vac2_virM + recovered_countryB_vac0_virW + recovered_countryB_vac0_virM + recovered_countryB_vac1_virW + recovered_countryB_vac1_virM + recovered_countryB_vac2_virW + recovered_countryB_vac2_virM)*distance_countryA_countryB/(susceptible_countryB_vac0 + susceptible_countryB_vac1 + susceptible_countryB_vac2 + infectious_countryB_vac0_virW + infectious_countryB_vac0_virM + infectious_countryB_vac1_virW + infectious_countryB_vac1_virM + infectious_countryB_vac2_virW + infectious_countryB_vac2_virM + recovered_countryB_vac0_virW + recovered_countryB_vac0_virM + recovered_countryB_vac1_virW + recovered_countryB_vac1_virM + recovered_countryB_vac2_virW + recovered_countryB_vac2_virM);  // modifiers: susceptible_countryA_vac0, susceptible_countryA_vac1, susceptible_countryA_vac2, susceptible_countryB_vac0, susceptible_countryB_vac2, infectious_countryA_vac0_virW, infectious_countryA_vac0_virM, infectious_countryA_vac1_virW, infectious_countryA_vac1_virM, infectious_countryA_vac2_virM, infectious_countryB_vac0_virW, infectious_countryB_vac0_virM, infectious_countryB_vac1_virM, infectious_countryB_vac2_virW, infectious_countryB_vac2_virM, recovered_countryA_vac0_virW, recovered_countryA_vac0_virM, recovered_countryA_vac1_virW, recovered_countryA_vac1_virM, recovered_countryA_vac2_virW, recovered_countryA_vac2_virM, recovered_countryB_vac0_virW, recovered_countryB_vac0_virM, recovered_countryB_vac1_virW, recovered_countryB_vac1_virM, recovered_countryB_vac2_virW, recovered_countryB_vac2_virM, dead_countryA_vac0_virW, dead_countryA_vac0_virM, dead_countryA_vac1_virW, dead_countryA_vac1_virM, dead_countryA_vac2_virW, dead_countryA_vac2_virM, dead_countryB_vac0_virW, dead_countryB_vac0_virM, dead_countryB_vac1_virW, dead_countryB_vac1_virM, dead_countryB_vac2_virW, dead_countryB_vac2_virM
  susceptible_countryB_vac2_to_infectious_countryA_vac2_virW: susceptible_countryB_vac2 + infectious_countryA_vac2_virW => infectious_countryB_vac2_virW + infectious_countryA_vac2_virW; beta*eta_virW*(1 - delta_vac2_virW)*(1 - gamma)*susceptible_countryB_vac2*infectious_countryA_vac2_virW*(susceptible_countryB_vac0 + susceptible_countryB_vac1 + susceptible_countryB_vac2 + infectious_countryB_vac0_virW + infectious_countryB_vac0_virM + infectious_countryB_vac1_virW + infectious_countryB_vac1_virM + infectious_countryB_vac2_virW + infectious_countryB_vac2_virM + recovered_countryB_vac0_virW + recovered_countryB_vac0_virM + recovered_countryB_vac1_virW + recovered_countryB_vac1_virM + recovered_countryB_vac2_virW + recovered_countryB_vac2_virM)/(susceptible_countryA_vac0 + susceptible_countryA_vac1 + susceptible_countryA_vac2 + susceptible_countryB_vac0 + susceptible_countryB_vac1 + susceptible_countryB_vac2 + infectious_countryA_vac0_virW + infectious_countryA_vac0_virM + infectious_countryA_vac1_virW + infectious_countryA_vac1_virM + infectious_countryA_vac2_virW + infectious_countryA_vac2_virM + infectious_countryB_vac0_virW + infectious_countryB_vac0_virM + infectious_countryB_vac1_virW + infectious_countryB_vac1_virM + infectious_countryB_vac2_virW + infectious_countryB_vac2_virM + recovered_countryA_vac0_virW + recovered_countryA_vac0_virM + recovered_countryA_vac1_virW + recovered_countryA_vac1_virM + recovered_countryA_vac2_virW + recovered_countryA_vac2_virM + recovered_countryB_vac0_virW + recovered_countryB_vac0_virM + recovered_countryB_vac1_virW + recovered_countryB_vac1_virM + recovered_countryB_vac2_virW + recovered_countryB_vac2_virM)*distance_countryA_countryB/(susceptible_countryB_vac0 + susceptible_countryB_vac1 + susceptible_countryB_vac2 + infectious_countryB_vac0_virW + infectious_countryB_vac0_virM + infectious_countryB_vac1_virW + infectious_countryB_vac1_virM + infectious_countryB_vac2_virW + infectious_countryB_vac2_virM + recovered_countryB_vac0_virW + recovered_countryB_vac0_virM + recovered_countryB_vac1_virW + recovered_countryB_vac1_virM + recovered_countryB_vac2_virW + recovered_countryB_vac2_virM);  // modifiers: susceptible_countryA_vac0, susceptible_countryA_vac1, susceptible_countryA_vac2, susceptible_countryB_vac0, susceptible_countryB_vac1, infectious_countryA_vac0_virW, infectious_countryA_vac0_virM, infectious_countryA_vac1_virW, infectious_countryA_vac1_virM, infectious_countryA_vac2_virM, infectious_countryB_vac0_virW, infectious_countryB_vac0_virM, infectious_countryB_vac1_virW, infectious_countryB_vac1_virM, infectious_countryB_vac2_virM, recovered_countryA_vac0_virW, recovered_countryA_vac0_virM, recovered_countryA_vac1_virW, recovered_countryA_vac1_virM, recovered_countryA_vac2_virW, recovered_countryA_vac2_virM, recovered_countryB_vac0_virW, recovered_countryB_vac0_virM, recovered_countryB_vac1_virW, recovered_countryB_vac1_virM, recovered_countryB_vac2_virW, recovered_countryB_vac2_virM, dead_countryA_vac0_virW, dead_countryA_vac0_virM, dead_countryA_vac1_virW, dead_countryA_vac1_virM, dead_countryA_vac2_virW, dead_countryA_vac2_virM, dead_countryB_vac0_virW, dead_countryB_vac0_virM, dead_countryB_vac1_virW, dead_countryB_vac1_virM, dead_countryB_vac2_virW, dead_countryB_vac2_virM
  susceptible_countryA_vac0_to_infectious_countryA_vac2_virM: susceptible_countryA_vac0 + infectious_countryA_vac2_virM => infectious_countryA_vac0_virM + infectious_countryA_vac2_virM; beta*eta_virM*(1 - 0)*(1 - gamma)*susceptible_countryA_vac0*infectious_countryA_vac2_virM*(1 - (susceptible_countryB_vac0 + susceptible_countryB_vac1 + susceptible_countryB_vac2 + infectious_countryB_vac0_virW + infectious_countryB_vac0_virM + infectious_countryB_vac1_virW + infectious_countryB_vac1_virM + infectious_countryB_vac2_virW + infectious_countryB_vac2_virM + recovered_countryB_vac0_virW + recovered_countryB_vac0_virM + recovered_countryB_vac1_virW + recovered_countryB_vac1_virM + recovered_countryB_vac2_virW + recovered_countryB_vac2_virM)/(susceptible_countryA_vac0 + susceptible_countryA_vac1 + susceptible_countryA_vac2 + susceptible_countryB_vac0 + susceptible_countryB_vac1 + susceptible_countryB_vac2 + infectious_countryA_vac0_virW + infectious_countryA_vac0_virM + infectious_countryA_vac1_virW + infectious_countryA_vac1_virM + infectious_countryA_vac2_virW + infectious_countryA_vac2_virM + infectious_countryB_vac0_virW + infectious_countryB_vac0_virM + infectious_countryB_vac1_virW + infectious_countryB_vac1_virM + infectious_countryB_vac2_virW + infectious_countryB_vac2_virM + recovered_countryA_vac0_virW + recovered_countryA_vac0_virM + recovered_countryA_vac1_virW + recovered_countryA_vac1_virM + recovered_countryA_vac2_virW + recovered_countryA_vac2_virM + recovered_countryB_vac0_virW + recovered_countryB_vac0_virM + recovered_countryB_vac1_virW + recovered_countryB_vac1_virM + recovered_countryB_vac2_virW + recovered_countryB_vac2_virM)*distance_countryA_countryB)/(susceptible_countryA_vac0 + susceptible_countryA_vac1 + susceptible_countryA_vac2 + infectious_countryA_vac0_virW + infectious_countryA_vac0_virM + infectious_countryA_vac1_virW + infectious_countryA_vac1_virM + infectious_countryA_vac2_virW + infectious_countryA_vac2_virM + recovered_countryA_vac0_virW + recovered_countryA_vac0_virM + recovered_countryA_vac1_virW + recovered_countryA_vac1_virM + recovered_countryA_vac2_virW + recovered_countryA_vac2_virM);  // modifiers: susceptible_countryA_vac1, susceptible_countryA_vac2, susceptible_countryB_vac0, susceptible_countryB_vac1, susceptible_countryB_vac2, infectious_countryA_vac0_virW, infectious_countryA_vac1_virW, infectious_countryA_vac1_virM, infectious_countryA_vac2_virW, infectious_countryB_vac0_virW, infectious_countryB_vac0_virM, infectious_countryB_vac1_virW, infectious_countryB_vac1_virM, infectious_countryB_vac2_virW, infectious_countryB_vac2_virM, recovered_countryA_vac0_virW, recovered_countryA_vac0_virM, recovered_countryA_vac1_virW, recovered_countryA_vac1_virM, recovered_countryA_vac2_virW, recovered_countryA_vac2_virM, recovered_countryB_vac0_virW, recovered_countryB_vac0_virM, recovered_countryB_vac1_virW, recovered_countryB_vac1_virM, recovered_countryB_vac2_virW, recovered_countryB_vac2_virM, dead_countryA_vac0_virW, dead_countryA_vac0_virM, dead_countryA_vac1_virW, dead_countryA_vac1_virM, dead_countryA_vac2_virW, dead_countryA_vac2_virM, dead_countryB_vac0_virW, dead_countryB_vac0_virM, dead_countryB_vac1_virW, dead_countryB_vac1_virM, dead_countryB_vac2_virW, dead_countryB_vac2_virM
  susceptible_countryA_vac1_to_infectious_countryA_vac2_virM: susceptible_countryA_vac1 + infectious_countryA_vac2_virM => infectious_countryA_vac1_virM + infectious_countryA_vac2_virM; beta*eta_virM*(1 - delta_vac1_virM)*(1 - gamma)*susceptible_countryA_vac1*infectious_countryA_vac2_virM*(1 - (susceptible_countryB_vac0 + susceptible_countryB_vac1 + susceptible_countryB_vac2 + infectious_countryB_vac0_virW + infectious_countryB_vac0_virM + infectious_countryB_vac1_virW + infectious_countryB_vac1_virM + infectious_countryB_vac2_virW + infectious_countryB_vac2_virM + recovered_countryB_vac0_virW + recovered_countryB_vac0_virM + recovered_countryB_vac1_virW + recovered_countryB_vac1_virM + recovered_countryB_vac2_virW + recovered_countryB_vac2_virM)/(susceptible_countryA_vac0 + susceptible_countryA_vac1 + susceptible_countryA_vac2 + susceptible_countryB_vac0 + susceptible_countryB_vac1 + susceptible_countryB_vac2 + infectious_countryA_vac0_virW + infectious_countryA_vac0_virM + infectious_countryA_vac1_virW + infectious_countryA_vac1_virM + infectious_countryA_vac2_virW + infectious_countryA_vac2_virM + infectious_countryB_vac0_virW + infectious_countryB_vac0_virM + infectious_countryB_vac1_virW + infectious_countryB_vac1_virM + infectious_countryB_vac2_virW + infectious_countryB_vac2_virM + recovered_countryA_vac0_virW + recovered_countryA_vac0_virM + recovered_countryA_vac1_virW + recovered_countryA_vac1_virM + recovered_countryA_vac2_virW + recovered_countryA_vac2_virM + recovered_countryB_vac0_virW + recovered_countryB_vac0_virM + recovered_countryB_vac1_virW + recovered_countryB_vac1_virM + recovered_countryB_vac2_virW + recovered_countryB_vac2_virM)*distance_countryA_countryB)/(susceptible_countryA_vac0 + susceptible_countryA_vac1 + susceptible_countryA_vac2 + infectious_countryA_vac0_virW + infectious_countryA_vac0_virM + infectious_countryA_vac1_virW + infectious_countryA_vac1_virM + infectious_countryA_vac2_virW + infectious_countryA_vac2_virM + recovered_countryA_vac0_virW + recovered_countryA_vac0_virM + recovered_countryA_vac1_virW + recovered_countryA_vac1_virM + recovered_countryA_vac2_virW + recovered_countryA_vac2_virM);  // modifiers: susceptible_countryA_vac0, susceptible_countryA_vac2, susceptible_countryB_vac0, susceptible_countryB_vac1, susceptible_countryB_vac2, infectious_countryA_vac0_virW, infectious_countryA_vac0_virM, infectious_countryA_vac1_virW, infectious_countryA_vac2_virW, infectious_countryB_vac0_virW, infectious_countryB_vac0_virM, infectious_countryB_vac1_virW, infectious_countryB_vac1_virM, infectious_countryB_vac2_virW, infectious_countryB_vac2_virM, recovered_countryA_vac0_virW, recovered_countryA_vac0_virM, recovered_countryA_vac1_virW, recovered_countryA_vac1_virM, recovered_countryA_vac2_virW, recovered_countryA_vac2_virM, recovered_countryB_vac0_virW, recovered_countryB_vac0_virM, recovered_countryB_vac1_virW, recovered_countryB_vac1_virM, recovered_countryB_vac2_virW, recovered_countryB_vac2_virM, dead_countryA_vac0_virW, dead_countryA_vac0_virM, dead_countryA_vac1_virW, dead_countryA_vac1_virM, dead_countryA_vac2_virW, dead_countryA_vac2_virM, dead_countryB_vac0_virW, dead_countryB_vac0_virM, dead_countryB_vac1_virW, dead_countryB_vac1_virM, dead_countryB_vac2_virW, dead_countryB_vac2_virM
  susceptible_countryA_vac2_to_infectious_countryA_vac2_virM: susceptible_countryA_vac2 + infectious_countryA_vac2_virM => 2 infectious_countryA_vac2_virM; beta*eta_virM*(1 - delta_vac2_virM)*(1 - gamma)*susceptible_countryA_vac2*infectious_countryA_vac2_virM*(1 - (susceptible_countryB_vac0 + susceptible_countryB_vac1 + susceptible_countryB_vac2 + infectious_countryB_vac0_virW + infectious_countryB_vac0_virM + infectious_countryB_vac1_virW + infectious_countryB_vac1_virM + infectious_countryB_vac2_virW + infectious_countryB_vac2_virM + recovered_countryB_vac0_virW + recovered_countryB_vac0_virM + recovered_countryB_vac1_virW + recovered_countryB_vac1_virM + recovered_countryB_vac2_virW + recovered_countryB_vac2_virM)/(susceptible_countryA_vac0 + susceptible_countryA_vac1 + susceptible_countryA_vac2 + susceptible_countryB_vac0 + susceptible_countryB_vac1 + susceptible_countryB_vac2 + infectious_countryA_vac0_virW + infectious_countryA_vac0_virM + infectious_countryA_vac1_virW + infectious_countryA_vac1_virM + infectious_countryA_vac2_virW + infectious_countryA_vac2_virM + infectious_countryB_vac0_virW + infectious_countryB_vac0_virM + infectious_countryB_vac1_virW + infectious_countryB_vac1_virM + infectious_countryB_vac2_virW + infectious_countryB_vac2_virM + recovered_countryA_vac0_virW + recovered_countryA_vac0_virM + recovered_countryA_vac1_virW + recovered_countryA_vac1_virM + recovered_countryA_vac2_virW + recovered_countryA_vac2_virM + recovered_countryB_vac0_virW + recovered_countryB_vac0_virM + recovered_countryB_vac1_virW + recovered_countryB_vac1_virM + recovered_countryB_vac2_virW + recovered_countryB_vac2_virM)*distance_countryA_countryB)/(susceptible_countryA_vac0 + susceptible_countryA_vac1 + susceptible_countryA_vac2 + infectious_countryA_vac0_virW + infectious_countryA_vac0_virM + infectious_countryA_vac1_virW + infectious_countryA_vac1_virM + infectious_countryA_vac2_virW + infectious_countryA_vac2_virM + recovered_countryA_vac0_virW + recovered_countryA_vac0_virM + recovered_countryA_vac1_virW + recovered_countryA_vac1_virM + recovered_countryA_vac2_virW + recovered_countryA_vac2_virM);  // modifiers: susceptible_countryA_vac0, susceptible_countryA_vac1, susceptible_countryB_vac0, susceptible_countryB_vac1, susceptible_countryB_vac2, infectious_countryA_vac0_virW, infectious_countryA_vac0_virM, infectious_countryA_vac1_virW, infectious_countryA_vac1_virM, infectious_countryA_vac2_virW, infectious_countryB_vac0_virW, infectious_countryB_vac0_virM, infectious_countryB_vac1_virW, infectious_countryB_vac1_virM, infectious_countryB_vac2_virW, infectious_countryB_vac2_virM, recovered_countryA_vac0_virW, recovered_countryA_vac0_virM, recovered_countryA_vac1_virW, recovered_countryA_vac1_virM, recovered_countryA_vac2_virW, recovered_countryA_vac2_virM, recovered_countryB_vac0_virW, recovered_countryB_vac0_virM, recovered_countryB_vac1_virW, recovered_countryB_vac1_virM, recovered_countryB_vac2_virW, recovered_countryB_vac2_virM, dead_countryA_vac0_virW, dead_countryA_vac0_virM, dead_countryA_vac1_virW, dead_countryA_vac1_virM, dead_countryA_vac2_virW, dead_countryA_vac2_virM, dead_countryB_vac0_virW, dead_countryB_vac0_virM, dead_countryB_vac1_virW, dead_countryB_vac1_virM, dead_countryB_vac2_virW, dead_countryB_vac2_virM
  susceptible_countryB_vac0_to_infectious_countryA_vac2_virM: susceptible_countryB_vac0 + infectious_countryA_vac2_virM => infectious_countryB_vac0_virM + infectious_countryA_vac2_virM; beta*eta_virM*(1 - 0)*(1 - gamma)*susceptible_countryB_vac0*infectious_countryA_vac2_virM*(susceptible_countryB_vac0 + susceptible_countryB_vac1 + susceptible_countryB_vac2 + infectious_countryB_vac0_virW + infectious_countryB_vac0_virM + infectious_countryB_vac1_virW + infectious_countryB_vac1_virM + infectious_countryB_vac2_virW + infectious_countryB_vac2_virM + recovered_countryB_vac0_virW + recovered_countryB_vac0_virM + recovered_countryB_vac1_virW + recovered_countryB_vac1_virM + recovered_countryB_vac2_virW + recovered_countryB_vac2_virM)/(susceptible_countryA_vac0 + susceptible_countryA_vac1 + susceptible_countryA_vac2 + susceptible_countryB_vac0 + susceptible_countryB_vac1 + susceptible_countryB_vac2 + infectious_countryA_vac0_virW + infectious_countryA_vac0_virM + infectious_countryA_vac1_virW + infectious_countryA_vac1_virM + infectious_countryA_vac2_virW + infectious_countryA_vac2_virM + infectious_countryB_vac0_virW + infectious_countryB_vac0_virM + infectious_countryB_vac1_virW + infectious_countryB_vac1_virM + infectious_countryB_vac2_virW + infectious_countryB_vac2_virM + recovered_countryA_vac0_virW + recovered_countryA_vac0_virM + recovered_countryA_vac1_virW + recovered_countryA_vac1_virM + recovered_countryA_vac2_virW + recovered_countryA_vac2_virM + recovered_countryB_vac0_virW + recovered_countryB_vac0_virM + recovered_countryB_vac1_virW + recovered_countryB_vac1_virM + recovered_countryB_vac2_virW + recovered_countryB_vac2_virM)*distance_countryA_countryB/(susceptible_countryB_vac0 + susceptible_countryB_vac1 + susceptible_countryB_vac2 + infectious_countryB_vac0_virW + infectious_countryB_vac0_virM + infectious_countryB_vac1_virW + infectious_countryB_vac1_virM + infectious_countryB_vac2_virW + infectious_countryB_vac2_virM + recovered_countryB_vac0_virW + recovered_countryB_vac0_virM + recovered_countryB_vac1_virW + recovered_countryB_vac1_virM + recovered_countryB_vac2_virW + recovered_countryB_vac2_virM);  // modifiers: susceptible_countryA_vac0, susceptible_countryA_vac1, susceptible_countryA_vac2, susceptible_countryB_vac1, susceptible_countryB_vac2, infectious_countryA_vac0_virW, infectious_countryA_vac0_virM, infectious_countryA_vac1_virW, infectious_countryA_vac1_virM, infectious_countryA_vac2_virW, infectious_countryB_vac0_virW, infectious_countryB_vac1_virW, infectious_countryB_vac1_virM, infectious_countryB_vac2_virW, infectious_countryB_vac2_virM, recovered_countryA_vac0_virW, recovered_countryA_vac0_virM, recovered_countryA_vac1_virW, recovered_countryA_vac1_virM, recovered_countryA_vac2_virW, recovered_countryA_vac2_virM, recovered_countryB_vac0_virW, recovered_countryB_vac0_virM, recovered_countryB_vac1_virW, recovered_countryB_vac1_virM, recovered_countryB_vac2_virW, recovered_countryB_vac2_virM, dead_countryA_vac0_virW, dead_countryA_vac0_virM, dead_countryA_vac1_virW, dead_countryA_vac1_virM, dead_countryA_vac2_virW, dead_countryA_vac2_virM, dead_countryB_vac0_virW, dead_countryB_vac0_virM, dead_countryB_vac1_virW, dead_countryB_vac1_virM, dead_countryB_vac2_virW, dead_countryB_vac2_virM
  susceptible_countryB_vac1_to_infectious_countryA_vac2_virM: susceptible_countryB_vac1 + infectious_countryA_vac2_virM => infectious_countryB_vac1_virM + infectious_countryA_vac2_virM; beta*eta_virM*(1 - delta_vac1_virM)*(1 - gamma)*susceptible_countryB_vac1*infectious_countryA_vac2_virM*(susceptible_countryB_vac0 + susceptible_countryB_vac1 + susceptible_countryB_vac2 + infectious_countryB_vac0_virW + infectious_countryB_vac0_virM + infectious_countryB_vac1_virW + infectious_countryB_vac1_virM + infectious_countryB_vac2_virW + infectious_countryB_vac2_virM + recovered_countryB_vac0_virW + recovered_countryB_vac0_virM + recovered_countryB_vac1_virW + recovered_countryB_vac1_virM + recovered_countryB_vac2_virW + recovered_countryB_vac2_virM)/(susceptible_countryA_vac0 + susceptible_countryA_vac1 + susceptible_countryA_vac2 + susceptible_countryB_vac0 + susceptible_countryB_vac1 + susceptible_countryB_vac2 + infectious_countryA_vac0_virW + infectious_countryA_vac0_virM + infectious_countryA_vac1_virW + infectious_countryA_vac1_virM + infectious_countryA_vac2_virW + infectious_countryA_vac2_virM + infectious_countryB_vac0_virW + infectious_countryB_vac0_virM + infectious_countryB_vac1_virW + infectious_countryB_vac1_virM + infectious_countryB_vac2_virW + infectious_countryB_vac2_virM + recovered_countryA_vac0_virW + recovered_countryA_vac0_virM + recovered_countryA_vac1_virW + recovered_countryA_vac1_virM + recovered_countryA_vac2_virW + recovered_countryA_vac2_virM + recovered_countryB_vac0_virW + recovered_countryB_vac0_virM + recovered_countryB_vac1_virW + recovered_countryB_vac1_virM + recovered_countryB_vac2_virW + recovered_countryB_vac2_virM)*distance_countryA_countryB/(susceptible_countryB_vac0 + susceptible_countryB_vac1 + susceptible_countryB_vac2 + infectious_countryB_vac0_virW + infectious_countryB_vac0_virM + infectious_countryB_vac1_virW + infectious_countryB_vac1_virM + infectious_countryB_vac2_virW + infectious_countryB_vac2_virM + recovered_countryB_vac0_virW + recovered_countryB_vac0_virM + recovered_countryB_vac1_virW + recovered_countryB_vac1_virM + recovered_countryB_vac2_virW + recovered_countryB_vac2_virM);  // modifiers: susceptible_countryA_vac0, susceptible_countryA_vac1, susceptible_countryA_vac2, susceptible_countryB_vac0, susceptible_countryB_vac2, infectious_countryA_vac0_virW, infectious_countryA_vac0_virM, infectious_countryA_vac1_virW, infectious_countryA_vac1_virM, infectious_countryA_vac2_virW, infectious_countryB_vac0_virW, infectious_countryB_vac0_virM, infectious_countryB_vac1_virW, infectious_countryB_vac2_virW, infectious_countryB_vac2_virM, recovered_countryA_vac0_virW, recovered_countryA_vac0_virM, recovered_countryA_vac1_virW, recovered_countryA_vac1_virM, recovered_countryA_vac2_virW, recovered_countryA_vac2_virM, recovered_countryB_vac0_virW, recovered_countryB_vac0_virM, recovered_countryB_vac1_virW, recovered_countryB_vac1_virM, recovered_countryB_vac2_virW, recovered_countryB_vac2_virM, dead_countryA_vac0_virW, dead_countryA_vac0_virM, dead_countryA_vac1_virW, dead_countryA_vac1_virM, dead_countryA_vac2_virW, dead_countryA_vac2_virM, dead_countryB_vac0_virW, dead_countryB_vac0_virM, dead_countryB_vac1_virW, dead_countryB_vac1_virM, dead_countryB_vac2_virW, dead_countryB_vac2_virM
  susceptible_countryB_vac2_to_infectious_countryA_vac2_virM: susceptible_countryB_vac2 + infectious_countryA_vac2_virM => infectious_countryB_vac2_virM + infectious_countryA_vac2_virM; beta*eta_virM*(1 - delta_vac2_virM)*(1 - gamma)*susceptible_countryB_vac2*infectious_countryA_vac2_virM*(susceptible_countryB_vac0 + susceptible_countryB_vac1 + susceptible_countryB_vac2 + infectious_countryB_vac0_virW + infectious_countryB_vac0_virM + infectious_countryB_vac1_virW + infectious_countryB_vac1_virM + infectious_countryB_vac2_virW + infectious_countryB_vac2_virM + recovered_countryB_vac0_virW + recovered_countryB_vac0_virM + recovered_countryB_vac1_virW + recovered_countryB_vac1_virM + recovered_countryB_vac2_virW + recovered_countryB_vac2_virM)/(susceptible_countryA_vac0 + susceptible_countryA_vac1 + susceptible_countryA_vac2 + susceptible_countryB_vac0 + susceptible_countryB_vac1 + susceptible_countryB_vac2 + infectious_countryA_vac0_virW + infectious_countryA_vac0_virM + infectious_countryA_vac1_virW + infectious_countryA_vac1_virM + infectious_countryA_vac2_virW + infectious_countryA_vac2_virM + infectious_countryB_vac0_virW + infectious_countryB_vac0_virM + infectious_countryB_vac1_virW + infectious_countryB_vac1_virM + infectious_countryB_vac2_virW + infectious_countryB_vac2_virM + recovered_countryA_vac0_virW + recovered_countryA_vac0_virM + recovered_countryA_vac1_virW + recovered_countryA_vac1_virM + recovered_countryA_vac2_virW + recovered_countryA_vac2_virM + recovered_countryB_vac0_virW + recovered_countryB_vac0_virM + recovered_countryB_vac1_virW + recovered_countryB_vac1_virM + recovered_countryB_vac2_virW + recovered_countryB_vac2_virM)*distance_countryA_countryB/(susceptible_countryB_vac0 + susceptible_countryB_vac1 + susceptible_countryB_vac2 + infectious_countryB_vac0_virW + infectious_countryB_vac0_virM + infectious_countryB_vac1_virW + infectious_countryB_vac1_virM + infectious_countryB_vac2_virW + infectious_countryB_vac2_virM + recovered_countryB_vac0_virW + recovered_countryB_vac0_virM + recovered_countryB_vac1_virW + recovered_countryB_vac1_virM + recovered_countryB_vac2_virW + recovered_countryB_vac2_virM);  // modifiers: susceptible_countryA_vac0, susceptible_countryA_vac1, susceptible_countryA_vac2, susceptible_countryB_vac0, susceptible_countryB_vac1, infectious_countryA_vac0_virW, infectious_countryA_vac0_virM, infectious_countryA_vac1_virW, infectious_countryA_vac1_virM, infectious_countryA_vac2_virW, infectious_countryB_vac0_virW, infectious_countryB_vac0_virM, infectious_countryB_vac1_virW, infectious_countryB_vac1_virM, infectious_countryB_vac2_virW, recovered_countryA_vac0_virW, recovered_countryA_vac0_virM, recovered_countryA_vac1_virW, recovered_countryA_vac1_virM, recovered_countryA_vac2_virW, recovered_countryA_vac2_virM, recovered_countryB_vac0_virW, recovered_countryB_vac0_virM, recovered_countryB_vac1_virW, recovered_countryB_vac1_virM, recovered_countryB_vac2_virW, recovered_countryB_vac2_virM, dead_countryA_vac0_virW, dead_countryA_vac0_virM, dead_countryA_vac1_virW, dead_countryA_vac1_virM, dead_countryA_vac2_virW, dead_countryA_vac2_virM, dead_countryB_vac0_virW, dead_countryB_vac0_virM, dead_countryB_vac1_virW, dead_countryB_vac1_virM, dead_countryB_vac2_virW, dead_countryB_vac2_virM
  susceptible_countryA_vac0_to_infectious_countryB_vac0_virW: susceptible_countryA_vac0 + infectious_countryB_vac0_virW => infectious_countryA_vac0_virW + infectious_countryB_vac0_virW; beta*eta_virW*(1 - 0)*(1 - 0)*susceptible_countryA_vac0*infectious_countryB_vac0_virW*(susceptible_countryA_vac0 + susceptible_countryA_vac1 + susceptible_countryA_vac2 + infectious_countryA_vac0_virW + infectious_countryA_vac0_virM + infectious_countryA_vac1_virW + infectious_countryA_vac1_virM + infectious_countryA_vac2_virW + infectious_countryA_vac2_virM + recovered_countryA_vac0_virW + recovered_countryA_vac0_virM + recovered_countryA_vac1_virW + recovered_countryA_vac1_virM + recovered_countryA_vac2_virW + recovered_countryA_vac2_virM)/(susceptible_countryA_vac0 + susceptible_countryA_vac1 + susceptible_countryA_vac2 + susceptible_countryB_vac0 + susceptible_countryB_vac1 + susceptible_countryB_vac2 + infectious_countryA_vac0_virW + infectious_countryA_vac0_virM + infectious_countryA_vac1_virW + infectious_countryA_vac1_virM + infectious_countryA_vac2_virW + infectious_countryA_vac2_virM + infectious_countryB_vac0_virW + infectious_countryB_vac0_virM + infectious_countryB_vac1_virW + infectious_countryB_vac1_virM + infectious_countryB_vac2_virW + infectious_countryB_vac2_virM + recovered_countryA_vac0_virW + recovered_countryA_vac0_virM + recovered_countryA_vac1_virW + recovered_countryA_vac1_virM + recovered_countryA_vac2_virW + recovered_countryA_vac2_virM + recovered_countryB_vac0_virW + recovered_countryB_vac0_virM + recovered_countryB_vac1_virW + recovered_countryB_vac1_virM + recovered_countryB_vac2_virW + recovered_countryB_vac2_virM)*distance_countryB_countryA/(susceptible_countryA_vac0 + susceptible_countryA_vac1 + susceptible_countryA_vac2 + infectious_countryA_vac0_virW + infectious_countryA_vac0_virM + infectious_countryA_vac1_virW + infectious_countryA_vac1_virM + infectious_countryA_vac2_virW + infectious_countryA_vac2_virM + recovered_countryA_vac0_virW + recovered_countryA_vac0_virM + recovered_countryA_vac1_virW + recovered_countryA_vac1_virM + recovered_countryA_vac2_virW + recovered_countryA_vac2_virM);  // modifiers: susceptible_countryA_vac1, susceptible_countryA_vac2, susceptible_countryB_vac0, susceptible_countryB_vac1, susceptible_countryB_vac2, infectious_countryA_vac0_virM, infectious_countryA_vac1_virW, infectious_countryA_vac1_virM, infectious_countryA_vac2_virW, infectious_countryA_vac2_virM, infectious_countryB_vac0_virM, infectious_countryB_vac1_virW, infectious_countryB_vac1_virM, infectious_countryB_vac2_virW, infectious_countryB_vac2_virM, recovered_countryA_vac0_virW, recovered_countryA_vac0_virM, recovered_countryA_vac1_virW, recovered_countryA_vac1_virM, recovered_countryA_vac2_virW, recovered_countryA_vac2_virM, recovered_countryB_vac0_virW, recovered_countryB_vac0_virM, recovered_countryB_vac1_virW, recovered_countryB_vac1_virM, recovered_countryB_vac2_virW, recovered_countryB_vac2_virM, dead_countryA_vac0_virW, dead_countryA_vac0_virM, dead_countryA_vac1_virW, dead_countryA_vac1_virM, dead_countryA_vac2_virW, dead_countryA_vac2_virM, dead_countryB_vac0_virW, dead_countryB_vac0_virM, dead_countryB_vac1_virW, dead_countryB_vac1_virM, dead_countryB_vac2_virW, dead_countryB_vac2_virM
  susceptible_countryA_vac1_to_infectious_countryB_vac0_virW: susceptible_countryA_vac1 + infectious_countryB_vac0_virW => infectious_countryA_vac1_virW + infectious_countryB_vac0_virW; beta*eta_virW*(1 - delta_vac1_virW)*(1 - 0)*susceptible_countryA_vac1*infectious_countryB_vac0_virW*(susceptible_countryA_vac0 + susceptible_countryA_vac1 + susceptible_countryA_vac2 + infectious_countryA_vac0_virW + infectious_countryA_vac0_virM + infectious_countryA_vac1_virW + infectious_countryA_vac1_virM + infectious_countryA_vac2_virW + infectious_countryA_vac2_virM + recovered_countryA_vac0_virW + recovered_countryA_vac0_virM + recovered_countryA_vac1_virW + recovered_countryA_vac1_virM + recovered_countryA_vac2_virW + recovered_countryA_vac2_virM)/(susceptible_countryA_vac0 + susceptible_countryA_vac1 + susceptible_countryA_vac2 + susceptible_countryB_vac0 + susceptible_countryB_vac1 + susceptible_countryB_vac2 + infectious_countryA_vac0_virW + infectious_countryA_vac0_virM + infectious_countryA_vac1_virW + infectious_countryA_vac1_virM + infectious_countryA_vac2_virW + infectious_countryA_vac2_virM + infectious_countryB_vac0_virW + infectious_countryB_vac0_virM + infectious_countryB_vac1_virW + infectious_countryB_vac1_virM + infectious_countryB_vac2_virW + infectious_countryB_vac2_virM + recovered_countryA_vac0_virW + recovered_countryA_vac0_virM + recovered_countryA_vac1_virW + recovered_countryA_vac1_virM + recovered_countryA_vac2_virW + recovered_countryA_vac2_virM + recovered_countryB_vac0_virW + recovered_countryB_vac0_virM + recovered_countryB_vac1_virW + recovered_countryB_vac1_virM + recovered_countryB_vac2_virW + recovered_countryB_vac2_virM)*distance_countryB_countryA/(susceptible_countryA_vac0 + susceptible_countryA_vac1 + susceptible_countryA_vac2 + infectious_countryA_vac0_virW + infectious_countryA_vac0_virM + infectious_countryA_vac1_virW + infectious_countryA_vac1_virM + infectious_countryA_vac2_virW + infectious_countryA_vac2_virM + recovered_countryA_vac0_virW + recovered_countryA_vac0_virM + recovered_countryA_vac1_virW + recovered_countryA_vac1_virM + recovered_countryA_vac2_virW + recovered_countryA_vac2_virM);  // modifiers: susceptible_countryA_vac0, susceptible_countryA_vac2, susceptible_countryB_vac0, susceptible_countryB_vac1, susceptible_countryB_vac2, infectious_countryA_vac0_virW, infectious_countryA_vac0_virM, infectious_countryA_vac1_virM, infectious_countryA_vac2_virW, infectious_countryA_vac2_virM, infectious_countryB_vac0_virM, infectious_countryB_vac1_virW, infectious_countryB_vac1_virM, infectious_countryB_vac2_virW, infectious_countryB_vac2_virM, recovered_countryA_vac0_virW, recovered_countryA_vac0_virM, recovered_countryA_vac1_virW, recovered_countryA_vac1_virM, recovered_countryA_vac2_virW, recovered_countryA_vac2_virM, recovered_countryB_vac0_virW, recovered_countryB_vac0_virM, recovered_countryB_vac1_virW, recovered_countryB_vac1_virM, recovered_countryB_vac2_virW, recovered_countryB_vac2_virM, dead_countryA_vac0_virW, dead_countryA_vac0_virM, dead_countryA_vac1_virW, dead_countryA_vac1_virM, dead_countryA_vac2_virW, dead_countryA_vac2_virM, dead_countryB_vac0_virW, dead_countryB_vac0_virM, dead_countryB_vac1_virW, dead_countryB_vac1_virM, dead_countryB_vac2_virW, dead_countryB_vac2_virM
  susceptible_countryA_vac2_to_infectious_countryB_vac0_virW: susceptible_countryA_vac2 + infectious_countryB_vac0_virW => infectious_countryA_vac2_virW + infectious_countryB_vac0_virW; beta*eta_virW*(1 - delta_vac2_virW)*(1 - 0)*susceptible_countryA_vac2*infectious_countryB_vac0_virW*(susceptible_countryA_vac0 + susceptible_countryA_vac1 + susceptible_countryA_vac2 + infectious_countryA_vac0_virW + infectious_countryA_vac0_virM + infectious_countryA_vac1_virW + infectious_countryA_vac1_virM + infectious_countryA_vac2_virW + infectious_countryA_vac2_virM + recovered_countryA_vac0_virW + recovered_countryA_vac0_virM + recovered_countryA_vac1_virW + recovered_countryA_vac1_virM + recovered_countryA_vac2_virW + recovered_countryA_vac2_virM)/(susceptible_countryA_vac0 + susceptible_countryA_vac1 + susceptible_countryA_vac2 + susceptible_countryB_vac0 + susceptible_countryB_vac1 + susceptible_countryB_vac2 + infectious_countryA_vac0_virW + infectious_countryA_vac0_virM + infectious_countryA_vac1_virW + infectious_countryA_vac1_virM + infectious_countryA_vac2_virW + infectious_countryA_vac2_virM + infectious_countryB_vac0_virW + infectious_countryB_vac0_virM + infectious_countryB_vac1_virW + infectious_countryB_vac1_virM + infectious_countryB_vac2_virW + infectious_countryB_vac2_virM + recovered_countryA_vac0_virW + recovered_countryA_vac0_virM + recovered_countryA_vac1_virW + recovered_countryA_vac1_virM + recovered_countryA_vac2_virW + recovered_countryA_vac2_virM + recovered_countryB_vac0_virW + recovered_countryB_vac0_virM + recovered_countryB_vac1_virW + recovered_countryB_vac1_virM + recovered_countryB_vac2_virW + recovered_countryB_vac2_virM)*distance_countryB_countryA/(susceptible_countryA_vac0 + susceptible_countryA_vac1 + susceptible_countryA_vac2 + infectious_countryA_vac0_virW + infectious_countryA_vac0_virM + infectious_countryA_vac1_virW + infectious_countryA_vac1_virM + infectious_countryA_vac2_virW + infectious_countryA_vac2_virM + recovered_countryA_vac0_virW + recovered_countryA_vac0_virM + recovered_countryA_vac1_virW + recovered_countryA_vac1_virM + recovered_countryA_vac2_virW + recovered_countryA_vac2_virM);  // modifiers: susceptible_countryA_vac0, susceptible_countryA_vac1, susceptible_countryB_vac0, susceptible_countryB_vac1, susceptible_countryB_vac2, infectious_countryA_vac0_virW, infectious_countryA_vac0_virM, infectious_countryA_vac1_virW, infectious_countryA_vac1_virM, infectious_countryA_vac2_virM, infectious_countryB_vac0_virM, infectious_countryB_vac1_virW, infectious_countryB_vac1_virM, infectious_countryB_vac2_virW, infectious_countryB_vac2_virM, recovered_countryA_vac0_virW, recovered_countryA_vac0_virM, recovered_countryA_vac1_virW, recovered_countryA_vac1_virM, recovered_countryA_vac2_virW, recovered_countryA_vac2_virM, recovered_countryB_vac0_virW, recovered_countryB_vac0_virM, recovered_countryB_vac1_virW, recovered_countryB_vac1_virM, recovered_countryB_vac2_virW, recovered_countryB_vac2_virM, dead_countryA_vac0_virW, dead_countryA_vac0_virM, dead_countryA_vac1_virW, dead_countryA_vac1_virM, dead_countryA_vac2_virW, dead_countryA_vac2_virM, dead_countryB_vac0_virW, dead_countryB_vac0_virM, dead_countryB_vac1_virW, dead_countryB_vac1_virM, dead_countryB_vac2_virW, dead_countryB_vac2_virM
  susceptible_countryB_vac0_to_infectious_countryB_vac0_virW: susceptible_countryB_vac0 + infectious_countryB_vac0_virW => 2 infectious_countryB_vac0_virW; beta*eta_virW*(1 - 0)*(1 - 0)*susceptible_countryB_vac0*infectious_countryB_vac0_virW*(1 - (susceptible_countryA_vac0 + susceptible_countryA_vac1 + susceptible_countryA_vac2 + infectious_countryA_vac0_virW + infectious_countryA_vac0_virM + infectious_countryA_vac1_virW + infectious_countryA_vac1_virM + infectious_countryA_vac2_virW + infectious_countryA_vac2_virM + recovered_countryA_vac0_virW + recovered_countryA_vac0_virM + recovered_countryA_vac1_virW + recovered_countryA_vac1_virM + recovered_countryA_vac2_virW + recovered_countryA_vac2_virM)/(susceptible_countryA_vac0 + susceptible_countryA_vac1 + susceptible_countryA_vac2 + susceptible_countryB_vac0 + susceptible_countryB_vac1 + susceptible_countryB_vac2 + infectious_countryA_vac0_virW + infectious_countryA_vac0_virM + infectious_countryA_vac1_virW + infectious_countryA_vac1_virM + infectious_countryA_vac2_virW + infectious_countryA_vac2_virM + infectious_countryB_vac0_virW + infectious_countryB_vac0_virM + infectious_countryB_vac1_virW + infectious_countryB_vac1_virM + infectious_countryB_vac2_virW + infectious_countryB_vac2_virM + recovered_countryA_vac0_virW + recovered_countryA_vac0_virM + recovered_countryA_vac1_virW + recovered_countryA_vac1_virM + recovered_countryA_vac2_virW + recovered_countryA_vac2_virM + recovered_countryB_vac0_virW + recovered_countryB_vac0_virM + recovered_countryB_vac1_virW + recovered_countryB_vac1_virM + recovered_countryB_vac2_virW + recovered_countryB_vac2_virM)*distance_countryB_countryA)/(susceptible_countryB_vac0 + susceptible_countryB_vac1 + susceptible_countryB_vac2 + infectious_countryB_vac0_virW + infectious_countryB_vac0_virM + infectious_countryB_vac1_virW + infectious_countryB_vac1_virM + infectious_countryB_vac2_virW + infectious_countryB_vac2_virM + recovered_countryB_vac0_virW + recovered_countryB_vac0_virM + recovered_countryB_vac1_virW + recovered_countryB_vac1_virM + recovered_countryB_vac2_virW + recovered_countryB_vac2_virM);  // modifiers: susceptible_countryA_vac0, susceptible_countryA_vac1, susceptible_countryA_vac2, susceptible_countryB_vac1, susceptible_countryB_vac2, infectious_countryA_vac0_virW, infectious_countryA_vac0_virM, infectious_countryA_vac1_virW, infectious_countryA_vac1_virM, infectious_countryA_vac2_virW, infectious_countryA_vac2_virM, infectious_countryB_vac0_virM, infectious_countryB_vac1_virW, infectious_countryB_vac1_virM, infectious_countryB_vac2_virW, infectious_countryB_vac2_virM, recovered_countryA_vac0_virW, recovered_countryA_vac0_virM, recovered_countryA_vac1_virW, recovered_countryA_vac1_virM, recovered_countryA_vac2_virW, recovered_countryA_vac2_virM, recovered_countryB_vac0_virW, recovered_countryB_vac0_virM, recovered_countryB_vac1_virW, recovered_countryB_vac1_virM, recovered_countryB_vac2_virW, recovered_countryB_vac2_virM, dead_countryA_vac0_virW, dead_countryA_vac0_virM, dead_countryA_vac1_virW, dead_countryA_vac1_virM, dead_countryA_vac2_virW, dead_countryA_vac2_virM, dead_countryB_vac0_virW, dead_countryB_vac0_virM, dead_countryB_vac1_virW, dead_countryB_vac1_virM, dead_countryB_vac2_virW, dead_countryB_vac2_virM
  susceptible_countryB_vac1_to_infectious_countryB_vac0_virW: susceptible_countryB_vac1 + infectious_countryB_vac0_virW => infectious_countryB_vac1_virW + infectious_countryB_vac0_virW; beta*eta_virW*(1 - delta_vac1_virW)*(1 - 0)*susceptible_countryB_vac1*infectious_countryB_vac0_virW*(1 - (susceptible_countryA_vac0 + susceptible_countryA_vac1 + susceptible_countryA_vac2 + infectious_countryA_vac0_virW + infectious_countryA_vac0_virM + infectious_countryA_vac1_virW + infectious_countryA_vac1_virM + infectious_countryA_vac2_virW + infectious_countryA_vac2_virM + recovered_countryA_vac0_virW + recovered_countryA_vac0_virM + recovered_countryA_vac1_virW + recovered_countryA_vac1_virM + recovered_countryA_vac2_virW + recovered_countryA_vac2_virM)/(susceptible_countryA_vac0 + susceptible_countryA_vac1 + susceptible_countryA_vac2 + susceptible_countryB_vac0 + susceptible_countryB_vac1 + susceptible_countryB_vac2 + infectious_countryA_vac0_virW + infectious_countryA_vac0_virM + infectious_countryA_vac1_virW + infectious_countryA_vac1_virM + infectious_countryA_vac2_virW + infectious_countryA_vac2_virM + infectious_countryB_vac0_virW + infectious_countryB_vac0_virM + infectious_countryB_vac1_virW + infectious_countryB_vac1_virM + infectious_countryB_vac2_virW + infectious_countryB_vac2_virM + recovered_countryA_vac0_virW + recovered_countryA_vac0_virM + recovered_countryA_vac1_virW + recovered_countryA_vac1_virM + recovered_countryA_vac2_virW + recovered_countryA_vac2_virM + recovered_countryB_vac0_virW + recovered_countryB_vac0_virM + recovered_countryB_vac1_virW + recovered_countryB_vac1_virM + recovered_countryB_vac2_virW + recovered_countryB_vac2_virM)*distance_countryB_countryA)/(susceptible_countryB_vac0 + susceptible_countryB_vac1 + susceptible_countryB_vac2 + infectious_countryB_vac0_virW + infectious_countryB_vac0_virM + infectious_countryB_vac1_virW + infectious_countryB_vac1_virM + infectious_countryB_vac2_virW + infectious_countryB_vac2_virM + recovered_countryB_vac0_virW + recovered_countryB_vac0_virM + recovered_countryB_vac1_virW + recovered_countryB_vac1_virM + recovered_countryB_vac2_virW + recovered_countryB_vac2_virM);  // modifiers: susceptible_countryA_vac0, susceptible_countryA_vac1, susceptible_countryA_vac2, susceptible_countryB_vac0, susceptible_countryB_vac2, infectious_countryA_vac0_virW, infectious_countryA_vac0_virM, infectious_countryA_vac1_virW, infectious_countryA_vac1_virM, infectious_countryA_vac2_virW, infectious_countryA_vac2_virM, infectious_countryB_vac0_virM, infectious_countryB_vac1_virM, infectious_countryB_vac2_virW, infectious_countryB_vac2_virM, recovered_countryA_vac0_virW, recovered_countryA_vac0_virM, recovered_countryA_vac1_virW, recovered_countryA_vac1_virM, recovered_countryA_vac2_virW, recovered_countryA_vac2_virM, recovered_countryB_vac0_virW, recovered_countryB_vac0_virM, recovered_countryB_vac1_virW, recovered_countryB_vac1_virM, recovered_countryB_vac2_virW, recovered_countryB_vac2_virM, dead_countryA_vac0_virW, dead_countryA_vac0_virM, dead_countryA_vac1_virW, dead_countryA_vac1_virM, dead_countryA_vac2_virW, dead_countryA_vac2_virM, dead_countryB_vac0_virW, dead_countryB_vac0_virM, dead_countryB_vac1_virW, dead_countryB_vac1_virM, dead_countryB_vac2_virW, dead_countryB_vac2_virM
  susceptible_countryB_vac2_to_infectious_countryB_vac0_virW: susceptible_countryB_vac2 + infectious_countryB_vac0_virW => infectious_countryB_vac2_virW + infectious_countryB_vac0_virW; beta*eta_virW*(1 - delta_vac2_virW)*(1 - 0)*susceptible_countryB_vac2*infectious_countryB_vac0_virW*(1 - (susceptible_countryA_vac0 + susceptible_countryA_vac1 + susceptible_countryA_vac2 + infectious_countryA_vac0_virW + infectious_countryA_vac0_virM + infectious_countryA_vac1_virW + infectious_countryA_vac1_virM + infectious_countryA_vac2_virW + infectious_countryA_vac2_virM + recovered_countryA_vac0_virW + recovered_countryA_vac0_virM + recovered_countryA_vac1_virW + recovered_countryA_vac1_virM + recovered_countryA_vac2_virW + recovered_countryA_vac2_virM)/(susceptible_countryA_vac0 + susceptible_countryA_vac1 + susceptible_countryA_vac2 + susceptible_countryB_vac0 + susceptible_countryB_vac1 + susceptible_countryB_vac2 + infectious_countryA_vac0_virW + infectious_countryA_vac0_virM + infectious_countryA_vac1_virW + infectious_countryA_vac1_virM + infectious_countryA_vac2_virW + infectious_countryA_vac2_virM + infectious_countryB_vac0_virW + infectious_countryB_vac0_virM + infectious_countryB_vac1_virW + infectious_countryB_vac1_virM + infectious_countryB_vac2_virW + infectious_countryB_vac2_virM + recovered_countryA_vac0_virW + recovered_countryA_vac0_virM + recovered_countryA_vac1_virW + recovered_countryA_vac1_virM + recovered_countryA_vac2_virW + recovered_countryA_vac2_virM + recovered_countryB_vac0_virW + recovered_countryB_vac0_virM + recovered_countryB_vac1_virW + recovered_countryB_vac1_virM + recovered_countryB_vac2_virW + recovered_countryB_vac2_virM)*distance_countryB_countryA)/(susceptible_countryB_vac0 + susceptible_countryB_vac1 + susceptible_countryB_vac2 + infectious_countryB_vac0_virW + infectious_countryB_vac0_virM + infectious_countryB_vac1_virW + infectious_countryB_vac1_virM + infectious_countryB_vac2_virW + infectious_countryB_vac2_virM + recovered_countryB_vac0_virW + recovered_countryB_vac0_virM + recovered_countryB_vac1_virW + recovered_countryB_vac1_virM + recovered_countryB_vac2_virW + recovered_countryB_vac2_virM);  // modifiers: susceptible_countryA_vac0, susceptible_countryA_vac1, susceptible_countryA_vac2, susceptible_countryB_vac0, susceptible_countryB_vac1, infectious_countryA_vac0_virW, infectious_countryA_vac0_virM, infectious_countryA_vac1_virW, infectious_countryA_vac1_virM, infectious_countryA_vac2_virW, infectious_countryA_vac2_virM, infectious_countryB_vac0_virM, infectious_countryB_vac1_virW, infectious_countryB_vac1_virM, infectious_countryB_vac2_virM, recovered_countryA_vac0_virW, recovered_countryA_vac0_virM, recovered_countryA_vac1_virW, recovered_countryA_vac1_virM, recovered_countryA_vac2_virW, recovered_countryA_vac2_virM, recovered_countryB_vac0_virW, recovered_countryB_vac0_virM, recovered_countryB_vac1_virW, recovered_countryB_vac1_virM, recovered_countryB_vac2_virW, recovered_countryB_vac2_virM, dead_countryA_vac0_virW, dead_countryA_vac0_virM, dead_countryA_vac1_virW, dead_countryA_vac1_virM, dead_countryA_vac2_virW, dead_countryA_vac2_virM, dead_countryB_vac0_virW, dead_countryB_vac0_virM, dead_countryB_vac1_virW, dead_countryB_vac1_virM, dead_countryB_vac2_virW, dead_countryB_vac2_virM
  susceptible_countryA_vac0_to_infectious_countryB_vac0_virM: susceptible_countryA_vac0 + infectious_countryB_vac0_virM => infectious_countryA_vac0_virM + infectious_countryB_vac0_virM; beta*eta_virM*(1 - 0)*(1 - 0)*susceptible_countryA_vac0*infectious_countryB_vac0_virM*(susceptible_countryA_vac0 + susceptible_countryA_vac1 + susceptible_countryA_vac2 + infectious_countryA_vac0_virW + infectious_countryA_vac0_virM + infectious_countryA_vac1_virW + infectious_countryA_vac1_virM + infectious_countryA_vac2_virW + infectious_countryA_vac2_virM + recovered_countryA_vac0_virW + recovered_countryA_vac0_virM + recovered_countryA_vac1_virW + recovered_countryA_vac1_virM + recovered_countryA_vac2_virW + recovered_countryA_vac2_virM)/(susceptible_countryA_vac0 + susceptible_countryA_vac1 + susceptible_countryA_vac2 + susceptible_countryB_vac0 + susceptible_countryB_vac1 + susceptible_countryB_vac2 + infectious_countryA_vac0_virW + infectious_countryA_vac0_virM + infectious_countryA_vac1_virW + infectious_countryA_vac1_virM + infectious_countryA_vac2_virW + infectious_countryA_vac2_virM + infectious_countryB_vac0_virW + infectious_countryB_vac0_virM + infectious_countryB_vac1_virW + infectious_countryB_vac1_virM + infectious_countryB_vac2_virW + infectious_countryB_vac2_virM + recovered_countryA_vac0_virW + recovered_countryA_vac0_virM + recovered_countryA_vac1_virW + recovered_countryA_vac1_virM + recovered_countryA_vac2_virW + recovered_countryA_vac2_virM + recovered_countryB_vac0_virW + recovered_countryB_vac0_virM + recovered_countryB_vac1_virW + recovered_countryB_vac1_virM + recovered_countryB_vac2_virW + recovered_countryB_vac2_virM)*distance_countryB_countryA/(susceptible_countryA_vac0 + susceptible_countryA_vac1 + susceptible_countryA_vac2 + infectious_countryA_vac0_virW + infectious_countryA_vac0_virM + infectious_countryA_vac1_virW + infectious_countryA_vac1_virM + infectious_countryA_vac2_virW + infectious_countryA_vac2_virM + recovered_countryA_vac0_virW + recovered_countryA_vac0_virM + recovered_countryA_vac1_virW + recovered_countryA_vac1_virM + recovered_countryA_vac2_virW + recovered_countryA_vac2_virM);  // modifiers: susceptible_countryA_vac1, susceptible_countryA_vac2, susceptible_countryB_vac0, susceptible_countryB_vac1, susceptible_countryB_vac2, infectious_countryA_vac0_virW, infectious_countryA_vac1_virW, infectious_countryA_vac1_virM, infectious_countryA_vac2_virW, infectious_countryA_vac2_virM, infectious_countryB_vac0_virW, infectious_countryB_vac1_virW, infectious_countryB_vac1_virM, infectious_countryB_vac2_virW, infectious_countryB_vac2_virM, recovered_countryA_vac0_virW, recovered_countryA_vac0_virM, recovered_countryA_vac1_virW, recovered_countryA_vac1_virM, recovered_countryA_vac2_virW, recovered_countryA_vac2_virM, recovered_countryB_vac0_virW, recovered_countryB_vac0_virM, recovered_countryB_vac1_virW, recovered_countryB_vac1_virM, recovered_countryB_vac2_virW, recovered_countryB_vac2_virM, dead_countryA_vac0_virW, dead_countryA_vac0_virM, dead_countryA_vac1_virW, dead_countryA_vac1_virM, dead_countryA_vac2_virW, dead_countryA_vac2_virM, dead_countryB_vac0_virW, dead_countryB_vac0_virM, dead_countryB_vac1_virW, dead_countryB_vac1_virM, dead_countryB_vac2_virW, dead_countryB_vac2_virM
  susceptible_countryA_vac1_to_infectious_countryB_vac0_virM: susceptible_countryA_vac1 + infectious_countryB_vac0_virM => infectious_countryA_vac1_virM + infectious_countryB_vac0_virM; beta*eta_virM*(1 - delta_vac1_virM)*(1 - 0)*susceptible_countryA_vac1*infectious_countryB_vac0_virM*(susceptible_countryA_vac0 + susceptible_countryA_vac1 + susceptible_countryA_vac2 + infectious_countryA_vac0_virW + infectious_countryA_vac0_virM + infectious_countryA_vac1_virW + infectious_countryA_vac1_virM + infectious_countryA_vac2_virW + infectious_countryA_vac2_virM + recovered_countryA_vac0_virW + recovered_countryA_vac0_virM + recovered_countryA_vac1_virW + recovered_countryA_vac1_virM + recovered_countryA_vac2_virW + recovered_countryA_vac2_virM)/(susceptible_countryA_vac0 + susceptible_countryA_vac1 + susceptible_countryA_vac2 + susceptible_countryB_vac0 + susceptible_countryB_vac1 + susceptible_countryB_vac2 + infectious_countryA_vac0_virW + infectious_countryA_vac0_virM + infectious_countryA_vac1_virW + infectious_countryA_vac1_virM + infectious_countryA_vac2_virW + infectious_countryA_vac2_virM + infectious_countryB_vac0_virW + infectious_countryB_vac0_virM + infectious_countryB_vac1_virW + infectious_countryB_vac1_virM + infectious_countryB_vac2_virW + infectious_countryB_vac2_virM + recovered_countryA_vac0_virW + recovered_countryA_vac0_virM + recovered_countryA_vac1_virW + recovered_countryA_vac1_virM + recovered_countryA_vac2_virW + recovered_countryA_vac2_virM + recovered_countryB_vac0_virW + recovered_countryB_vac0_virM + recovered_countryB_vac1_virW + recovered_countryB_vac1_virM + recovered_countryB_vac2_virW + recovered_countryB_vac2_virM)*distance_countryB_countryA/(susceptible_countryA_vac0 + susceptible_countryA_vac1 + susceptible_countryA_vac2 + infectious_countryA_vac0_virW + infectious_countryA_vac0_virM + infectious_countryA_vac1_virW + infectious_countryA_vac1_virM + infectious_countryA_vac2_virW + infectious_countryA_vac2_virM + recovered_countryA_vac0_virW + recovered_countryA_vac0_virM + recovered_countryA_vac1_virW + recovered_countryA_vac1_virM + recovered_countryA_vac2_virW + recovered_countryA_vac2_virM);  // modifiers: susceptible_countryA_vac0, susceptible_countryA_vac2, susceptible_countryB_vac0, susceptible_countryB_vac1, susceptible_countryB_vac2, infectious_countryA_vac0_virW, infectious_countryA_vac0_virM, infectious_countryA_vac1_virW, infectious_countryA_vac2_virW, infectious_countryA_vac2_virM, infectious_countryB_vac0_virW, infectious_countryB_vac1_virW, infectious_countryB_vac1_virM, infectious_countryB_vac2_virW, infectious_countryB_vac2_virM, recovered_countryA_vac0_virW, recovered_countryA_vac0_virM, recovered_countryA_vac1_virW, recovered_countryA_vac1_virM, recovered_countryA_vac2_virW, recovered_countryA_vac2_virM, recovered_countryB_vac0_virW, recovered_countryB_vac0_virM, recovered_countryB_vac1_virW, recovered_countryB_vac1_virM, recovered_countryB_vac2_virW, recovered_countryB_vac2_virM, dead_countryA_vac0_virW, dead_countryA_vac0_virM, dead_countryA_vac1_virW, dead_countryA_vac1_virM, dead_countryA_vac2_virW, dead_countryA_vac2_virM, dead_countryB_vac0_virW, dead_countryB_vac0_virM, dead_countryB_vac1_virW, dead_countryB_vac1_virM, dead_countryB_vac2_virW, dead_countryB_vac2_virM
  susceptible_countryA_vac2_to_infectious_countryB_vac0_virM: susceptible_countryA_vac2 + infectious_countryB_vac0_virM => infectious_countryA_vac2_virM + infectious_countryB_vac0_virM; beta*eta_virM*(1 - delta_vac2_virM)*(1 - 0)*susceptible_countryA_vac2*infectious_countryB_vac0_virM*(susceptible_countryA_vac0 + susceptible_countryA_vac1 + susceptible_countryA_vac2 + infectious_countryA_vac0_virW + infectious_countryA_vac0_virM + infectious_countryA_vac1_virW + infectious_countryA_vac1_virM + infectious_countryA_vac2_virW + infectious_countryA_vac2_virM + recovered_countryA_vac0_virW + recovered_countryA_vac0_virM + recovered_countryA_vac1_virW + recovered_countryA_vac1_virM + recovered_countryA_vac2_virW + recovered_countryA_vac2_virM)/(susceptible_countryA_vac0 + susceptible_countryA_vac1 + susceptible_countryA_vac2 + susceptible_countryB_vac0 + susceptible_countryB_vac1 + susceptible_countryB_vac2 + infectious_countryA_vac0_virW + infectious_countryA_vac0_virM + infectious_countryA_vac1_virW + infectious_countryA_vac1_virM + infectious_countryA_vac2_virW + infectious_countryA_vac2_virM + infectious_countryB_vac0_virW + infectious_countryB_vac0_virM + infectious_countryB_vac1_virW + infectious_countryB_vac1_virM + infectious_countryB_vac2_virW + infectious_countryB_vac2_virM + recovered_countryA_vac0_virW + recovered_countryA_vac0_virM + recovered_countryA_vac1_virW + recovered_countryA_vac1_virM + recovered_countryA_vac2_virW + recovered_countryA_vac2_virM + recovered_countryB_vac0_virW + recovered_countryB_vac0_virM + recovered_countryB_vac1_virW + recovered_countryB_vac1_virM + recovered_countryB_vac2_virW + recovered_countryB_vac2_virM)*distance_countryB_countryA/(susceptible_countryA_vac0 + susceptible_countryA_vac1 + susceptible_countryA_vac2 + infectious_countryA_vac0_virW + infectious_countryA_vac0_virM + infectious_countryA_vac1_virW + infectious_countryA_vac1_virM + infectious_countryA_vac2_virW + infectious_countryA_vac2_virM + recovered_countryA_vac0_virW + recovered_countryA_vac0_virM + recovered_countryA_vac1_virW + recovered_countryA_vac1_virM + recovered_countryA_vac2_virW + recovered_countryA_vac2_virM);  // modifiers: susceptible_countryA_vac0, susceptible_countryA_vac1, susceptible_countryB_vac0, susceptible_countryB_vac1, susceptible_countryB_vac2, infectious_countryA_vac0_virW, infectious_countryA_vac0_virM, infectious_countryA_vac1_virW, infectious_countryA_vac1_virM, infectious_countryA_vac2_virW, infectious_countryB_vac0_virW, infectious_countryB_vac1_virW, infectious_countryB_vac1_virM, infectious_countryB_vac2_virW, infectious_countryB_vac2_virM, recovered_countryA_vac0_virW, recovered_countryA_vac0_virM, recovered_countryA_vac1_virW, recovered_countryA_vac1_virM, recovered_countryA_vac2_virW, recovered_countryA_vac2_virM, recovered_countryB_vac0_virW, recovered_countryB_vac0_virM, recovered_countryB_vac1_virW, recovered_countryB_vac1_virM, recovered_countryB_vac2_virW, recovered_countryB_vac2_virM, dead_countryA_vac0_virW, dead_countryA_vac0_virM, dead_countryA_vac1_virW, dead_countryA_vac1_virM, dead_countryA_vac2_virW, dead_countryA_vac2_virM, dead_countryB_vac0_virW, dead_countryB_vac0_virM, dead_countryB_vac1_virW, dead_countryB_vac1_virM, dead_countryB_vac2_virW, dead_countryB_vac2_virM
  susceptible_countryB_vac0_to_infectious_countryB_vac0_virM: susceptible_countryB_vac0 + infectious_countryB_vac0_virM => 2 infectious_countryB_vac0_virM; beta*eta_virM*(1 - 0)*(1 - 0)*susceptible_countryB_vac0*infectious_countryB_vac0_virM*(1 - (susceptible_countryA_vac0 + susceptible_countryA_vac1 + susceptible_countryA_vac2 + infectious_countryA_vac0_virW + infectious_countryA_vac0_virM + infectious_countryA_vac1_virW + infectious_countryA_vac1_virM + infectious_countryA_vac2_virW + infectious_countryA_vac2_virM + recovered_countryA_vac0_virW + recovered_countryA_vac0_virM + recovered_countryA_vac1_virW + recovered_countryA_vac1_virM + recovered_countryA_vac2_virW + recovered_countryA_vac2_virM)/(susceptible_countryA_vac0 + susceptible_countryA_vac1 + susceptible_countryA_vac2 + susceptible_countryB_vac0 + susceptible_countryB_vac1 + susceptible_countryB_vac2 + infectious_countryA_vac0_virW + infectious_countryA_vac0_virM + infectious_countryA_vac1_virW + infectious_countryA_vac1_virM + infectious_countryA_vac2_virW + infectious_countryA_vac2_virM + infectious_countryB_vac0_virW + infectious_countryB_vac0_virM + infectious_countryB_vac1_virW + infectious_countryB_vac1_virM + infectious_countryB_vac2_virW + infectious_countryB_vac2_virM + recovered_countryA_vac0_virW + recovered_countryA_vac0_virM + recovered_countryA_vac1_virW + recovered_countryA_vac1_virM + recovered_countryA_vac2_virW + recovered_countryA_vac2_virM + recovered_countryB_vac0_virW + recovered_countryB_vac0_virM + recovered_countryB_vac1_virW + recovered_countryB_vac1_virM + recovered_countryB_vac2_virW + recovered_countryB_vac2_virM)*distance_countryB_countryA)/(susceptible_countryB_vac0 + susceptible_countryB_vac1 + susceptible_countryB_vac2 + infectious_countryB_vac0_virW + infectious_countryB_vac0_virM + infectious_countryB_vac1_virW + infectious_countryB_vac1_virM + infectious_countryB_vac2_virW + infectious_countryB_vac2_virM + recovered_countryB_vac0_virW + recovered_countryB_vac0_virM + recovered_countryB_vac1_virW + recovered_countryB_vac1_virM + recovered_countryB_vac2_virW + recovered_countryB_vac2_virM);  // modifiers: susceptible_countryA_vac0, susceptible_countryA_vac1, susceptible_countryA_vac2, susceptible_countryB_vac1, susceptible_countryB_vac2, infectious_countryA_vac0_virW, infectious_countryA_vac0_virM, infectious_countryA_vac1_virW, infectious_countryA_vac1_virM, infectious_countryA_vac2_virW, infectious_countryA_vac2_virM, infectious_countryB_vac0_virW, infectious_countryB_vac1_virW, infectious_countryB_vac1_virM, infectious_countryB_vac2_virW, infectious_countryB_vac2_virM, recovered_countryA_vac0_virW, recovered_countryA_vac0_virM, recovered_countryA_vac1_virW, recovered_countryA_vac1_virM, recovered_countryA_vac2_virW, recovered_countryA_vac2_virM, recovered_countryB_vac0_virW, recovered_countryB_vac0_virM, recovered_countryB_vac1_virW, recovered_countryB_vac1_virM, recovered_countryB_vac2_virW, recovered_countryB_vac2_virM, dead_countryA_vac0_virW, dead_countryA_vac0_virM, dead_countryA_vac1_virW, dead_countryA_vac1_virM, dead_countryA_vac2_virW, dead_countryA_vac2_virM, dead_countryB_vac0_virW, dead_countryB_vac0_virM, dead_countryB_vac1_virW, dead_countryB_vac1_virM, dead_countryB_vac2_virW, dead_countryB_vac2_virM
  susceptible_countryB_vac1_to_infectious_countryB_vac0_virM: susceptible_countryB_vac1 + infectious_countryB_vac0_virM => infectious_countryB_vac1_virM + infectious_countryB_vac0_virM; beta*eta_virM*(1 - delta_vac1_virM)*(1 - 0)*susceptible_countryB_vac1*infectious_countryB_vac0_virM*(1 - (susceptible_countryA_vac0 + susceptible_countryA_vac1 + susceptible_countryA_vac2 + infectious_countryA_vac0_virW + infectious_countryA_vac0_virM + infectious_countryA_vac1_virW + infectious_countryA_vac1_virM + infectious_countryA_vac2_virW + infectious_countryA_vac2_virM + recovered_countryA_vac0_virW + recovered_countryA_vac0_virM + recovered_countryA_vac1_virW + recovered_countryA_vac1_virM + recovered_countryA_vac2_virW + recovered_countryA_vac2_virM)/(susceptible_countryA_vac0 + susceptible_countryA_vac1 + susceptible_countryA_vac2 + susceptible_countryB_vac0 + susceptible_countryB_vac1 + susceptible_countryB_vac2 + infectious_countryA_vac0_virW + infectious_countryA_vac0_virM + infectious_countryA_vac1_virW + infectious_countryA_vac1_virM + infectious_countryA_vac2_virW + infectious_countryA_vac2_virM + infectious_countryB_vac0_virW + infectious_countryB_vac0_virM + infectious_countryB_vac1_virW + infectious_countryB_vac1_virM + infectious_countryB_vac2_virW + infectious_countryB_vac2_virM + recovered_countryA_vac0_virW + recovered_countryA_vac0_virM + recovered_countryA_vac1_virW + recovered_countryA_vac1_virM + recovered_countryA_vac2_virW + recovered_countryA_vac2_virM + recovered_countryB_vac0_virW + recovered_countryB_vac0_virM + recovered_countryB_vac1_virW + recovered_countryB_vac1_virM + recovered_countryB_vac2_virW + recovered_countryB_vac2_virM)*distance_countryB_countryA)/(susceptible_countryB_vac0 + susceptible_countryB_vac1 + susceptible_countryB_vac2 + infectious_countryB_vac0_virW + infectious_countryB_vac0_virM + infectious_countryB_vac1_virW + infectious_countryB_vac1_virM + infectious_countryB_vac2_virW + infectious_countryB_vac2_virM + recovered_countryB_vac0_virW + recovered_countryB_vac0_virM + recovered_countryB_vac1_virW + recovered_countryB_vac1_virM + recovered_countryB_vac2_virW + recovered_countryB_vac2_virM);  // modifiers: susceptible_countryA_vac0, susceptible_countryA_vac1, susceptible_countryA_vac2, susceptible_countryB_vac0, susceptible_countryB_vac2, infectious_countryA_vac0_virW, infectious_countryA_vac0_virM, infectious_countryA_vac1_virW, infectious_countryA_vac1_virM, infectious_countryA_vac2_virW, infectious_countryA_vac2_virM, infectious_countryB_vac0_virW, infectious_countryB_vac1_virW, infectious_countryB_vac2_virW, infectious_countryB_vac2_virM, recovered_countryA_vac0_virW, recovered_countryA_vac0_virM, recovered_countryA_vac1_virW, recovered_countryA_vac1_virM, recovered_countryA_vac2_virW, recovered_countryA_vac2_virM, recovered_countryB_vac0_virW, recovered_countryB_vac0_virM, recovered_countryB_vac1_virW, recovered_countryB_vac1_virM, recovered_countryB_vac2_virW, recovered_countryB_vac2_virM, dead_countryA_vac0_virW, dead_countryA_vac0_virM, dead_countryA_vac1_virW, dead_countryA_vac1_virM, dead_countryA_vac2_virW, dead_countryA_vac2_virM, dead_countryB_vac0_virW, dead_countryB_vac0_virM, dead_countryB_vac1_virW, dead_countryB_vac1_virM, dead_countryB_vac2_virW, dead_countryB_vac2_virM
  susceptible_countryB_vac2_to_infectious_countryB_vac0_virM: susceptible_countryB_vac2 + infectious_countryB_vac0_virM => infectious_countryB_vac2_virM + infectious_countryB_vac0_virM; beta*eta_virM*(1 - delta_vac2_virM)*(1 - 0)*susceptible_countryB_vac2*infectious_countryB_vac0_virM*(1 - (susceptible_countryA_vac0 + susceptible_countryA_vac1 + susceptible_countryA_vac2 + infectious_countryA_vac0_virW + infectious_countryA_vac0_virM + infectious_countryA_vac1_virW + infectious_countryA_vac1_virM + infectious_countryA_vac2_virW + infectious_countryA_vac2_virM + recovered_countryA_vac0_virW + recovered_countryA_vac0_virM + recovered_countryA_vac1_virW + recovered_countryA_vac1_virM + recovered_countryA_vac2_virW + recovered_countryA_vac2_virM)/(susceptible_countryA_vac0 + susceptible_countryA_vac1 + susceptible_countryA_vac2 + susceptible_countryB_vac0 + susceptible_countryB_vac1 + susceptible_countryB_vac2 + infectious_countryA_vac0_virW + infectious_countryA_vac0_virM + infectious_countryA_vac1_virW + infectious_countryA_vac1_virM + infectious_countryA_vac2_virW + infectious_countryA_vac2_virM + infectious_countryB_vac0_virW + infectious_countryB_vac0_virM + infectious_countryB_vac1_virW + infectious_countryB_vac1_virM + infectious_countryB_vac2_virW + infectious_countryB_vac2_virM + recovered_countryA_vac0_virW + recovered_countryA_vac0_virM + recovered_countryA_vac1_virW + recovered_countryA_vac1_virM + recovered_countryA_vac2_virW + recovered_countryA_vac2_virM + recovered_countryB_vac0_virW + recovered_countryB_vac0_virM + recovered_countryB_vac1_virW + recovered_countryB_vac1_virM + recovered_countryB_vac2_virW + recovered_countryB_vac2_virM)*distance_countryB_countryA)/(susceptible_countryB_vac0 + susceptible_countryB_vac1 + susceptible_countryB_vac2 + infectious_countryB_vac0_virW + infectious_countryB_vac0_virM + infectious_countryB_vac1_virW + infectious_countryB_vac1_virM + infectious_countryB_vac2_virW + infectious_countryB_vac2_virM + recovered_countryB_vac0_virW + recovered_countryB_vac0_virM + recovered_countryB_vac1_virW + recovered_countryB_vac1_virM + recovered_countryB_vac2_virW + recovered_countryB_vac2_virM);  // modifiers: susceptible_countryA_vac0, susceptible_countryA_vac1, susceptible_countryA_vac2, susceptible_countryB_vac0, susceptible_countryB_vac1, infectious_countryA_vac0_virW, infectious_countryA_vac0_virM, infectious_countryA_vac1_virW, infectious_countryA_vac1_virM, infectious_countryA_vac2_virW, infectious_countryA_vac2_virM, infectious_countryB_vac0_virW, infectious_countryB_vac1_virW, infectious_countryB_vac1_virM, infectious_countryB_vac2_virW, recovered_countryA_vac0_virW, recovered_countryA_vac0_virM, recovered_countryA_vac1_virW, recovered_countryA_vac1_virM, recovered_countryA_vac2_virW, recovered_countryA_vac2_virM, recovered_countryB_vac0_virW, recovered_countryB_vac0_virM, recovered_countryB_vac1_virW, recovered_countryB_vac1_virM, recovered_countryB_vac2_virW, recovered_countryB_vac2_virM, dead_countryA_vac0_virW, dead_countryA_vac0_virM, dead_countryA_vac1_virW, dead_countryA_vac1_virM, dead_countryA_vac2_virW, dead_countryA_vac2_virM, dead_countryB_vac0_virW, dead_countryB_vac0_virM, dead_countryB_vac1_virW, dead_countryB_vac1_virM, dead_countryB_vac2_virW, dead_countryB_vac2_virM
  susceptible_countryA_vac0_to_infectious_countryB_vac1_virW: susceptible_countryA_vac0 + infectious_countryB_vac1_virW => infectious_countryA_vac0_virW + infectious_countryB_vac1_virW; beta*eta_virW*(1 - 0)*(1 - gamma)*susceptible_countryA_vac0*infectious_countryB_vac1_virW*(susceptible_countryA_vac0 + susceptible_countryA_vac1 + susceptible_countryA_vac2 + infectious_countryA_vac0_virW + infectious_countryA_vac0_virM + infectious_countryA_vac1_virW + infectious_countryA_vac1_virM + infectious_countryA_vac2_virW + infectious_countryA_vac2_virM + recovered_countryA_vac0_virW + recovered_countryA_vac0_virM + recovered_countryA_vac1_virW + recovered_countryA_vac1_virM + recovered_countryA_vac2_virW + recovered_countryA_vac2_virM)/(susceptible_countryA_vac0 + susceptible_countryA_vac1 + susceptible_countryA_vac2 + susceptible_countryB_vac0 + susceptible_countryB_vac1 + susceptible_countryB_vac2 + infectious_countryA_vac0_virW + infectious_countryA_vac0_virM + infectious_countryA_vac1_virW + infectious_countryA_vac1_virM + infectious_countryA_vac2_virW + infectious_countryA_vac2_virM + infectious_countryB_vac0_virW + infectious_countryB_vac0_virM + infectious_countryB_vac1_virW + infectious_countryB_vac1_virM + infectious_countryB_vac2_virW + infectious_countryB_vac2_virM + recovered_countryA_vac0_virW + recovered_countryA_vac0_virM + recovered_countryA_vac1_virW + recovered_countryA_vac1_virM + recovered_countryA_vac2_virW + recovered_countryA_vac2_virM + recovered_countryB_vac0_virW + recovered_countryB_vac0_virM + recovered_countryB_vac1_virW + recovered_countryB_vac1_virM + recovered_countryB_vac2_virW + recovered_countryB_vac2_virM)*distance_countryB_countryA/(susceptible_countryA_vac0 + susceptible_countryA_vac1 + susceptible_countryA_vac2 + infectious_countryA_vac0_virW + infectious_countryA_vac0_virM + infectious_countryA_vac1_virW + infectious_countryA_vac1_virM + infectious_countryA_vac2_virW + infectious_countryA_vac2_virM + recovered_countryA_vac0_virW + recovered_countryA_vac0_virM + recovered_countryA_vac1_virW + recovered_countryA_vac1_virM + recovered_countryA_vac2_virW + recovered_countryA_vac2_virM);  // modifiers: susceptible_countryA_vac1, susceptible_countryA_vac2, susceptible_countryB_vac0, susceptible_countryB_vac1, susceptible_countryB_vac2, infectious_countryA_vac0_virM, infectious_countryA_vac1_virW, infectious_countryA_vac1_virM, infectious_countryA_vac2_virW, infectious_countryA_vac2_virM, infectious_countryB_vac0_virW, infectious_countryB_vac0_virM, infectious_countryB_vac1_virM, infectious_countryB_vac2_virW, infectious_countryB_vac2_virM, recovered_countryA_vac0_virW, recovered_countryA_vac0_virM, recovered_countryA_vac1_virW, recovered_countryA_vac1_virM, recovered_countryA_vac2_virW, recovered_countryA_vac2_virM, recovered_countryB_vac0_virW, recovered_countryB_vac0_virM, recovered_countryB_vac1_virW, recovered_countryB_vac1_virM, recovered_countryB_vac2_virW, recovered_countryB_vac2_virM, dead_countryA_vac0_virW, dead_countryA_vac0_virM, dead_countryA_vac1_virW, dead_countryA_vac1_virM, dead_countryA_vac2_virW, dead_countryA_vac2_virM, dead_countryB_vac0_virW, dead_countryB_vac0_virM, dead_countryB_vac1_virW, dead_countryB_vac1_virM, dead_countryB_vac2_virW, dead_countryB_vac2_virM
  susceptible_countryA_vac1_to_infectious_countryB_vac1_virW: susceptible_countryA_vac1 + infectious_countryB_vac1_virW => infectious_countryA_vac1_virW + infectious_countryB_vac1_virW; beta*eta_virW*(1 - delta_vac1_virW)*(1 - gamma)*susceptible_countryA_vac1*infectious_countryB_vac1_virW*(susceptible_countryA_vac0 + susceptible_countryA_vac1 + susceptible_countryA_vac2 + infectious_countryA_vac0_virW + infectious_countryA_vac0_virM + infectious_countryA_vac1_virW + infectious_countryA_vac1_virM + infectious_countryA_vac2_virW + infectious_countryA_vac2_virM + recovered_countryA_vac0_virW + recovered_countryA_vac0_virM + recovered_countryA_vac1_virW + recovered_countryA_vac1_virM + recovered_countryA_vac2_virW + recovered_countryA_vac2_virM)/(susceptible_countryA_vac0 + susceptible_countryA_vac1 + susceptible_countryA_vac2 + susceptible_countryB_vac0 + susceptible_countryB_vac1 + susceptible_countryB_vac2 + infectious_countryA_vac0_virW + infectious_countryA_vac0_virM + infectious_countryA_vac1_virW + infectious_countryA_vac1_virM + infectious_countryA_vac2_virW + infectious_countryA_vac2_virM + infectious_countryB_vac0_virW + infectious_countryB_vac0_virM + infectious_countryB_vac1_virW + infectious_countryB_vac1_virM + infectious_countryB_vac2_virW + infectious_countryB_vac2_virM + recovered_countryA_vac0_virW + recovered_countryA_vac0_virM + recovered_countryA_vac1_virW + recovered_countryA_vac1_virM + recovered_countryA_vac2_virW + recovered_countryA_vac2_virM + recovered_countryB_vac0_virW + recovered_countryB_vac0_virM + recovered_countryB_vac1_virW + recovered_countryB_vac1_virM + recovered_countryB_vac2_virW + recovered_countryB_vac2_virM)*distance_countryB_countryA/(susceptible_countryA_vac0 + susceptible_countryA_vac1 + susceptible_countryA_vac2 + infectious_countryA_vac0_virW + infectious_countryA_vac0_virM + infectious_countryA_vac1_virW + infectious_countryA_vac1_virM + infectious_countryA_vac2_virW + infectious_countryA_vac2_virM + recovered_countryA_vac0_virW + recovered_countryA_vac0_virM + recovered_countryA_vac1_virW + recovered_countryA_vac1_virM + recovered_countryA_vac2_virW + recovered_countryA_vac2_virM);  // modifiers: susceptible_countryA_vac0, susceptible_countryA_vac2, susceptible_countryB_vac0, susceptible_countryB_vac1, susceptible_countryB_vac2, infectious_countryA_vac0_virW, infectious_countryA_vac0_virM, infectious_countryA_vac1_virM, infectious_countryA_vac2_virW, infectious_countryA_vac2_virM, infectious_countryB_vac0_virW, infectious_countryB_vac0_virM, infectious_countryB_vac1_virM, infectious_countryB_vac2_virW, infectious_countryB_vac2_virM, recovered_countryA_vac0_virW, recovered_countryA_vac0_virM, recovered_countryA_vac1_virW, recovered_countryA_vac1_virM, recovered_countryA_vac2_virW, recovered_countryA_vac2_virM, recovered_countryB_vac0_virW, recovered_countryB_vac0_virM, recovered_countryB_vac1_virW, recovered_countryB_vac1_virM, recovered_countryB_vac2_virW, recovered_countryB_vac2_virM, dead_countryA_vac0_virW, dead_countryA_vac0_virM, dead_countryA_vac1_virW, dead_countryA_vac1_virM, dead_countryA_vac2_virW, dead_countryA_vac2_virM, dead_countryB_vac0_virW, dead_countryB_vac0_virM, dead_countryB_vac1_virW, dead_countryB_vac1_virM, dead_countryB_vac2_virW, dead_countryB_vac2_virM
  susceptible_countryA_vac2_to_infectious_countryB_vac1_virW: susceptible_countryA_vac2 + infectious_countryB_vac1_virW => infectious_countryA_vac2_virW + infectious_countryB_vac1_virW; beta*eta_virW*(1 - delta_vac2_virW)*(1 - gamma)*susceptible_countryA_vac2*infectious_countryB_vac1_virW*(susceptible_countryA_vac0 + susceptible_countryA_vac1 + susceptible_countryA_vac2 + infectious_countryA_vac0_virW + infectious_countryA_vac0_virM + infectious_countryA_vac1_virW + infectious_countryA_vac1_virM + infectious_countryA_vac2_virW + infectious_countryA_vac2_virM + recovered_countryA_vac0_virW + recovered_countryA_vac0_virM + recovered_countryA_vac1_virW + recovered_countryA_vac1_virM + recovered_countryA_vac2_virW + recovered_countryA_vac2_virM)/(susceptible_countryA_vac0 + susceptible_countryA_vac1 + susceptible_countryA_vac2 + susceptible_countryB_vac0 + susceptible_countryB_vac1 + susceptible_countryB_vac2 + infectious_countryA_vac0_virW + infectious_countryA_vac0_virM + infectious_countryA_vac1_virW + infectious_countryA_vac1_virM + infectious_countryA_vac2_virW + infectious_countryA_vac2_virM + infectious_countryB_vac0_virW + infectious_countryB_vac0_virM + infectious_countryB_vac1_virW + infectious_countryB_vac1_virM + infectious_countryB_vac2_virW + infectious_countryB_vac2_virM + recovered_countryA_vac0_virW + recovered_countryA_vac0_virM + recovered_countryA_vac1_virW + recovered_countryA_vac1_virM + recovered_countryA_vac2_virW + recovered_countryA_vac2_virM + recovered_countryB_vac0_virW + recovered_countryB_vac0_virM + recovered_countryB_vac1_virW + recovered_countryB_vac1_virM + recovered_countryB_vac2_virW + recovered_countryB_vac2_virM)*distance_countryB_countryA/(susceptible_countryA_vac0 + susceptible_countryA_vac1 + susceptible_countryA_vac2 + infectious_countryA_vac0_virW + infectious_countryA_vac0_virM + infectious_countryA_vac1_virW + infectious_countryA_vac1_virM + infectious_countryA_vac2_virW + infectious_countryA_vac2_virM + recovered_countryA_vac0_virW + recovered_countryA_vac0_virM + recovered_countryA_vac1_virW + recovered_countryA_vac1_virM + recovered_countryA_vac2_virW + recovered_countryA_vac2_virM);  // modifiers: susceptible_countryA_vac0, susceptible_countryA_vac1, susceptible_countryB_vac0, susceptible_countryB_vac1, susceptible_countryB_vac2, infectious_countryA_vac0_virW, infectious_countryA_vac0_virM, infectious_countryA_vac1_virW, infectious_countryA_vac1_virM, infectious_countryA_vac2_virM, infectious_countryB_vac0_virW, infectious_countryB_vac0_virM, infectious_countryB_vac1_virM, infectious_countryB_vac2_virW, infectious_countryB_vac2_virM, recovered_countryA_vac0_virW, recovered_countryA_vac0_virM, recovered_countryA_vac1_virW, recovered_countryA_vac1_virM, recovered_countryA_vac2_virW, recovered_countryA_vac2_virM, recovered_countryB_vac0_virW, recovered_countryB_vac0_virM, recovered_countryB_vac1_virW, recovered_countryB_vac1_virM, recovered_countryB_vac2_virW, recovered_countryB_vac2_virM, dead_countryA_vac0_virW, dead_countryA_vac0_virM, dead_countryA_vac1_virW, dead_countryA_vac1_virM, dead_countryA_vac2_virW, dead_countryA_vac2_virM, dead_countryB_vac0_virW, dead_countryB_vac0_virM, dead_countryB_vac1_virW, dead_countryB_vac1_virM, dead_countryB_vac2_virW, dead_countryB_vac2_virM
  susceptible_countryB_vac0_to_infectious_countryB_vac1_virW: susceptible_countryB_vac0 + infectious_countryB_vac1_virW => infectious_countryB_vac0_virW + infectious_countryB_vac1_virW; beta*eta_virW*(1 - 0)*(1 - gamma)*susceptible_countryB_vac0*infectious_countryB_vac1_virW*(1 - (susceptible_countryA_vac0 + susceptible_countryA_vac1 + susceptible_countryA_vac2 + infectious_countryA_vac0_virW + infectious_countryA_vac0_virM + infectious_countryA_vac1_virW + infectious_countryA_vac1_virM + infectious_countryA_vac2_virW + infectious_countryA_vac2_virM + recovered_countryA_vac0_virW + recovered_countryA_vac0_virM + recovered_countryA_vac1_virW + recovered_countryA_vac1_virM + recovered_countryA_vac2_virW + recovered_countryA_vac2_virM)/(susceptible_countryA_vac0 + susceptible_countryA_vac1 + susceptible_countryA_vac2 + susceptible_countryB_vac0 + susceptible_countryB_vac1 + susceptible_countryB_vac2 + infectious_countryA_vac0_virW + infectious_countryA_vac0_virM + infectious_countryA_vac1_virW + infectious_countryA_vac1_virM + infectious_countryA_vac2_virW + infectious_countryA_vac2_virM + infectious_countryB_vac0_virW + infectious_countryB_vac0_virM + infectious_countryB_vac1_virW + infectious_countryB_vac1_virM + infectious_countryB_vac2_virW + infectious_countryB_vac2_virM + recovered_countryA_vac0_virW + recovered_countryA_vac0_virM + recovered_countryA_vac1_virW + recovered_countryA_vac1_virM + recovered_countryA_vac2_virW + recovered_countryA_vac2_virM + recovered_countryB_vac0_virW + recovered_countryB_vac0_virM + recovered_countryB_vac1_virW + recovered_countryB_vac1_virM + recovered_countryB_vac2_virW + recovered_countryB_vac2_virM)*distance_countryB_countryA)/(susceptible_countryB_vac0 + susceptible_countryB_vac1 + susceptible_countryB_vac2 + infectious_countryB_vac0_virW + infectious_countryB_vac0_virM + infectious_countryB_vac1_virW + infectious_countryB_vac1_virM + infectious_countryB_vac2_virW + infectious_countryB_vac2_virM + recovered_countryB_vac0_virW + recovered_countryB_vac0_virM + recovered_countryB_vac1_virW + recovered_countryB_vac1_virM + recovered_countryB_vac2_virW + recovered_countryB_vac2_virM);  // modifiers: susceptible_countryA_vac0, susceptible_countryA_vac1, susceptible_countryA_vac2, susceptible_countryB_vac1, susceptible_countryB_vac2, infectious_countryA_vac0_virW, infectious_countryA_vac0_virM, infectious_countryA_vac1_virW, infectious_countryA_vac1_virM, infectious_countryA_vac2_virW, infectious_countryA_vac2_virM, infectious_countryB_vac0_virM, infectious_countryB_vac1_virM, infectious_countryB_vac2_virW, infectious_countryB_vac2_virM, recovered_countryA_vac0_virW, recovered_countryA_vac0_virM, recovered_countryA_vac1_virW, recovered_countryA_vac1_virM, recovered_countryA_vac2_virW, recovered_countryA_vac2_virM, recovered_countryB_vac0_virW, recovered_countryB_vac0_virM, recovered_countryB_vac1_virW, recovered_countryB_vac1_virM, recovered_countryB_vac2_virW, recovered_countryB_vac2_virM, dead_countryA_vac0_virW, dead_countryA_vac0_virM, dead_countryA_vac1_virW, dead_countryA_vac1_virM, dead_countryA_vac2_virW, dead_countryA_vac2_virM, dead_countryB_vac0_virW, dead_countryB_vac0_virM, dead_countryB_vac1_virW, dead_countryB_vac1_virM, dead_countryB_vac2_virW, dead_countryB_vac2_virM
  susceptible_countryB_vac1_to_infectious_countryB_vac1_virW: susceptible_countryB_vac1 + infectious_countryB_vac1_virW => 2 infectious_countryB_vac1_virW; beta*eta_virW*(1 - delta_vac1_virW)*(1 - gamma)*susceptible_countryB_vac1*infectious_countryB_vac1_virW*(1 - (susceptible_countryA_vac0 + susceptible_countryA_vac1 + susceptible_countryA_vac2 + infectious_countryA_vac0_virW + infectious_countryA_vac0_virM + infectious_countryA_vac1_virW + infectious_countryA_vac1_virM + infectious_countryA_vac2_virW + infectious_countryA_vac2_virM + recovered_countryA_vac0_virW + recovered_countryA_vac0_virM + recovered_countryA_vac1_virW + recovered_countryA_vac1_virM + recovered_countryA_vac2_virW + recovered_countryA_vac2_virM)/(susceptible_countryA_vac0 + susceptible_countryA_vac1 + susceptible_countryA_vac2 + susceptible_countryB_vac0 + susceptible_countryB_vac1 + susceptible_countryB_vac2 + infectious_countryA_vac0_virW + infectious_countryA_vac0_virM + infectious_countryA_vac1_virW + infectious_countryA_vac1_virM + infectious_countryA_vac2_virW + infectious_countryA_vac2_virM + infectious_countryB_vac0_virW + infectious_countryB_vac0_virM + infectious_countryB_vac1_virW + infectious_countryB_vac1_virM + infectious_countryB_vac2_virW + infectious_countryB_vac2_virM + recovered_countryA_vac0_virW + recovered_countryA_vac0_virM + recovered_countryA_vac1_virW + recovered_countryA_vac1_virM + recovered_countryA_vac2_virW + recovered_countryA_vac2_virM + recovered_countryB_vac0_virW + recovered_countryB_vac0_virM + recovered_countryB_vac1_virW + recovered_countryB_vac1_virM + recovered_countryB_vac2_virW + recovered_countryB_vac2_virM)*distance_countryB_countryA)/(susceptible_countryB_vac0 + susceptible_countryB_vac1 + susceptible_countryB_vac2 + infectious_countryB_vac0_virW + infectious_countryB_vac0_virM + infectious_countryB_vac1_virW + infectious_countryB_vac1_virM + infectious_countryB_vac2_virW + infectious_countryB_vac2_virM + recovered_countryB_vac0_virW + recovered_countryB_vac0_virM + recovered_countryB_vac1_virW + recovered_countryB_vac1_virM + recovered_countryB_vac2_virW + recovered_countryB_vac2_virM);  // modifiers: susceptible_countryA_vac0, susceptible_countryA_vac1, susceptible_countryA_vac2, susceptible_countryB_vac0, susceptible_countryB_vac2, infectious_countryA_vac0_virW, infectious_countryA_vac0_virM, infectious_countryA_vac1_virW, infectious_countryA_vac1_virM, infectious_countryA_vac2_virW, infectious_countryA_vac2_virM, infectious_countryB_vac0_virW, infectious_countryB_vac0_virM, infectious_countryB_vac1_virM, infectious_countryB_vac2_virW, infectious_countryB_vac2_virM, recovered_countryA_vac0_virW, recovered_countryA_vac0_virM, recovered_countryA_vac1_virW, recovered_countryA_vac1_virM, recovered_countryA_vac2_virW, recovered_countryA_vac2_virM, recovered_countryB_vac0_virW, recovered_countryB_vac0_virM, recovered_countryB_vac1_virW, recovered_countryB_vac1_virM, recovered_countryB_vac2_virW, recovered_countryB_vac2_virM, dead_countryA_vac0_virW, dead_countryA_vac0_virM, dead_countryA_vac1_virW, dead_countryA_vac1_virM, dead_countryA_vac2_virW, dead_countryA_vac2_virM, dead_countryB_vac0_virW, dead_countryB_vac0_virM, dead_countryB_vac1_virW, dead_countryB_vac1_virM, dead_countryB_vac2_virW, dead_countryB_vac2_virM
  susceptible_countryB_vac2_to_infectious_countryB_vac1_virW: susceptible_countryB_vac2 + infectious_countryB_vac1_virW => infectious_countryB_vac2_virW + infectious_countryB_vac1_virW; beta*eta_virW*(1 - delta_vac2_virW)*(1 - gamma)*susceptible_countryB_vac2*infectious_countryB_vac1_virW*(1 - (susceptible_countryA_vac0 + susceptible_countryA_vac1 + susceptible_countryA_vac2 + infectious_countryA_vac0_virW + infectious_countryA_vac0_virM + infectious_countryA_vac1_virW + infectious_countryA_vac1_virM + infectious_countryA_vac2_virW + infectious_countryA_vac2_virM + recovered_countryA_vac0_virW + recovered_countryA_vac0_virM + recovered_countryA_vac1_virW + recovered_countryA_vac1_virM + recovered_countryA_vac2_virW + recovered_countryA_vac2_virM)/(susceptible_countryA_vac0 + susceptible_countryA_vac1 + susceptible_countryA_vac2 + susceptible_countryB_vac0 + susceptible_countryB_vac1 + susceptible_countryB_vac2 + infectious_countryA_vac0_virW + infectious_countryA_vac0_virM + infectious_countryA_vac1_virW + infectious_countryA_vac1_virM + infectious_countryA_vac2_virW + infectious_countryA_vac2_virM + infectious_countryB_vac0_virW + infectious_countryB_vac0_virM + infectious_countryB_vac1_virW + infectious_countryB_vac1_virM + infectious_countryB_vac2_virW + infectious_countryB_vac2_virM + recovered_countryA_vac0_virW + recovered_countryA_vac0_virM + recovered_countryA_vac1_virW + recovered_countryA_vac1_virM + recovered_countryA_vac2_virW + recovered_countryA_vac2_virM + recovered_countryB_vac0_virW + recovered_countryB_vac0_virM + recovered_countryB_vac1_virW + recovered_countryB_vac1_virM + recovered_countryB_vac2_virW + recovered_countryB_vac2_virM)*distance_countryB_countryA)/(susceptible_countryB_vac0 + susceptible_countryB_vac1 + susceptible_countryB_vac2 + infectious_countryB_vac0_virW + infectious_countryB_vac0_virM + infectious_countryB_vac1_virW + infectious_countryB_vac1_virM + infectious_countryB_vac2_virW + infectious_countryB_vac2_virM + recovered_countryB_vac0_virW + recovered_countryB_vac0_virM + recovered_countryB_vac1_virW + recovered_countryB_vac1_virM + recovered_countryB_vac2_virW + recovered_countryB_vac2_virM);  // modifiers: susceptible_countryA_vac0, susceptible_countryA_vac1, susceptible_countryA_vac2, susceptible_countryB_vac0, susceptible_countryB_vac1, infectious_countryA_vac0_virW, infectious_countryA_vac0_virM, infectious_countryA_vac1_virW, infectious_countryA_vac1_virM, infectious_countryA_vac2_virW, infectious_countryA_vac2_virM, infectious_countryB_vac0_virW, infectious_countryB_vac0_virM, infectious_countryB_vac1_virM, infectious_countryB_vac2_virM, recovered_countryA_vac0_virW, recovered_countryA_vac0_virM, recovered_countryA_vac1_virW, recovered_countryA_vac1_virM, recovered_countryA_vac2_virW, recovered_countryA_vac2_virM, recovered_countryB_vac0_virW, recovered_countryB_vac0_virM, recovered_countryB_vac1_virW, recovered_countryB_vac1_virM, recovered_countryB_vac2_virW, recovered_countryB_vac2_virM, dead_countryA_vac0_virW, dead_countryA_vac0_virM, dead_countryA_vac1_virW, dead_countryA_vac1_virM, dead_countryA_vac2_virW, dead_countryA_vac2_virM, dead_countryB_vac0_virW, dead_countryB_vac0_virM, dead_countryB_vac1_virW, dead_countryB_vac1_virM, dead_countryB_vac2_virW, dead_countryB_vac2_virM
  susceptible_countryA_vac0_to_infectious_countryB_vac1_virM: susceptible_countryA_vac0 + infectious_countryB_vac1_virM => infectious_countryA_vac0_virM + infectious_countryB_vac1_virM; beta*eta_virM*(1 - 0)*(1 - gamma)*susceptible_countryA_vac0*infectious_countryB_vac1_virM*(susceptible_countryA_vac0 + susceptible_countryA_vac1 + susceptible_countryA_vac2 + infectious_countryA_vac0_virW + infectious_countryA_vac0_virM + infectious_countryA_vac1_virW + infectious_countryA_vac1_virM + infectious_countryA_vac2_virW + infectious_countryA_vac2_virM + recovered_countryA_vac0_virW + recovered_countryA_vac0_virM + recovered_countryA_vac1_virW + recovered_countryA_vac1_virM + recovered_countryA_vac2_virW + recovered_countryA_vac2_virM)/(susceptible_countryA_vac0 + susceptible_countryA_vac1 + susceptible_countryA_vac2 + susceptible_countryB_vac0 + susceptible_countryB_vac1 + susceptible_countryB_vac2 + infectious_countryA_vac0_virW + infectious_countryA_vac0_virM + infectious_countryA_vac1_virW + infectious_countryA_vac1_virM + infectious_countryA_vac2_virW + infectious_countryA_vac2_virM + infectious_countryB_vac0_virW + infectious_countryB_vac0_virM + infectious_countryB_vac1_virW + infectious_countryB_vac1_virM + infectious_countryB_vac2_virW + infectious_countryB_vac2_virM + recovered_countryA_vac0_virW + recovered_countryA_vac0_virM + recovered_countryA_vac1_virW + recovered_countryA_vac1_virM + recovered_countryA_vac2_virW + recovered_countryA_vac2_virM + recovered_countryB_vac0_virW + recovered_countryB_vac0_virM + recovered_countryB_vac1_virW + recovered_countryB_vac1_virM + recovered_countryB_vac2_virW + recovered_countryB_vac2_virM)*distance_countryB_countryA/(susceptible_countryA_vac0 + susceptible_countryA_vac1 + susceptible_countryA_vac2 + infectious_countryA_vac0_virW + infectious_countryA_vac0_virM + infectious_countryA_vac1_virW + infectious_countryA_vac1_virM + infectious_countryA_vac2_virW + infectious_countryA_vac2_virM + recovered_countryA_vac0_virW + recovered_countryA_vac0_virM + recovered_countryA_vac1_virW + recovered_countryA_vac1_virM + recovered_countryA_vac2_virW + recovered_countryA_vac2_virM);  // modifiers: susceptible_countryA_vac1, susceptible_countryA_vac2, susceptible_countryB_vac0, susceptible_countryB_vac1, susceptible_countryB_vac2, infectious_countryA_vac0_virW, infectious_countryA_vac1_virW, infectious_countryA_vac1_virM, infectious_countryA_vac2_virW, infectious_countryA_vac2_virM, infectious_countryB_vac0_virW, infectious_countryB_vac0_virM, infectious_countryB_vac1_virW, infectious_countryB_vac2_virW, infectious_countryB_vac2_virM, recovered_countryA_vac0_virW, recovered_countryA_vac0_virM, recovered_countryA_vac1_virW, recovered_countryA_vac1_virM, recovered_countryA_vac2_virW, recovered_countryA_vac2_virM, recovered_countryB_vac0_virW, recovered_countryB_vac0_virM, recovered_countryB_vac1_virW, recovered_countryB_vac1_virM, recovered_countryB_vac2_virW, recovered_countryB_vac2_virM, dead_countryA_vac0_virW, dead_countryA_vac0_virM, dead_countryA_vac1_virW, dead_countryA_vac1_virM, dead_countryA_vac2_virW, dead_countryA_vac2_virM, dead_countryB_vac0_virW, dead_countryB_vac0_virM, dead_countryB_vac1_virW, dead_countryB_vac1_virM, dead_countryB_vac2_virW, dead_countryB_vac2_virM
  susceptible_countryA_vac1_to_infectious_countryB_vac1_virM: susceptible_countryA_vac1 + infectious_countryB_vac1_virM => infectious_countryA_vac1_virM + infectious_countryB_vac1_virM; beta*eta_virM*(1 - delta_vac1_virM)*(1 - gamma)*susceptible_countryA_vac1*infectious_countryB_vac1_virM*(susceptible_countryA_vac0 + susceptible_countryA_vac1 + susceptible_countryA_vac2 + infectious_countryA_vac0_virW + infectious_countryA_vac0_virM + infectious_countryA_vac1_virW + infectious_countryA_vac1_virM + infectious_countryA_vac2_virW + infectious_countryA_vac2_virM + recovered_countryA_vac0_virW + recovered_countryA_vac0_virM + recovered_countryA_vac1_virW + recovered_countryA_vac1_virM + recovered_countryA_vac2_virW + recovered_countryA_vac2_virM)/(susceptible_countryA_vac0 + susceptible_countryA_vac1 + susceptible_countryA_vac2 + susceptible_countryB_vac0 + susceptible_countryB_vac1 + susceptible_countryB_vac2 + infectious_countryA_vac0_virW + infectious_countryA_vac0_virM + infectious_countryA_vac1_virW + infectious_countryA_vac1_virM + infectious_countryA_vac2_virW + infectious_countryA_vac2_virM + infectious_countryB_vac0_virW + infectious_countryB_vac0_virM + infectious_countryB_vac1_virW + infectious_countryB_vac1_virM + infectious_countryB_vac2_virW + infectious_countryB_vac2_virM + recovered_countryA_vac0_virW + recovered_countryA_vac0_virM + recovered_countryA_vac1_virW + recovered_countryA_vac1_virM + recovered_countryA_vac2_virW + recovered_countryA_vac2_virM + recovered_countryB_vac0_virW + recovered_countryB_vac0_virM + recovered_countryB_vac1_virW + recovered_countryB_vac1_virM + recovered_countryB_vac2_virW + recovered_countryB_vac2_virM)*distance_countryB_countryA/(susceptible_countryA_vac0 + susceptible_countryA_vac1 + susceptible_countryA_vac2 + infectious_countryA_vac0_virW + infectious_countryA_vac0_virM + infectious_countryA_vac1_virW + infectious_countryA_vac1_virM + infectious_countryA_vac2_virW + infectious_countryA_vac2_virM + recovered_countryA_vac0_virW + recovered_countryA_vac0_virM + recovered_countryA_vac1_virW + recovered_countryA_vac1_virM + recovered_countryA_vac2_virW + recovered_countryA_vac2_virM);  // modifiers: susceptible_countryA_vac0, susceptible_countryA_vac2, susceptible_countryB_vac0, susceptible_countryB_vac1, susceptible_countryB_vac2, infectious_countryA_vac0_virW, infectious_countryA_vac0_virM, infectious_countryA_vac1_virW, infectious_countryA_vac2_virW, infectious_countryA_vac2_virM, infectious_countryB_vac0_virW, infectious_countryB_vac0_virM, infectious_countryB_vac1_virW, infectious_countryB_vac2_virW, infectious_countryB_vac2_virM, recovered_countryA_vac0_virW, recovered_countryA_vac0_virM, recovered_countryA_vac1_virW, recovered_countryA_vac1_virM, recovered_countryA_vac2_virW, recovered_countryA_vac2_virM, recovered_countryB_vac0_virW, recovered_countryB_vac0_virM, recovered_countryB_vac1_virW, recovered_countryB_vac1_virM, recovered_countryB_vac2_virW, recovered_countryB_vac2_virM, dead_countryA_vac0_virW, dead_countryA_vac0_virM, dead_countryA_vac1_virW, dead_countryA_vac1_virM, dead_countryA_vac2_virW, dead_countryA_vac2_virM, dead_countryB_vac0_virW, dead_countryB_vac0_virM, dead_countryB_vac1_virW, dead_countryB_vac1_virM, dead_countryB_vac2_virW, dead_countryB_vac2_virM
  susceptible_countryA_vac2_to_infectious_countryB_vac1_virM: susceptible_countryA_vac2 + infectious_countryB_vac1_virM => infectious_countryA_vac2_virM + infectious_countryB_vac1_virM; beta*eta_virM*(1 - delta_vac2_virM)*(1 - gamma)*susceptible_countryA_vac2*infectious_countryB_vac1_virM*(susceptible_countryA_vac0 + susceptible_countryA_vac1 + susceptible_countryA_vac2 + infectious_countryA_vac0_virW + infectious_countryA_vac0_virM + infectious_countryA_vac1_virW + infectious_countryA_vac1_virM + infectious_countryA_vac2_virW + infectious_countryA_vac2_virM + recovered_countryA_vac0_virW + recovered_countryA_vac0_virM + recovered_countryA_vac1_virW + recovered_countryA_vac1_virM + recovered_countryA_vac2_virW + recovered_countryA_vac2_virM)/(susceptible_countryA_vac0 + susceptible_countryA_vac1 + susceptible_countryA_vac2 + susceptible_countryB_vac0 + susceptible_countryB_vac1 + susceptible_countryB_vac2 + infectious_countryA_vac0_virW + infectious_countryA_vac0_virM + infectious_countryA_vac1_virW + infectious_countryA_vac1_virM + infectious_countryA_vac2_virW + infectious_countryA_vac2_virM + infectious_countryB_vac0_virW + infectious_countryB_vac0_virM + infectious_countryB_vac1_virW + infectious_countryB_vac1_virM + infectious_countryB_vac2_virW + infectious_countryB_vac2_virM + recovered_countryA_vac0_virW + recovered_countryA_vac0_virM + recovered_countryA_vac1_virW + recovered_countryA_vac1_virM + recovered_countryA_vac2_virW + recovered_countryA_vac2_virM + recovered_countryB_vac0_virW + recovered_countryB_vac0_virM + recovered_countryB_vac1_virW + recovered_countryB_vac1_virM + recovered_countryB_vac2_virW + recovered_countryB_vac2_virM)*distance_countryB_countryA/(susceptible_countryA_vac0 + susceptible_countryA_vac1 + susceptible_countryA_vac2 + infectious_countryA_vac0_virW + infectious_countryA_vac0_virM + infectious_countryA_vac1_virW + infectious_countryA_vac1_virM + infectious_countryA_vac2_virW + infectious_countryA_vac2_virM + recovered_countryA_vac0_virW + recovered_countryA_vac0_virM + recovered_countryA_vac1_virW + recovered_countryA_vac1_virM + recovered_countryA_vac2_virW + recovered_countryA_vac2_virM);  // modifiers: susceptible_countryA_vac0, susceptible_countryA_vac1, susceptible_countryB_vac0, susceptible_countryB_vac1, susceptible_countryB_vac2, infectious_countryA_vac0_virW, infectious_countryA_vac0_virM, infectious_countryA_vac1_virW, infectious_countryA_vac1_virM, infectious_countryA_vac2_virW, infectious_countryB_vac0_virW, infectious_countryB_vac0_virM, infectious_countryB_vac1_virW, infectious_countryB_vac2_virW, infectious_countryB_vac2_virM, recovered_countryA_vac0_virW, recovered_countryA_vac0_virM, recovered_countryA_vac1_virW, recovered_countryA_vac1_virM, recovered_countryA_vac2_virW, recovered_countryA_vac2_virM, recovered_countryB_vac0_virW, recovered_countryB_vac0_virM, recovered_countryB_vac1_virW, recovered_countryB_vac1_virM, recovered_countryB_vac2_virW, recovered_countryB_vac2_virM, dead_countryA_vac0_virW, dead_countryA_vac0_virM, dead_countryA_vac1_virW, dead_countryA_vac1_virM, dead_countryA_vac2_virW, dead_countryA_vac2_virM, dead_countryB_vac0_virW, dead_countryB_vac0_virM, dead_countryB_vac1_virW, dead_countryB_vac1_virM, dead_countryB_vac2_virW, dead_countryB_vac2_virM
  susceptible_countryB_vac0_to_infectious_countryB_vac1_virM: susceptible_countryB_vac0 + infectious_countryB_vac1_virM => infectious_countryB_vac0_virM + infectious_countryB_vac1_virM; beta*eta_virM*(1 - 0)*(1 - gamma)*susceptible_countryB_vac0*infectious_countryB_vac1_virM*(1 - (susceptible_countryA_vac0 + susceptible_countryA_vac1 + susceptible_countryA_vac2 + infectious_countryA_vac0_virW + infectious_countryA_vac0_virM + infectious_countryA_vac1_virW + infectious_countryA_vac1_virM + infectious_countryA_vac2_virW + infectious_countryA_vac2_virM + recovered_countryA_vac0_virW + recovered_countryA_vac0_virM + recovered_countryA_vac1_virW + recovered_countryA_vac1_virM + recovered_countryA_vac2_virW + recovered_countryA_vac2_virM)/(susceptible_countryA_vac0 + susceptible_countryA_vac1 + susceptible_countryA_vac2 + susceptible_countryB_vac0 + susceptible_countryB_vac1 + susceptible_countryB_vac2 + infectious_countryA_vac0_virW + infectious_countryA_vac0_virM + infectious_countryA_vac1_virW + infectious_countryA_vac1_virM + infectious_countryA_vac2_virW + infectious_countryA_vac2_virM + infectious_countryB_vac0_virW + infectious_countryB_vac0_virM + infectious_countryB_vac1_virW + infectious_countryB_vac1_virM + infectious_countryB_vac2_virW + infectious_countryB_vac2_virM + recovered_countryA_vac0_virW + recovered_countryA_vac0_virM + recovered_countryA_vac1_virW + recovered_countryA_vac1_virM + recovered_countryA_vac2_virW + recovered_countryA_vac2_virM + recovered_countryB_vac0_virW + recovered_countryB_vac0_virM + recovered_countryB_vac1_virW + recovered_countryB_vac1_virM + recovered_countryB_vac2_virW + recovered_countryB_vac2_virM)*distance_countryB_countryA)/(susceptible_countryB_vac0 + susceptible_countryB_vac1 + susceptible_countryB_vac2 + infectious_countryB_vac0_virW + infectious_countryB_vac0_virM + infectious_countryB_vac1_virW + infectious_countryB_vac1_virM + infectious_countryB_vac2_virW + infectious_countryB_vac2_virM + recovered_countryB_vac0_virW + recovered_countryB_vac0_virM + recovered_countryB_vac1_virW + recovered_countryB_vac1_virM + recovered_countryB_vac2_virW + recovered_countryB_vac2_virM);  // modifiers: susceptible_countryA_vac0, susceptible_countryA_vac1, susceptible_countryA_vac2, susceptible_countryB_vac1, susceptible_countryB_vac2, infectious_countryA_vac0_virW, infectious_countryA_vac0_virM, infectious_countryA_vac1_virW, infectious_countryA_vac1_virM, infectious_countryA_vac2_virW, infectious_countryA_vac2_virM, infectious_countryB_vac0_virW, infectious_countryB_vac1_virW, infectious_countryB_vac2_virW, infectious_countryB_vac2_virM, recovered_countryA_vac0_virW, recovered_countryA_vac0_virM, recovered_countryA_vac1_virW, recovered_countryA_vac1_virM, recovered_countryA_vac2_virW, recovered_countryA_vac2_virM, recovered_countryB_vac0_virW, recovered_countryB_vac0_virM, recovered_countryB_vac1_virW, recovered_countryB_vac1_virM, recovered_countryB_vac2_virW, recovered_countryB_vac2_virM, dead_countryA_vac0_virW, dead_countryA_vac0_virM, dead_countryA_vac1_virW, dead_countryA_vac1_virM, dead_countryA_vac2_virW, dead_countryA_vac2_virM, dead_countryB_vac0_virW, dead_countryB_vac0_virM, dead_countryB_vac1_virW, dead_countryB_vac1_virM, dead_countryB_vac2_virW, dead_countryB_vac2_virM
  susceptible_countryB_vac1_to_infectious_countryB_vac1_virM: susceptible_countryB_vac1 + infectious_countryB_vac1_virM => 2 infectious_countryB_vac1_virM; beta*eta_virM*(1 - delta_vac1_virM)*(1 - gamma)*susceptible_countryB_vac1*infectious_countryB_vac1_virM*(1 - (susceptible_countryA_vac0 + susceptible_countryA_vac1 + susceptible_countryA_vac2 + infectious_countryA_vac0_virW + infectious_countryA_vac0_virM + infectious_countryA_vac1_virW + infectious_countryA_vac1_virM + infectious_countryA_vac2_virW + infectious_countryA_vac2_virM + recovered_countryA_vac0_virW + recovered_countryA_vac0_virM + recovered_countryA_vac1_virW + recovered_countryA_vac1_virM + recovered_countryA_vac2_virW + recovered_countryA_vac2_virM)/(susceptible_countryA_vac0 + susceptible_countryA_vac1 + susceptible_countryA_vac2 + susceptible_countryB_vac0 + susceptible_countryB_vac1 + susceptible_countryB_vac2 + infectious_countryA_vac0_virW + infectious_countryA_vac0_virM + infectious_countryA_vac1_virW + infectious_countryA_vac1_virM + infectious_countryA_vac2_virW + infectious_countryA_vac2_virM + infectious_countryB_vac0_virW + infectious_countryB_vac0_virM + infectious_countryB_vac1_virW + infectious_countryB_vac1_virM + infectious_countryB_vac2_virW + infectious_countryB_vac2_virM + recovered_countryA_vac0_virW + recovered_countryA_vac0_virM + recovered_countryA_vac1_virW + recovered_countryA_vac1_virM + recovered_countryA_vac2_virW + recovered_countryA_vac2_virM + recovered_countryB_vac0_virW + recovered_countryB_vac0_virM + recovered_countryB_vac1_virW + recovered_countryB_vac1_virM + recovered_countryB_vac2_virW + recovered_countryB_vac2_virM)*distance_countryB_countryA)/(susceptible_countryB_vac0 + susceptible_countryB_vac1 + susceptible_countryB_vac2 + infectious_countryB_vac0_virW + infectious_countryB_vac0_virM + infectious_countryB_vac1_virW + infectious_countryB_vac1_virM + infectious_countryB_vac2_virW + infectious_countryB_vac2_virM + recovered_countryB_vac0_virW + recovered_countryB_vac0_virM + recovered_countryB_vac1_virW + recovered_countryB_vac1_virM + recovered_countryB_vac2_virW + recovered_countryB_vac2_virM);  // modifiers: susceptible_countryA_vac0, susceptible_countryA_vac1, susceptible_countryA_vac2, susceptible_countryB_vac0, susceptible_countryB_vac2, infectious_countryA_vac0_virW, infectious_countryA_vac0_virM, infectious_countryA_vac1_virW, infectious_countryA_vac1_virM, infectious_countryA_vac2_virW, infectious_countryA_vac2_virM, infectious_countryB_vac0_virW, infectious_countryB_vac0_virM, infectious_countryB_vac1_virW, infectious_countryB_vac2_virW, infectious_countryB_vac2_virM, recovered_countryA_vac0_virW, recovered_countryA_vac0_virM, recovered_countryA_vac1_virW, recovered_countryA_vac1_virM, recovered_countryA_vac2_virW, recovered_countryA_vac2_virM, recovered_countryB_vac0_virW, recovered_countryB_vac0_virM, recovered_countryB_vac1_virW, recovered_countryB_vac1_virM, recovered_countryB_vac2_virW, recovered_countryB_vac2_virM, dead_countryA_vac0_virW, dead_countryA_vac0_virM, dead_countryA_vac1_virW, dead_countryA_vac1_virM, dead_countryA_vac2_virW, dead_countryA_vac2_virM, dead_countryB_vac0_virW, dead_countryB_vac0_virM, dead_countryB_vac1_virW, dead_countryB_vac1_virM, dead_countryB_vac2_virW, dead_countryB_vac2_virM
  susceptible_countryB_vac2_to_infectious_countryB_vac1_virM: susceptible_countryB_vac2 + infectious_countryB_vac1_virM => infectious_countryB_vac2_virM + infectious_countryB_vac1_virM; beta*eta_virM*(1 - delta_vac2_virM)*(1 - gamma)*susceptible_countryB_vac2*infectious_countryB_vac1_virM*(1 - (susceptible_countryA_vac0 + susceptible_countryA_vac1 + susceptible_countryA_vac2 + infectious_countryA_vac0_virW + infectious_countryA_vac0_virM + infectious_countryA_vac1_virW + infectious_countryA_vac1_virM + infectious_countryA_vac2_virW + infectious_countryA_vac2_virM + recovered_countryA_vac0_virW + recovered_countryA_vac0_virM + recovered_countryA_vac1_virW + recovered_countryA_vac1_virM + recovered_countryA_vac2_virW + recovered_countryA_vac2_virM)/(susceptible_countryA_vac0 + susceptible_countryA_vac1 + susceptible_countryA_vac2 + susceptible_countryB_vac0 + susceptible_countryB_vac1 + susceptible_countryB_vac2 + infectious_countryA_vac0_virW + infectious_countryA_vac0_virM + infectious_countryA_vac1_virW + infectious_countryA_vac1_virM + infectious_countryA_vac2_virW + infectious_countryA_vac2_virM + infectious_countryB_vac0_virW + infectious_countryB_vac0_virM + infectious_countryB_vac1_virW + infectious_countryB_vac1_virM + infectious_countryB_vac2_virW + infectious_countryB_vac2_virM + recovered_countryA_vac0_virW + recovered_countryA_vac0_virM + recovered_countryA_vac1_virW + recovered_countryA_vac1_virM + recovered_countryA_vac2_virW + recovered_countryA_vac2_virM + recovered_countryB_vac0_virW + recovered_countryB_vac0_virM + recovered_countryB_vac1_virW + recovered_countryB_vac1_virM + recovered_countryB_vac2_virW + recovered_countryB_vac2_virM)*distance_countryB_countryA)/(susceptible_countryB_vac0 + susceptible_countryB_vac1 + susceptible_countryB_vac2 + infectious_countryB_vac0_virW + infectious_countryB_vac0_virM + infectious_countryB_vac1_virW + infectious_countryB_vac1_virM + infectious_countryB_vac2_virW + infectious_countryB_vac2_virM + recovered_countryB_vac0_virW + recovered_countryB_vac0_virM + recovered_countryB_vac1_virW + recovered_countryB_vac1_virM + recovered_countryB_vac2_virW + recovered_countryB_vac2_virM);  // modifiers: susceptible_countryA_vac0, susceptible_countryA_vac1, susceptible_countryA_vac2, susceptible_countryB_vac0, susceptible_countryB_vac1, infectious_countryA_vac0_virW, infectious_countryA_vac0_virM, infectious_countryA_vac1_virW, infectious_countryA_vac1_virM, infectious_countryA_vac2_virW, infectious_countryA_vac2_virM, infectious_countryB_vac0_virW, infectious_countryB_vac0_virM, infectious_countryB_vac1_virW, infectious_countryB_vac2_virW, recovered_countryA_vac0_virW, recovered_countryA_vac0_virM, recovered_countryA_vac1_virW, recovered_countryA_vac1_virM, recovered_countryA_vac2_virW, recovered_countryA_vac2_virM, recovered_countryB_vac0_virW, recovered_countryB_vac0_virM, recovered_countryB_vac1_virW, recovered_countryB_vac1_virM, recovered_countryB_vac2_virW, recovered_countryB_vac2_virM, dead_countryA_vac0_virW, dead_countryA_vac0_virM, dead_countryA_vac1_virW, dead_countryA_vac1_virM, dead_countryA_vac2_virW, dead_countryA_vac2_virM, dead_countryB_vac0_virW, dead_countryB_vac0_virM, dead_countryB_vac1_virW, dead_countryB_vac1_virM, dead_countryB_vac2_virW, dead_countryB_vac2_virM
  susceptible_countryA_vac0_to_infectious_countryB_vac2_virW: susceptible_countryA_vac0 + infectious_countryB_vac2_virW => infectious_countryA_vac0_virW + infectious_countryB_vac2_virW; beta*eta_virW*(1 - 0)*(1 - gamma)*susceptible_countryA_vac0*infectious_countryB_vac2_virW*(susceptible_countryA_vac0 + susceptible_countryA_vac1 + susceptible_countryA_vac2 + infectious_countryA_vac0_virW + infectious_countryA_vac0_virM + infectious_countryA_vac1_virW + infectious_countryA_vac1_virM + infectious_countryA_vac2_virW + infectious_countryA_vac2_virM + recovered_countryA_vac0_virW + recovered_countryA_vac0_virM + recovered_countryA_vac1_virW + recovered_countryA_vac1_virM + recovered_countryA_vac2_virW + recovered_countryA_vac2_virM)/(susceptible_countryA_vac0 + susceptible_countryA_vac1 + susceptible_countryA_vac2 + susceptible_countryB_vac0 + susceptible_countryB_vac1 + susceptible_countryB_vac2 + infectious_countryA_vac0_virW + infectious_countryA_vac0_virM + infectious_countryA_vac1_virW + infectious_countryA_vac1_virM + infectious_countryA_vac2_virW + infectious_countryA_vac2_virM + infectious_countryB_vac0_virW + infectious_countryB_vac0_virM + infectious_countryB_vac1_virW + infectious_countryB_vac1_virM + infectious_countryB_vac2_virW + infectious_countryB_vac2_virM + recovered_countryA_vac0_virW + recovered_countryA_vac0_virM + recovered_countryA_vac1_virW + recovered_countryA_vac1_virM + recovered_countryA_vac2_virW + recovered_countryA_vac2_virM + recovered_countryB_vac0_virW + recovered_countryB_vac0_virM + recovered_countryB_vac1_virW + recovered_countryB_vac1_virM + recovered_countryB_vac2_virW + recovered_countryB_vac2_virM)*distance_countryB_countryA/(susceptible_countryA_vac0 + susceptible_countryA_vac1 + susceptible_countryA_vac2 + infectious_countryA_vac0_virW + infectious_countryA_vac0_virM + infectious_countryA_vac1_virW + infectious_countryA_vac1_virM + infectious_countryA_vac2_virW + infectious_countryA_vac2_virM + recovered_countryA_vac0_virW + recovered_countryA_vac0_virM + recovered_countryA_vac1_virW + recovered_countryA_vac1_virM + recovered_countryA_vac2_virW + recovered_countryA_vac2_virM);  // modifiers: susceptible_countryA_vac1, susceptible_countryA_vac2, susceptible_countryB_vac0, susceptible_countryB_vac1, susceptible_countryB_vac2, infectious_countryA_vac0_virM, infectious_countryA_vac1_virW, infectious_countryA_vac1_virM, infectious_countryA_vac2_virW, infectious_countryA_vac2_virM, infectious_countryB_vac0_virW, infectious_countryB_vac0_virM, infectious_countryB_vac1_virW, infectious_countryB_vac1_virM, infectious_countryB_vac2_virM, recovered_countryA_vac0_virW, recovered_countryA_vac0_virM, recovered_countryA_vac1_virW, recovered_countryA_vac1_virM, recovered_countryA_vac2_virW, recovered_countryA_vac2_virM, recovered_countryB_vac0_virW, recovered_countryB_vac0_virM, recovered_countryB_vac1_virW, recovered_countryB_vac1_virM, recovered_countryB_vac2_virW, recovered_countryB_vac2_virM, dead_countryA_vac0_virW, dead_countryA_vac0_virM, dead_countryA_vac1_virW, dead_countryA_vac1_virM, dead_countryA_vac2_virW, dead_countryA_vac2_virM, dead_countryB_vac0_virW, dead_countryB_vac0_virM, dead_countryB_vac1_virW, dead_countryB_vac1_virM, dead_countryB_vac2_virW, dead_countryB_vac2_virM
  susceptible_countryA_vac1_to_infectious_countryB_vac2_virW: susceptible_countryA_vac1 + infectious_countryB_vac2_virW => infectious_countryA_vac1_virW + infectious_countryB_vac2_virW; beta*eta_virW*(1 - delta_vac1_virW)*(1 - gamma)*susceptible_countryA_vac1*infectious_countryB_vac2_virW*(susceptible_countryA_vac0 + susceptible_countryA_vac1 + susceptible_countryA_vac2 + infectious_countryA_vac0_virW + infectious_countryA_vac0_virM + infectious_countryA_vac1_virW + infectious_countryA_vac1_virM + infectious_countryA_vac2_virW + infectious_countryA_vac2_virM + recovered_countryA_vac0_virW + recovered_countryA_vac0_virM + recovered_countryA_vac1_virW + recovered_countryA_vac1_virM + recovered_countryA_vac2_virW + recovered_countryA_vac2_virM)/(susceptible_countryA_vac0 + susceptible_countryA_vac1 + susceptible_countryA_vac2 + susceptible_countryB_vac0 + susceptible_countryB_vac1 + susceptible_countryB_vac2 + infectious_countryA_vac0_virW + infectious_countryA_vac0_virM + infectious_countryA_vac1_virW + infectious_countryA_vac1_virM + infectious_countryA_vac2_virW + infectious_countryA_vac2_virM + infectious_countryB_vac0_virW + infectious_countryB_vac0_virM + infectious_countryB_vac1_virW + infectious_countryB_vac1_virM + infectious_countryB_vac2_virW + infectious_countryB_vac2_virM + recovered_countryA_vac0_virW + recovered_countryA_vac0_virM + recovered_countryA_vac1_virW + recovered_countryA_vac1_virM + recovered_countryA_vac2_virW + recovered_countryA_vac2_virM + recovered_countryB_vac0_virW + recovered_countryB_vac0_virM + recovered_countryB_vac1_virW + recovered_countryB_vac1_virM + recovered_countryB_vac2_virW + recovered_countryB_vac2_virM)*distance_countryB_countryA/(susceptible_countryA_vac0 + susceptible_countryA_vac1 + susceptible_countryA_vac2 + infectious_countryA_vac0_virW + infectious_countryA_vac0_virM + infectious_countryA_vac1_virW + infectious_countryA_vac1_virM + infectious_countryA_vac2_virW + infectious_countryA_vac2_virM + recovered_countryA_vac0_virW + recovered_countryA_vac0_virM + recovered_countryA_vac1_virW + recovered_countryA_vac1_virM + recovered_countryA_vac2_virW + recovered_countryA_vac2_virM);  // modifiers: susceptible_countryA_vac0, susceptible_countryA_vac2, susceptible_countryB_vac0, susceptible_countryB_vac1, susceptible_countryB_vac2, infectious_countryA_vac0_virW, infectious_countryA_vac0_virM, infectious_countryA_vac1_virM, infectious_countryA_vac2_virW, infectious_countryA_vac2_virM, infectious_countryB_vac0_virW, infectious_countryB_vac0_virM, infectious_countryB_vac1_virW, infectious_countryB_vac1_virM, infectious_countryB_vac2_virM, recovered_countryA_vac0_virW, recovered_countryA_vac0_virM, recovered_countryA_vac1_virW, recovered_countryA_vac1_virM, recovered_countryA_vac2_virW, recovered_countryA_vac2_virM, recovered_countryB_vac0_virW, recovered_countryB_vac0_virM, recovered_countryB_vac1_virW, recovered_countryB_vac1_virM, recovered_countryB_vac2_virW, recovered_countryB_vac2_virM, dead_countryA_vac0_virW, dead_countryA_vac0_virM, dead_countryA_vac1_virW, dead_countryA_vac1_virM, dead_countryA_vac2_virW, dead_countryA_vac2_virM, dead_countryB_vac0_virW, dead_countryB_vac0_virM, dead_countryB_vac1_virW, dead_countryB_vac1_virM, dead_countryB_vac2_virW, dead_countryB_vac2_virM
  susceptible_countryA_vac2_to_infectious_countryB_vac2_virW: susceptible_countryA_vac2 + infectious_countryB_vac2_virW => infectious_countryA_vac2_virW + infectious_countryB_vac2_virW; beta*eta_virW*(1 - delta_vac2_virW)*(1 - gamma)*susceptible_countryA_vac2*infectious_countryB_vac2_virW*(susceptible_countryA_vac0 + susceptible_countryA_vac1 + susceptible_countryA_vac2 + infectious_countryA_vac0_virW + infectious_countryA_vac0_virM + infectious_countryA_vac1_virW + infectious_countryA_vac1_virM + infectious_countryA_vac2_virW + infectious_countryA_vac2_virM + recovered_countryA_vac0_virW + recovered_countryA_vac0_virM + recovered_countryA_vac1_virW + recovered_countryA_vac1_virM + recovered_countryA_vac2_virW + recovered_countryA_vac2_virM)/(susceptible_countryA_vac0 + susceptible_countryA_vac1 + susceptible_countryA_vac2 + susceptible_countryB_vac0 + susceptible_countryB_vac1 + susceptible_countryB_vac2 + infectious_countryA_vac0_virW + infectious_countryA_vac0_virM + infectious_countryA_vac1_virW + infectious_countryA_vac1_virM + infectious_countryA_vac2_virW + infectious_countryA_vac2_virM + infectious_countryB_vac0_virW + infectious_countryB_vac0_virM + infectious_countryB_vac1_virW + infectious_countryB_vac1_virM + infectious_countryB_vac2_virW + infectious_countryB_vac2_virM + recovered_countryA_vac0_virW + recovered_countryA_vac0_virM + recovered_countryA_vac1_virW + recovered_countryA_vac1_virM + recovered_countryA_vac2_virW + recovered_countryA_vac2_virM + recovered_countryB_vac0_virW + recovered_countryB_vac0_virM + recovered_countryB_vac1_virW + recovered_countryB_vac1_virM + recovered_countryB_vac2_virW + recovered_countryB_vac2_virM)*distance_countryB_countryA/(susceptible_countryA_vac0 + susceptible_countryA_vac1 + susceptible_countryA_vac2 + infectious_countryA_vac0_virW + infectious_countryA_vac0_virM + infectious_countryA_vac1_virW + infectious_countryA_vac1_virM + infectious_countryA_vac2_virW + infectious_countryA_vac2_virM + recovered_countryA_vac0_virW + recovered_countryA_vac0_virM + recovered_countryA_vac1_virW + recovered_countryA_vac1_virM + recovered_countryA_vac2_virW + recovered_countryA_vac2_virM);  // modifiers: susceptible_countryA_vac0, susceptible_countryA_vac1, susceptible_countryB_vac0, susceptible_countryB_vac1, susceptible_countryB_vac2, infectious_countryA_vac0_virW, infectious_countryA_vac0_virM, infectious_countryA_vac1_virW, infectious_countryA_vac1_virM, infectious_countryA_vac2_virM, infectious_countryB_vac0_virW, infectious_countryB_vac0_virM, infectious_countryB_vac1_virW, infectious_countryB_vac1_virM, infectious_countryB_vac2_virM, recovered_countryA_vac0_virW, recovered_countryA_vac0_virM, recovered_countryA_vac1_virW, recovered_countryA_vac1_virM, recovered_countryA_vac2_virW, recovered_countryA_vac2_virM, recovered_countryB_vac0_virW, recovered_countryB_vac0_virM, recovered_countryB_vac1_virW, recovered_countryB_vac1_virM, recovered_countryB_vac2_virW, recovered_countryB_vac2_virM, dead_countryA_vac0_virW, dead_countryA_vac0_virM, dead_countryA_vac1_virW, dead_countryA_vac1_virM, dead_countryA_vac2_virW, dead_countryA_vac2_virM, dead_countryB_vac0_virW, dead_countryB_vac0_virM, dead_countryB_vac1_virW, dead_countryB_vac1_virM, dead_countryB_vac2_virW, dead_countryB_vac2_virM
  susceptible_countryB_vac0_to_infectious_countryB_vac2_virW: susceptible_countryB_vac0 + infectious_countryB_vac2_virW => infectious_countryB_vac0_virW + infectious_countryB_vac2_virW; beta*eta_virW*(1 - 0)*(1 - gamma)*susceptible_countryB_vac0*infectious_countryB_vac2_virW*(1 - (susceptible_countryA_vac0 + susceptible_countryA_vac1 + susceptible_countryA_vac2 + infectious_countryA_vac0_virW + infectious_countryA_vac0_virM + infectious_countryA_vac1_virW + infectious_countryA_vac1_virM + infectious_countryA_vac2_virW + infectious_countryA_vac2_virM + recovered_countryA_vac0_virW + recovered_countryA_vac0_virM + recovered_countryA_vac1_virW + recovered_countryA_vac1_virM + recovered_countryA_vac2_virW + recovered_countryA_vac2_virM)/(susceptible_countryA_vac0 + susceptible_countryA_vac1 + susceptible_countryA_vac2 + susceptible_countryB_vac0 + susceptible_countryB_vac1 + susceptible_countryB_vac2 + infectious_countryA_vac0_virW + infectious_countryA_vac0_virM + infectious_countryA_vac1_virW + infectious_countryA_vac1_virM + infectious_countryA_vac2_virW + infectious_countryA_vac2_virM + infectious_countryB_vac0_virW + infectious_countryB_vac0_virM + infectious_countryB_vac1_virW + infectious_countryB_vac1_virM + infectious_countryB_vac2_virW + infectious_countryB_vac2_virM + recovered_countryA_vac0_virW + recovered_countryA_vac0_virM + recovered_countryA_vac1_virW + recovered_countryA_vac1_virM + recovered_countryA_vac2_virW + recovered_countryA_vac2_virM + recovered_countryB_vac0_virW + recovered_countryB_vac0_virM + recovered_countryB_vac1_virW + recovered_countryB_vac1_virM + recovered_countryB_vac2_virW + recovered_countryB_vac2_virM)*distance_countryB_countryA)/(susceptible_countryB_vac0 + susceptible_countryB_vac1 + susceptible_countryB_vac2 + infectious_countryB_vac0_virW + infectious_countryB_vac0_virM + infectious_countryB_vac1_virW + infectious_countryB_vac1_virM + infectious_countryB_vac2_virW + infectious_countryB_vac2_virM + recovered_countryB_vac0_virW + recovered_countryB_vac0_virM + recovered_countryB_vac1_virW + recovered_countryB_vac1_virM + recovered_countryB_vac2_virW + recovered_countryB_vac2_virM);  // modifiers: susceptible_countryA_vac0, susceptible_countryA_vac1, susceptible_countryA_vac2, susceptible_countryB_vac1, susceptible_countryB_vac2, infectious_countryA_vac0_virW, infectious_countryA_vac0_virM, infectious_countryA_vac1_virW, infectious_countryA_vac1_virM, infectious_countryA_vac2_virW, infectious_countryA_vac2_virM, infectious_countryB_vac0_virM, infectious_countryB_vac1_virW, infectious_countryB_vac1_virM, infectious_countryB_vac2_virM, recovered_countryA_vac0_virW, recovered_countryA_vac0_virM, recovered_countryA_vac1_virW, recovered_countryA_vac1_virM, recovered_countryA_vac2_virW, recovered_countryA_vac2_virM, recovered_countryB_vac0_virW, recovered_countryB_vac0_virM, recovered_countryB_vac1_virW, recovered_countryB_vac1_virM, recovered_countryB_vac2_virW, recovered_countryB_vac2_virM, dead_countryA_vac0_virW, dead_countryA_vac0_virM, dead_countryA_vac1_virW, dead_countryA_vac1_virM, dead_countryA_vac2_virW, dead_countryA_vac2_virM, dead_countryB_vac0_virW, dead_countryB_vac0_virM, dead_countryB_vac1_virW, dead_countryB_vac1_virM, dead_countryB_vac2_virW, dead_countryB_vac2_virM
  susceptible_countryB_vac1_to_infectious_countryB_vac2_virW: susceptible_countryB_vac1 + infectious_countryB_vac2_virW => infectious_countryB_vac1_virW + infectious_countryB_vac2_virW; beta*eta_virW*(1 - delta_vac1_virW)*(1 - gamma)*susceptible_countryB_vac1*infectious_countryB_vac2_virW*(1 - (susceptible_countryA_vac0 + susceptible_countryA_vac1 + susceptible_countryA_vac2 + infectious_countryA_vac0_virW + infectious_countryA_vac0_virM + infectious_countryA_vac1_virW + infectious_countryA_vac1_virM + infectious_countryA_vac2_virW + infectious_countryA_vac2_virM + recovered_countryA_vac0_virW + recovered_countryA_vac0_virM + recovered_countryA_vac1_virW + recovered_countryA_vac1_virM + recovered_countryA_vac2_virW + recovered_countryA_vac2_virM)/(susceptible_countryA_vac0 + susceptible_countryA_vac1 + susceptible_countryA_vac2 + susceptible_countryB_vac0 + susceptible_countryB_vac1 + susceptible_countryB_vac2 + infectious_countryA_vac0_virW + infectious_countryA_vac0_virM + infectious_countryA_vac1_virW + infectious_countryA_vac1_virM + infectious_countryA_vac2_virW + infectious_countryA_vac2_virM + infectious_countryB_vac0_virW + infectious_countryB_vac0_virM + infectious_countryB_vac1_virW + infectious_countryB_vac1_virM + infectious_countryB_vac2_virW + infectious_countryB_vac2_virM + recovered_countryA_vac0_virW + recovered_countryA_vac0_virM + recovered_countryA_vac1_virW + recovered_countryA_vac1_virM + recovered_countryA_vac2_virW + recovered_countryA_vac2_virM + recovered_countryB_vac0_virW + recovered_countryB_vac0_virM + recovered_countryB_vac1_virW + recovered_countryB_vac1_virM + recovered_countryB_vac2_virW + recovered_countryB_vac2_virM)*distance_countryB_countryA)/(susceptible_countryB_vac0 + susceptible_countryB_vac1 + susceptible_countryB_vac2 + infectious_countryB_vac0_virW + infectious_countryB_vac0_virM + infectious_countryB_vac1_virW + infectious_countryB_vac1_virM + infectious_countryB_vac2_virW + infectious_countryB_vac2_virM + recovered_countryB_vac0_virW + recovered_countryB_vac0_virM + recovered_countryB_vac1_virW + recovered_countryB_vac1_virM + recovered_countryB_vac2_virW + recovered_countryB_vac2_virM);  // modifiers: susceptible_countryA_vac0, susceptible_countryA_vac1, susceptible_countryA_vac2, susceptible_countryB_vac0, susceptible_countryB_vac2, infectious_countryA_vac0_virW, infectious_countryA_vac0_virM, infectious_countryA_vac1_virW, infectious_countryA_vac1_virM, infectious_countryA_vac2_virW, infectious_countryA_vac2_virM, infectious_countryB_vac0_virW, infectious_countryB_vac0_virM, infectious_countryB_vac1_virM, infectious_countryB_vac2_virM, recovered_countryA_vac0_virW, recovered_countryA_vac0_virM, recovered_countryA_vac1_virW, recovered_countryA_vac1_virM, recovered_countryA_vac2_virW, recovered_countryA_vac2_virM, recovered_countryB_vac0_virW, recovered_countryB_vac0_virM, recovered_countryB_vac1_virW, recovered_countryB_vac1_virM, recovered_countryB_vac2_virW, recovered_countryB_vac2_virM, dead_countryA_vac0_virW, dead_countryA_vac0_virM, dead_countryA_vac1_virW, dead_countryA_vac1_virM, dead_countryA_vac2_virW, dead_countryA_vac2_virM, dead_countryB_vac0_virW, dead_countryB_vac0_virM, dead_countryB_vac1_virW, dead_countryB_vac1_virM, dead_countryB_vac2_virW, dead_countryB_vac2_virM
  susceptible_countryB_vac2_to_infectious_countryB_vac2_virW: susceptible_countryB_vac2 + infectious_countryB_vac2_virW => 2 infectious_countryB_vac2_virW; beta*eta_virW*(1 - delta_vac2_virW)*(1 - gamma)*susceptible_countryB_vac2*infectious_countryB_vac2_virW*(1 - (susceptible_countryA_vac0 + susceptible_countryA_vac1 + susceptible_countryA_vac2 + infectious_countryA_vac0_virW + infectious_countryA_vac0_virM + infectious_countryA_vac1_virW + infectious_countryA_vac1_virM + infectious_countryA_vac2_virW + infectious_countryA_vac2_virM + recovered_countryA_vac0_virW + recovered_countryA_vac0_virM + recovered_countryA_vac1_virW + recovered_countryA_vac1_virM + recovered_countryA_vac2_virW + recovered_countryA_vac2_virM)/(susceptible_countryA_vac0 + susceptible_countryA_vac1 + susceptible_countryA_vac2 + susceptible_countryB_vac0 + susceptible_countryB_vac1 + susceptible_countryB_vac2 + infectious_countryA_vac0_virW + infectious_countryA_vac0_virM + infectious_countryA_vac1_virW + infectious_countryA_vac1_virM + infectious_countryA_vac2_virW + infectious_countryA_vac2_virM + infectious_countryB_vac0_virW + infectious_countryB_vac0_virM + infectious_countryB_vac1_virW + infectious_countryB_vac1_virM + infectious_countryB_vac2_virW + infectious_countryB_vac2_virM + recovered_countryA_vac0_virW + recovered_countryA_vac0_virM + recovered_countryA_vac1_virW + recovered_countryA_vac1_virM + recovered_countryA_vac2_virW + recovered_countryA_vac2_virM + recovered_countryB_vac0_virW + recovered_countryB_vac0_virM + recovered_countryB_vac1_virW + recovered_countryB_vac1_virM + recovered_countryB_vac2_virW + recovered_countryB_vac2_virM)*distance_countryB_countryA)/(susceptible_countryB_vac0 + susceptible_countryB_vac1 + susceptible_countryB_vac2 + infectious_countryB_vac0_virW + infectious_countryB_vac0_virM + infectious_countryB_vac1_virW + infectious_countryB_vac1_virM + infectious_countryB_vac2_virW + infectious_countryB_vac2_virM + recovered_countryB_vac0_virW + recovered_countryB_vac0_virM + recovered_countryB_vac1_virW + recovered_countryB_vac1_virM + recovered_countryB_vac2_virW + recovered_countryB_vac2_virM);  // modifiers: susceptible_countryA_vac0, susceptible_countryA_vac1, susceptible_countryA_vac2, susceptible_countryB_vac0, susceptible_countryB_vac1, infectious_countryA_vac0_virW, infectious_countryA_vac0_virM, infectious_countryA_vac1_virW, infectious_countryA_vac1_virM, infectious_countryA_vac2_virW, infectious_countryA_vac2_virM, infectious_countryB_vac0_virW, infectious_countryB_vac0_virM, infectious_countryB_vac1_virW, infectious_countryB_vac1_virM, infectious_countryB_vac2_virM, recovered_countryA_vac0_virW, recovered_countryA_vac0_virM, recovered_countryA_vac1_virW, recovered_countryA_vac1_virM, recovered_countryA_vac2_virW, recovered_countryA_vac2_virM, recovered_countryB_vac0_virW, recovered_countryB_vac0_virM, recovered_countryB_vac1_virW, recovered_countryB_vac1_virM, recovered_countryB_vac2_virW, recovered_countryB_vac2_virM, dead_countryA_vac0_virW, dead_countryA_vac0_virM, dead_countryA_vac1_virW, dead_countryA_vac1_virM, dead_countryA_vac2_virW, dead_countryA_vac2_virM, dead_countryB_vac0_virW, dead_countryB_vac0_virM, dead_countryB_vac1_virW, dead_countryB_vac1_virM, dead_countryB_vac2_virW, dead_countryB_vac2_virM
  susceptible_countryA_vac0_to_infectious_countryB_vac2_virM: susceptible_countryA_vac0 + infectious_countryB_vac2_virM => infectious_countryA_vac0_virM + infectious_countryB_vac2_virM; beta*eta_virM*(1 - 0)*(1 - gamma)*susceptible_countryA_vac0*infectious_countryB_vac2_virM*(susceptible_countryA_vac0 + susceptible_countryA_vac1 + susceptible_countryA_vac2 + infectious_countryA_vac0_virW + infectious_countryA_vac0_virM + infectious_countryA_vac1_virW + infectious_countryA_vac1_virM + infectious_countryA_vac2_virW + infectious_countryA_vac2_virM + recovered_countryA_vac0_virW + recovered_countryA_vac0_virM + recovered_countryA_vac1_virW + recovered_countryA_vac1_virM + recovered_countryA_vac2_virW + recovered_countryA_vac2_virM)/(susceptible_countryA_vac0 + susceptible_countryA_vac1 + susceptible_countryA_vac2 + susceptible_countryB_vac0 + susceptible_countryB_vac1 + susceptible_countryB_vac2 + infectious_countryA_vac0_virW + infectious_countryA_vac0_virM + infectious_countryA_vac1_virW + infectious_countryA_vac1_virM + infectious_countryA_vac2_virW + infectious_countryA_vac2_virM + infectious_countryB_vac0_virW + infectious_countryB_vac0_virM + infectious_countryB_vac1_virW + infectious_countryB_vac1_virM + infectious_countryB_vac2_virW + infectious_countryB_vac2_virM + recovered_countryA_vac0_virW + recovered_countryA_vac0_virM + recovered_countryA_vac1_virW + recovered_countryA_vac1_virM + recovered_countryA_vac2_virW + recovered_countryA_vac2_virM + recovered_countryB_vac0_virW + recovered_countryB_vac0_virM + recovered_countryB_vac1_virW + recovered_countryB_vac1_virM + recovered_countryB_vac2_virW + recovered_countryB_vac2_virM)*distance_countryB_countryA/(susceptible_countryA_vac0 + susceptible_countryA_vac1 + susceptible_countryA_vac2 + infectious_countryA_vac0_virW + infectious_countryA_vac0_virM + infectious_countryA_vac1_virW + infectious_countryA_vac1_virM + infectious_countryA_vac2_virW + infectious_countryA_vac2_virM + recovered_countryA_vac0_virW + recovered_countryA_vac0_virM + recovered_countryA_vac1_virW + recovered_countryA_vac1_virM + recovered_countryA_vac2_virW + recovered_countryA_vac2_virM);  // modifiers: susceptible_countryA_vac1, susceptible_countryA_vac2, susceptible_countryB_vac0, susceptible_countryB_vac1, susceptible_countryB_vac2, infectious_countryA_vac0_virW, infectious_countryA_vac1_virW, infectious_countryA_vac1_virM, infectious_countryA_vac2_virW, infectious_countryA_vac2_virM, infectious_countryB_vac0_virW, infectious_countryB_vac0_virM, infectious_countryB_vac1_virW, infectious_countryB_vac1_virM, infectious_countryB_vac2_virW, recovered_countryA_vac0_virW, recovered_countryA_vac0_virM, recovered_countryA_vac1_virW, recovered_countryA_vac1_virM, recovered_countryA_vac2_virW, recovered_countryA_vac2_virM, recovered_countryB_vac0_virW, recovered_countryB_vac0_virM, recovered_countryB_vac1_virW, recovered_countryB_vac1_virM, recovered_countryB_vac2_virW, recovered_countryB_vac2_virM, dead_countryA_vac0_virW, dead_countryA_vac0_virM, dead_countryA_vac1_virW, dead_countryA_vac1_virM, dead_countryA_vac2_virW, dead_countryA_vac2_virM, dead_countryB_vac0_virW, dead_countryB_vac0_virM, dead_countryB_vac1_virW, dead_countryB_vac1_virM, dead_countryB_vac2_virW, dead_countryB_vac2_virM
  susceptible_countryA_vac1_to_infectious_countryB_vac2_virM: susceptible_countryA_vac1 + infectious_countryB_vac2_virM => infectious_countryA_vac1_virM + infectious_countryB_vac2_virM; beta*eta_virM*(1 - delta_vac1_virM)*(1 - gamma)*susceptible_countryA_vac1*infectious_countryB_vac2_virM*(susceptible_countryA_vac0 + susceptible_countryA_vac1 + susceptible_countryA_vac2 + infectious_countryA_vac0_virW + infectious_countryA_vac0_virM + infectious_countryA_vac1_virW + infectious_countryA_vac1_virM + infectious_countryA_vac2_virW + infectious_countryA_vac2_virM + recovered_countryA_vac0_virW + recovered_countryA_vac0_virM + recovered_countryA_vac1_virW + recovered_countryA_vac1_virM + recovered_countryA_vac2_virW + recovered_countryA_vac2_virM)/(susceptible_countryA_vac0 + susceptible_countryA_vac1 + susceptible_countryA_vac2 + susceptible_countryB_vac0 + susceptible_countryB_vac1 + susceptible_countryB_vac2 + infectious_countryA_vac0_virW + infectious_countryA_vac0_virM + infectious_countryA_vac1_virW + infectious_countryA_vac1_virM + infectious_countryA_vac2_virW + infectious_countryA_vac2_virM + infectious_countryB_vac0_virW + infectious_countryB_vac0_virM + infectious_countryB_vac1_virW + infectious_countryB_vac1_virM + infectious_countryB_vac2_virW + infectious_countryB_vac2_virM + recovered_countryA_vac0_virW + recovered_countryA_vac0_virM + recovered_countryA_vac1_virW + recovered_countryA_vac1_virM + recovered_countryA_vac2_virW + recovered_countryA_vac2_virM + recovered_countryB_vac0_virW + recovered_countryB_vac0_virM + recovered_countryB_vac1_virW + recovered_countryB_vac1_virM + recovered_countryB_vac2_virW + recovered_countryB_vac2_virM)*distance_countryB_countryA/(susceptible_countryA_vac0 + susceptible_countryA_vac1 + susceptible_countryA_vac2 + infectious_countryA_vac0_virW + infectious_countryA_vac0_virM + infectious_countryA_vac1_virW + infectious_countryA_vac1_virM + infectious_countryA_vac2_virW + infectious_countryA_vac2_virM + recovered_countryA_vac0_virW + recovered_countryA_vac0_virM + recovered_countryA_vac1_virW + recovered_countryA_vac1_virM + recovered_countryA_vac2_virW + recovered_countryA_vac2_virM);  // modifiers: susceptible_countryA_vac0, susceptible_countryA_vac2, susceptible_countryB_vac0, susceptible_countryB_vac1, susceptible_countryB_vac2, infectious_countryA_vac0_virW, infectious_countryA_vac0_virM, infectious_countryA_vac1_virW, infectious_countryA_vac2_virW, infectious_countryA_vac2_virM, infectious_countryB_vac0_virW, infectious_countryB_vac0_virM, infectious_countryB_vac1_virW, infectious_countryB_vac1_virM, infectious_countryB_vac2_virW, recovered_countryA_vac0_virW, recovered_countryA_vac0_virM, recovered_countryA_vac1_virW, recovered_countryA_vac1_virM, recovered_countryA_vac2_virW, recovered_countryA_vac2_virM, recovered_countryB_vac0_virW, recovered_countryB_vac0_virM, recovered_countryB_vac1_virW, recovered_countryB_vac1_virM, recovered_countryB_vac2_virW, recovered_countryB_vac2_virM, dead_countryA_vac0_virW, dead_countryA_vac0_virM, dead_countryA_vac1_virW, dead_countryA_vac1_virM, dead_countryA_vac2_virW, dead_countryA_vac2_virM, dead_countryB_vac0_virW, dead_countryB_vac0_virM, dead_countryB_vac1_virW, dead_countryB_vac1_virM, dead_countryB_vac2_virW, dead_countryB_vac2_virM
  susceptible_countryA_vac2_to_infectious_countryB_vac2_virM: susceptible_countryA_vac2 + infectious_countryB_vac2_virM => infectious_countryA_vac2_virM + infectious_countryB_vac2_virM; beta*eta_virM*(1 - delta_vac2_virM)*(1 - gamma)*susceptible_countryA_vac2*infectious_countryB_vac2_virM*(susceptible_countryA_vac0 + susceptible_countryA_vac1 + susceptible_countryA_vac2 + infectious_countryA_vac0_virW + infectious_countryA_vac0_virM + infectious_countryA_vac1_virW + infectious_countryA_vac1_virM + infectious_countryA_vac2_virW + infectious_countryA_vac2_virM + recovered_countryA_vac0_virW + recovered_countryA_vac0_virM + recovered_countryA_vac1_virW + recovered_countryA_vac1_virM + recovered_countryA_vac2_virW + recovered_countryA_vac2_virM)/(susceptible_countryA_vac0 + susceptible_countryA_vac1 + susceptible_countryA_vac2 + susceptible_countryB_vac0 + susceptible_countryB_vac1 + susceptible_countryB_vac2 + infectious_countryA_vac0_virW + infectious_countryA_vac0_virM + infectious_countryA_vac1_virW + infectious_countryA_vac1_virM + infectious_countryA_vac2_virW + infectious_countryA_vac2_virM + infectious_countryB_vac0_virW + infectious_countryB_vac0_virM + infectious_countryB_vac1_virW + infectious_countryB_vac1_virM + infectious_countryB_vac2_virW + infectious_countryB_vac2_virM + recovered_countryA_vac0_virW + recovered_countryA_vac0_virM + recovered_countryA_vac1_virW + recovered_countryA_vac1_virM + recovered_countryA_vac2_virW + recovered_countryA_vac2_virM + recovered_countryB_vac0_virW + recovered_countryB_vac0_virM + recovered_countryB_vac1_virW + recovered_countryB_vac1_virM + recovered_countryB_vac2_virW + recovered_countryB_vac2_virM)*distance_countryB_countryA/(susceptible_countryA_vac0 + susceptible_countryA_vac1 + susceptible_countryA_vac2 + infectious_countryA_vac0_virW + infectious_countryA_vac0_virM + infectious_countryA_vac1_virW + infectious_countryA_vac1_virM + infectious_countryA_vac2_virW + infectious_countryA_vac2_virM + recovered_countryA_vac0_virW + recovered_countryA_vac0_virM + recovered_countryA_vac1_virW + recovered_countryA_vac1_virM + recovered_countryA_vac2_virW + recovered_countryA_vac2_virM);  // modifiers: susceptible_countryA_vac0, susceptible_countryA_vac1, susceptible_countryB_vac0, susceptible_countryB_vac1, susceptible_countryB_vac2, infectious_countryA_vac0_virW, infectious_countryA_vac0_virM, infectious_countryA_vac1_virW, infectious_countryA_vac1_virM, infectious_countryA_vac2_virW, infectious_countryB_vac0_virW, infectious_countryB_vac0_virM, infectious_countryB_vac1_virW, infectious_countryB_vac1_virM, infectious_countryB_vac2_virW, recovered_countryA_vac0_virW, recovered_countryA_vac0_virM, recovered_countryA_vac1_virW, recovered_countryA_vac1_virM, recovered_countryA_vac2_virW, recovered_countryA_vac2_virM, recovered_countryB_vac0_virW, recovered_countryB_vac0_virM, recovered_countryB_vac1_virW, recovered_countryB_vac1_virM, recovered_countryB_vac2_virW, recovered_countryB_vac2_virM, dead_countryA_vac0_virW, dead_countryA_vac0_virM, dead_countryA_vac1_virW, dead_countryA_vac1_virM, dead_countryA_vac2_virW, dead_countryA_vac2_virM, dead_countryB_vac0_virW, dead_countryB_vac0_virM, dead_countryB_vac1_virW, dead_countryB_vac1_virM, dead_countryB_vac2_virW, dead_countryB_vac2_virM
  susceptible_countryB_vac0_to_infectious_countryB_vac2_virM: susceptible_countryB_vac0 + infectious_countryB_vac2_virM => infectious_countryB_vac0_virM + infectious_countryB_vac2_virM; beta*eta_virM*(1 - 0)*(1 - gamma)*susceptible_countryB_vac0*infectious_countryB_vac2_virM*(1 - (susceptible_countryA_vac0 + susceptible_countryA_vac1 + susceptible_countryA_vac2 + infectious_countryA_vac0_virW + infectious_countryA_vac0_virM + infectious_countryA_vac1_virW + infectious_countryA_vac1_virM + infectious_countryA_vac2_virW + infectious_countryA_vac2_virM + recovered_countryA_vac0_virW + recovered_countryA_vac0_virM + recovered_countryA_vac1_virW + recovered_countryA_vac1_virM + recovered_countryA_vac2_virW + recovered_countryA_vac2_virM)/(susceptible_countryA_vac0 + susceptible_countryA_vac1 + susceptible_countryA_vac2 + susceptible_countryB_vac0 + susceptible_countryB_vac1 + susceptible_countryB_vac2 + infectious_countryA_vac0_virW + infectious_countryA_vac0_virM + infectious_countryA_vac1_virW + infectious_countryA_vac1_virM + infectious_countryA_vac2_virW + infectious_countryA_vac2_virM + infectious_countryB_vac0_virW + infectious_countryB_vac0_virM + infectious_countryB_vac1_virW + infectious_countryB_vac1_virM + infectious_countryB_vac2_virW + infectious_countryB_vac2_virM + recovered_countryA_vac0_virW + recovered_countryA_vac0_virM + recovered_countryA_vac1_virW + recovered_countryA_vac1_virM + recovered_countryA_vac2_virW + recovered_countryA_vac2_virM + recovered_countryB_vac0_virW + recovered_countryB_vac0_virM + recovered_countryB_vac1_virW + recovered_countryB_vac1_virM + recovered_countryB_vac2_virW + recovered_countryB_vac2_virM)*distance_countryB_countryA)/(susceptible_countryB_vac0 + susceptible_countryB_vac1 + susceptible_countryB_vac2 + infectious_countryB_vac0_virW + infectious_countryB_vac0_virM + infectious_countryB_vac1_virW + infectious_countryB_vac1_virM + infectious_countryB_vac2_virW + infectious_countryB_vac2_virM + recovered_countryB_vac0_virW + recovered_countryB_vac0_virM + recovered_countryB_vac1_virW + recovered_countryB_vac1_virM + recovered_countryB_vac2_virW + recovered_countryB_vac2_virM);  // modifiers: susceptible_countryA_vac0, susceptible_countryA_vac1, susceptible_countryA_vac2, susceptible_countryB_vac1, susceptible_countryB_vac2, infectious_countryA_vac0_virW, infectious_countryA_vac0_virM, infectious_countryA_vac1_virW, infectious_countryA_vac1_virM, infectious_countryA_vac2_virW, infectious_countryA_vac2_virM, infectious_countryB_vac0_virW, infectious_countryB_vac1_virW, infectious_countryB_vac1_virM, infectious_countryB_vac2_virW, recovered_countryA_vac0_virW, recovered_countryA_vac0_virM, recovered_countryA_vac1_virW, recovered_countryA_vac1_virM, recovered_countryA_vac2_virW, recovered_countryA_vac2_virM, recovered_countryB_vac0_virW, recovered_countryB_vac0_virM, recovered_countryB_vac1_virW, recovered_countryB_vac1_virM, recovered_countryB_vac2_virW, recovered_countryB_vac2_virM, dead_countryA_vac0_virW, dead_countryA_vac0_virM, dead_countryA_vac1_virW, dead_countryA_vac1_virM, dead_countryA_vac2_virW, dead_countryA_vac2_virM, dead_countryB_vac0_virW, dead_countryB_vac0_virM, dead_countryB_vac1_virW, dead_countryB_vac1_virM, dead_countryB_vac2_virW, dead_countryB_vac2_virM
  susceptible_countryB_vac1_to_infectious_countryB_vac2_virM: susceptible_countryB_vac1 + infectious_countryB_vac2_virM => infectious_countryB_vac1_virM + infectious_countryB_vac2_virM; beta*eta_virM*(1 - delta_vac1_virM)*(1 - gamma)*susceptible_countryB_vac1*infectious_countryB_vac2_virM*(1 - (susceptible_countryA_vac0 + susceptible_countryA_vac1 + susceptible_countryA_vac2 + infectious_countryA_vac0_virW + infectious_countryA_vac0_virM + infectious_countryA_vac1_virW + infectious_countryA_vac1_virM + infectious_countryA_vac2_virW + infectious_countryA_vac2_virM + recovered_countryA_vac0_virW + recovered_countryA_vac0_virM + recovered_countryA_vac1_virW + recovered_countryA_vac1_virM + recovered_countryA_vac2_virW + recovered_countryA_vac2_virM)/(susceptible_countryA_vac0 + susceptible_countryA_vac1 + susceptible_countryA_vac2 + susceptible_countryB_vac0 + susceptible_countryB_vac1 + susceptible_countryB_vac2 + infectious_countryA_vac0_virW + infectious_countryA_vac0_virM + infectious_countryA_vac1_virW + infectious_countryA_vac1_virM + infectious_countryA_vac2_virW + infectious_countryA_vac2_virM + infectious_countryB_vac0_virW + infectious_countryB_vac0_virM + infectious_countryB_vac1_virW + infectious_countryB_vac1_virM + infectious_countryB_vac2_virW + infectious_countryB_vac2_virM + recovered_countryA_vac0_virW + recovered_countryA_vac0_virM + recovered_countryA_vac1_virW + recovered_countryA_vac1_virM + recovered_countryA_vac2_virW + recovered_countryA_vac2_virM + recovered_countryB_vac0_virW + recovered_countryB_vac0_virM + recovered_countryB_vac1_virW + recovered_countryB_vac1_virM + recovered_countryB_vac2_virW + recovered_countryB_vac2_virM)*distance_countryB_countryA)/(susceptible_countryB_vac0 + susceptible_countryB_vac1 + susceptible_countryB_vac2 + infectious_countryB_vac0_virW + infectious_countryB_vac0_virM + infectious_countryB_vac1_virW + infectious_countryB_vac1_virM + infectious_countryB_vac2_virW + infectious_countryB_vac2_virM + recovered_countryB_vac0_virW + recovered_countryB_vac0_virM + recovered_countryB_vac1_virW + recovered_countryB_vac1_virM + recovered_countryB_vac2_virW + recovered_countryB_vac2_virM);  // modifiers: susceptible_countryA_vac0, susceptible_countryA_vac1, susceptible_countryA_vac2, susceptible_countryB_vac0, susceptible_countryB_vac2, infectious_countryA_vac0_virW, infectious_countryA_vac0_virM, infectious_countryA_vac1_virW, infectious_countryA_vac1_virM, infectious_countryA_vac2_virW, infectious_countryA_vac2_virM, infectious_countryB_vac0_virW, infectious_countryB_vac0_virM, infectious_countryB_vac1_virW, infectious_countryB_vac2_virW, recovered_countryA_vac0_virW, recovered_countryA_vac0_virM, recovered_countryA_vac1_virW, recovered_countryA_vac1_virM, recovered_countryA_vac2_virW, recovered_countryA_vac2_virM, recovered_countryB_vac0_virW, recovered_countryB_vac0_virM, recovered_countryB_vac1_virW, recovered_countryB_vac1_virM, recovered_countryB_vac2_virW, recovered_countryB_vac2_virM, dead_countryA_vac0_virW, dead_countryA_vac0_virM, dead_countryA_vac1_virW, dead_countryA_vac1_virM, dead_countryA_vac2_virW, dead_countryA_vac2_virM, dead_countryB_vac0_virW, dead_countryB_vac0_virM, dead_countryB_vac1_virW, dead_countryB_vac1_virM, dead_countryB_vac2_virW, dead_countryB_vac2_virM
  susceptible_countryB_vac2_to_infectious_countryB_vac2_virM: susceptible_countryB_vac2 + infectious_countryB_vac2_virM => 2 infectious_countryB_vac2_virM; beta*eta_virM*(1 - delta_vac2_virM)*(1 - gamma)*susceptible_countryB_vac2*infectious_countryB_vac2_virM*(1 - (susceptible_countryA_vac0 + susceptible_countryA_vac1 + susceptible_countryA_vac2 + infectious_countryA_vac0_virW + infectious_countryA_vac0_virM + infectious_countryA_vac1_virW + infectious_countryA_vac1_virM + infectious_countryA_vac2_virW + infectious_countryA_vac2_virM + recovered_countryA_vac0_virW + recovered_countryA_vac0_virM + recovered_countryA_vac1_virW + recovered_countryA_vac1_virM + recovered_countryA_vac2_virW + recovered_countryA_vac2_virM)/(susceptible_countryA_vac0 + susceptible_countryA_vac1 + susceptible_countryA_vac2 + susceptible_countryB_vac0 + susceptible_countryB_vac1 + susceptible_countryB_vac2 + infectious_countryA_vac0_virW + infectious_countryA_vac0_virM + infectious_countryA_vac1_virW + infectious_countryA_vac1_virM + infectious_countryA_vac2_virW + infectious_countryA_vac2_virM + infectious_countryB_vac0_virW + infectious_countryB_vac0_virM + infectious_countryB_vac1_virW + infectious_countryB_vac1_virM + infectious_countryB_vac2_virW + infectious_countryB_vac2_virM + recovered_countryA_vac0_virW + recovered_countryA_vac0_virM + recovered_countryA_vac1_virW + recovered_countryA_vac1_virM + recovered_countryA_vac2_virW + recovered_countryA_vac2_virM + recovered_countryB_vac0_virW + recovered_countryB_vac0_virM + recovered_countryB_vac1_virW + recovered_countryB_vac1_virM + recovered_countryB_vac2_virW + recovered_countryB_vac2_virM)*distance_countryB_countryA)/(susceptible_countryB_vac0 + susceptible_countryB_vac1 + susceptible_countryB_vac2 + infectious_countryB_vac0_virW + infectious_countryB_vac0_virM + infectious_countryB_vac1_virW + infectious_countryB_vac1_virM + infectious_countryB_vac2_virW + infectious_countryB_vac2_virM + recovered_countryB_vac0_virW + recovered_countryB_vac0_virM + recovered_countryB_vac1_virW + recovered_countryB_vac1_virM + recovered_countryB_vac2_virW + recovered_countryB_vac2_virM);  // modifiers: susceptible_countryA_vac0, susceptible_countryA_vac1, susceptible_countryA_vac2, susceptible_countryB_vac0, susceptible_countryB_vac1, infectious_countryA_vac0_virW, infectious_countryA_vac0_virM, infectious_countryA_vac1_virW, infectious_countryA_vac1_virM, infectious_countryA_vac2_virW, infectious_countryA_vac2_virM, infectious_countryB_vac0_virW, infectious_countryB_vac0_virM, infectious_countryB_vac1_virW, infectious_countryB_vac1_virM, infectious_countryB_vac2_virW, recovered_countryA_vac0_virW, recovered_countryA_vac0_virM, recovered_countryA_vac1_virW, recovered_countryA_vac1_virM, recovered_countryA_vac2_virW, recovered_countryA_vac2_virM, recovered_countryB_vac0_virW, recovered_countryB_vac0_virM, recovered_countryB_vac1_virW, recovered_countryB_vac1_virM, recovered_countryB_vac2_virW, recovered_countryB_vac2_virM, dead_countryA_vac0_virW, dead_countryA_vac0_virM, dead_countryA_vac1_virW, dead_countryA_vac1_virM, dead_countryA_vac2_virW, dead_countryA_vac2_virM, dead_countryB_vac0_virW, dead_countryB_vac0_virM, dead_countryB_vac1_virW, dead_countryB_vac1_virM, dead_countryB_vac2_virW, dead_countryB_vac2_virM
  susceptible_countryA_vac0_to_susceptible_countryA_vac1: susceptible_countryA_vac0 => susceptible_countryA_vac1; nu_countryA_vac1*susceptible_countryA_vac0;
  susceptible_countryA_vac0_to_susceptible_countryA_vac2: susceptible_countryA_vac0 => susceptible_countryA_vac2; nu_countryA_vac2*susceptible_countryA_vac0;
  susceptible_countryB_vac0_to_susceptible_countryB_vac1: susceptible_countryB_vac0 => susceptible_countryB_vac1; nu_countryB_vac1*susceptible_countryB_vac0;
  susceptible_countryB_vac0_to_susceptible_countryB_vac2: susceptible_countryB_vac0 => susceptible_countryB_vac2; nu_countryB_vac2*susceptible_countryB_vac0;
  recovered_countryA_vac0_virW_to_recovered_countryA_vac1_virW: recovered_countryA_vac0_virW => recovered_countryA_vac1_virW; nu_countryA_vac1*recovered_countryA_vac0_virW;
  recovered_countryA_vac0_virW_to_recovered_countryA_vac2_virW: recovered_countryA_vac0_virW => recovered_countryA_vac2_virW; nu_countryA_vac2*recovered_countryA_vac0_virW;
  recovered_countryA_vac0_virM_to_recovered_countryA_vac1_virM: recovered_countryA_vac0_virM => recovered_countryA_vac1_virM; nu_countryA_vac1*recovered_countryA_vac0_virM;
  recovered_countryA_vac0_virM_to_recovered_countryA_vac2_virM: recovered_countryA_vac0_virM => recovered_countryA_vac2_virM; nu_countryA_vac2*recovered_countryA_vac0_virM;
  recovered_countryB_vac0_virW_to_recovered_countryB_vac1_virW: recovered_countryB_vac0_virW => recovered_countryB_vac1_virW; nu_countryB_vac1*recovered_countryB_vac0_virW;
  recovered_countryB_vac0_virW_to_recovered_countryB_vac2_virW: recovered_countryB_vac0_virW => recovered_countryB_vac2_virW; nu_countryB_vac2*recovered_countryB_vac0_virW;
  recovered_countryB_vac0_virM_to_recovered_countryB_vac1_virM: recovered_countryB_vac0_virM => recovered_countryB_vac1_virM; nu_countryB_vac1*recovered_countryB_vac0_virM;
  recovered_countryB_vac0_virM_to_recovered_countryB_vac2_virM: recovered_countryB_vac0_virM => recovered_countryB_vac2_virM; nu_countryB_vac2*recovered_countryB_vac0_virM;
end
